<?xml version="1.0"?>
<?xml-stylesheet type="text/xsl" href="http://jsbsim.sourceforge.net/JSBSim.xsl"?>
<fdm_config name="parachutist_FDM" version="2.0" release="BETA"
    xmlns:xsi="http://www.w3.org/2001/XMLSchema-instance"
    xsi:noNamespaceSchemaLocation="http://jsbsim.sourceforge.net/JSBSim.xsd">

  <fileheader>
    <author> Daniel Micka </author>
    <filecreationdate> 2010-01-01 </filecreationdate>
    <version> $Id: parachutist_FDM.xml 2011/05/23$ </version>
    <description> Parachutist </description>
  </fileheader>


  <metrics>

    <wingarea unit="FT2"> 1 </wingarea>
    <wingspan unit="FT"> 1 </wingspan>
    <chord unit="FT"> 1 </chord>
    <htailarea unit="FT2"> 1 </htailarea>
    <htailarm unit="FT"> 1 </htailarm>
    <vtailarea unit="FT2"> 1 </vtailarea>
    <vtailarm unit="FT"> 1 </vtailarm>
    <location name="AERORP" unit="IN">
      <x> 0 </x>
      <y> 0 </y>
      <z> 0 </z>
    </location>
    <location name="EYEPOINT" unit="IN">
      <x> 40 </x>
      <y> 0 </y>
      <z> 40 </z>
    </location>
    <location name="VRP" unit="IN">
      <x> 40 </x>
      <y> 0 </y>
      <z> 30 </z>
    </location>
  </metrics>

  <mass_balance>
    <ixx unit="SLUG*FT2">0.980</ixx>
    <iyy unit="SLUG*FT2">1.130</iyy>
    <izz unit="SLUG*FT2">0.897</izz>
    <ixy unit="SLUG*FT2"> 0.001 </ixy>
    <ixz unit="SLUG*FT2"> 0.001 </ixz>
    <iyz unit="SLUG*FT2"> 0.001 </iyz>
    <emptywt unit="LBS">191.999</emptywt>
    <location name="CG" unit="FT">
      <x>-0.488</x>
      <y>-0.000</y>
      <z>-0.010</z>
    </location>
  </mass_balance>

  <ground_reactions>
    <contact type="BOGEY" name="NOSE">
      <location unit="IN">
        <x> -6.8 </x>
        <y> 0 </y>
        <z> -20 </z>
      </location>
      <static_friction> 0.8 </static_friction>
      <dynamic_friction> 0.5 </dynamic_friction>
      <rolling_friction> 0.02 </rolling_friction>
      <spring_coeff unit="LBS/FT"> 1800 </spring_coeff>
      <damping_coeff unit="LBS/FT/SEC"> 600 </damping_coeff>
      <max_steer unit="DEG"> 10 </max_steer>
      <brake_group> NONE </brake_group>
      <retractable>0</retractable>
    </contact>
    <contact type="BOGEY" name="LEFT_MAIN">
      <location unit="IN">
        <x> 58.2 </x>
        <y> -43 </y>
        <z> -17.9 </z>
      </location>
      <static_friction> 0.8 </static_friction>
      <dynamic_friction> 0.5 </dynamic_friction>
      <rolling_friction> 0.02 </rolling_friction>
      <spring_coeff unit="LBS/FT"> 5400 </spring_coeff>
      <damping_coeff unit="LBS/FT/SEC"> 1600 </damping_coeff>
      <max_steer unit="DEG"> 0.0 </max_steer>
      <brake_group> LEFT </brake_group>
      <retractable>0</retractable>
    </contact>
    <contact type="BOGEY" name="RIGHT_MAIN">
      <location unit="IN">
        <x> 58.2 </x>
        <y> 43 </y>
        <z> -17.9 </z>
      </location>
      <static_friction> 0.8 </static_friction>
      <dynamic_friction> 0.5 </dynamic_friction>
      <rolling_friction> 0.02 </rolling_friction>
      <spring_coeff unit="LBS/FT"> 5400 </spring_coeff>
      <damping_coeff unit="LBS/FT/SEC"> 1600 </damping_coeff>
      <max_steer unit="DEG"> 0.0 </max_steer>
      <brake_group> RIGHT </brake_group>
      <retractable>0</retractable>
    </contact>
    <contact type="BOGEY" name="TAIL_SKID">
      <location unit="IN">
        <x> 188 </x>
        <y> 0 </y>
        <z> 8 </z>
      </location>
      <static_friction> 0.2 </static_friction>
      <dynamic_friction> 0.2 </dynamic_friction>
      <rolling_friction> 0.2 </rolling_friction>
      <spring_coeff unit="LBS/FT"> 20000 </spring_coeff>
      <damping_coeff unit="LBS/FT/SEC"> 1000 </damping_coeff>
      <max_steer unit="DEG"> 0.0 </max_steer>
      <brake_group> NONE </brake_group>
      <retractable>0</retractable>
    </contact>
    <contact type="BOGEY" name="LEFT_TIP">
      <location unit="IN">
        <x> 43.2 </x>
        <y> -214.8 </y>
        <z> 59.4 </z>
      </location>
      <static_friction> 0.2 </static_friction>
      <dynamic_friction> 0.2 </dynamic_friction>
      <rolling_friction> 0.2 </rolling_friction>
      <spring_coeff unit="LBS/FT"> 10000 </spring_coeff>
      <damping_coeff unit="LBS/FT/SEC"> 2000 </damping_coeff>
      <max_steer unit="DEG"> 0.0 </max_steer>
      <brake_group> NONE </brake_group>
      <retractable>0</retractable>
    </contact>
    <contact type="BOGEY" name="RIGHT_TIP">
      <location unit="IN">
        <x> 43.2 </x>
        <y> 214.8 </y>
        <z> 59.4 </z>
      </location>
      <static_friction> 0.2 </static_friction>
      <dynamic_friction> 0.2 </dynamic_friction>
      <rolling_friction> 0.2 </rolling_friction>
      <spring_coeff unit="LBS/FT"> 10000 </spring_coeff>
      <damping_coeff unit="LBS/FT/SEC"> 2000 </damping_coeff>
      <max_steer unit="DEG"> 0.0 </max_steer>
      <brake_group> NONE </brake_group>
      <retractable>0</retractable>
    </contact>
  </ground_reactions>

  <external_reactions>
    <property> Creare/head/phi-x </property>
    <property> Creare/head/phi-y </property>
    <property> Creare/head/phi-z </property>
    <property> Creare/left-forearm/phi-x </property>
    <property> Creare/left-forearm/phi-y </property>
    <property> Creare/left-forearm/phi-z </property>
    <property> Creare/left-lower-leg/phi-x </property>
    <property> Creare/left-lower-leg/phi-y </property>
    <property> Creare/left-lower-leg/phi-z </property>
    <property> Creare/left-upper-arm/phi-x </property>
    <property> Creare/left-upper-arm/phi-y </property>
    <property> Creare/left-upper-arm/phi-z </property>
    <property> Creare/left-upper-leg/phi-x </property>
    <property> Creare/left-upper-leg/phi-y </property>
    <property> Creare/left-upper-leg/phi-z </property>
    <property> Creare/pelvis/phi-x </property>
    <property> Creare/pelvis/phi-y </property>
    <property> Creare/pelvis/phi-z </property>
    <property> Creare/right-forearm/phi-x </property>
    <property> Creare/right-forearm/phi-y </property>
    <property> Creare/right-forearm/phi-z </property>
    <property> Creare/right-lower-leg/phi-x </property>
    <property> Creare/right-lower-leg/phi-y </property>
    <property> Creare/right-lower-leg/phi-z </property>
    <property> Creare/right-upper-arm/phi-x </property>
    <property> Creare/right-upper-arm/phi-y </property>
    <property> Creare/right-upper-arm/phi-z </property>
    <property> Creare/right-upper-leg/phi-x </property>
    <property> Creare/right-upper-leg/phi-y </property>
    <property> Creare/right-upper-leg/phi-z </property>
    <property> Creare/torso/phi-x </property>
    <property> Creare/torso/phi-y </property>
    <property> Creare/torso/phi-z </property>
    <property value="0.424" > Creare/head/area </property>
    <property value="1.266" > Creare/head/length </property>
    <property value="-0.001" > Creare/head/cg-lbf-x </property>
    <property value="-0.000" > Creare/head/cg-lbf-y </property>
    <property value="-0.471" > Creare/head/cg-lbf-z </property>
    <property value="0.322" > Creare/left-forearm/area </property>
    <property value="1.333" > Creare/left-forearm/length </property>
    <property value="-0.000" > Creare/left-forearm/cg-lbf-x </property>
    <property value="-0.005" > Creare/left-forearm/cg-lbf-y </property>
    <property value="0.435" > Creare/left-forearm/cg-lbf-z </property>
    <property value="0.874" > Creare/left-lower-leg/area </property>
    <property value="2.439" > Creare/left-lower-leg/length </property>
    <property value="0.014" > Creare/left-lower-leg/cg-lbf-x </property>
    <property value="-0.018" > Creare/left-lower-leg/cg-lbf-y </property>
    <property value="0.804" > Creare/left-lower-leg/cg-lbf-z </property>
    <property value="0.468" > Creare/left-upper-arm/area </property>
    <property value="1.393" > Creare/left-upper-arm/length </property>
    <property value="0.000" > Creare/left-upper-arm/cg-lbf-x </property>
    <property value="-0.000" > Creare/left-upper-arm/cg-lbf-y </property>
    <property value="0.245" > Creare/left-upper-arm/cg-lbf-z </property>
    <property value="0.892" > Creare/left-upper-leg/area </property>
    <property value="1.980" > Creare/left-upper-leg/length </property>
    <property value="0.000" > Creare/left-upper-leg/cg-lbf-x </property>
    <property value="-0.011" > Creare/left-upper-leg/cg-lbf-y </property>
    <property value="0.477" > Creare/left-upper-leg/cg-lbf-z </property>
    <property value="0.955" > Creare/pelvis/area </property>
    <property value="1.625" > Creare/pelvis/length </property>
    <property value="0.000" > Creare/pelvis/cg-lbf-x </property>
    <property value="0.000" > Creare/pelvis/cg-lbf-y </property>
    <property value="0.300" > Creare/pelvis/cg-lbf-z </property>
    <property value="0.322" > Creare/right-forearm/area </property>
    <property value="1.333" > Creare/right-forearm/length </property>
    <property value="0.041" > Creare/right-forearm/cg-lbf-x </property>
    <property value="-0.009" > Creare/right-forearm/cg-lbf-y </property>
    <property value="0.464" > Creare/right-forearm/cg-lbf-z </property>
    <property value="0.875" > Creare/right-lower-leg/area </property>
    <property value="2.450" > Creare/right-lower-leg/length </property>
    <property value="0.019" > Creare/right-lower-leg/cg-lbf-x </property>
    <property value="0.013" > Creare/right-lower-leg/cg-lbf-y </property>
    <property value="0.795" > Creare/right-lower-leg/cg-lbf-z </property>
    <property value="0.468" > Creare/right-upper-arm/area </property>
    <property value="1.393" > Creare/right-upper-arm/length </property>
    <property value="0.000" > Creare/right-upper-arm/cg-lbf-x </property>
    <property value="0.000" > Creare/right-upper-arm/cg-lbf-y </property>
    <property value="0.235" > Creare/right-upper-arm/cg-lbf-z </property>
    <property value="0.892" > Creare/right-upper-leg/area </property>
    <property value="1.980" > Creare/right-upper-leg/length </property>
    <property value="0.000" > Creare/right-upper-leg/cg-lbf-x </property>
    <property value="0.012" > Creare/right-upper-leg/cg-lbf-y </property>
    <property value="0.477" > Creare/right-upper-leg/cg-lbf-z </property>
    <property value="1.936" > Creare/torso/area </property>
    <property value="2.413" > Creare/torso/length </property>
    <property value="0.000" > Creare/torso/cg-lbf-x </property>
    <property value="-0.000" > Creare/torso/cg-lbf-y </property>
    <property value="-0.718" > Creare/torso/cg-lbf-z </property>
    <property value="-0.004" > Creare/left-elbow/lbf-x </property>
    <property value="0.009" > Creare/left-elbow/lbf-y </property>
    <property value="0.825" > Creare/left-elbow/lbf-z </property>
    <property value="0.000" > Creare/left-hip/lbf-x </property>
    <property value="-0.295" > Creare/left-hip/lbf-y </property>
    <property value="0.509" > Creare/left-hip/lbf-z </property>
    <property value="0.025" > Creare/left-knee/lbf-x </property>
    <property value="-0.044" > Creare/left-knee/lbf-y </property>
    <property value="1.264" > Creare/left-knee/lbf-z </property>
    <property value="0.000" > Creare/left-shoulder/lbf-x </property>
    <property value="-0.535" > Creare/left-shoulder/lbf-y </property>
    <property value="-1.132" > Creare/left-shoulder/lbf-z </property>
    <property value="-0.004" > Creare/neck/lbf-x </property>
    <property value="-0.001" > Creare/neck/lbf-y </property>
    <property value="-1.611" > Creare/neck/lbf-z </property>
    <property value="-0.028" > Creare/right-elbow/lbf-x </property>
    <property value="0.009" > Creare/right-elbow/lbf-y </property>
    <property value="0.806" > Creare/right-elbow/lbf-z </property>
    <property value="0.000" > Creare/right-hip/lbf-x </property>
    <property value="0.295" > Creare/right-hip/lbf-y </property>
    <property value="0.509" > Creare/right-hip/lbf-z </property>
    <property value="0.020" > Creare/right-knee/lbf-x </property>
    <property value="0.053" > Creare/right-knee/lbf-y </property>
    <property value="1.266" > Creare/right-knee/lbf-z </property>
    <property value="0.000" > Creare/right-shoulder/lbf-x </property>
    <property value="0.535" > Creare/right-shoulder/lbf-y </property>
    <property value="-1.132" > Creare/right-shoulder/lbf-z </property>
    <property value="6.000" > Creare/total/length </property>
    <property value="2.500" > Creare/total/width </property>
    <property value="-0.488" > Creare/global-cg/gbf-x </property>
    <property value="-0.000" > Creare/global-cg/gbf-y </property>
    <property value="-0.010" > Creare/global-cg/gbf-z </property>

    <!-- external chute model -->

    <!-- percent of 30 sq. ft. -->
    <property value="0.66">systems/chute/chute-size-factor</property>
    <property value="0">systems/chute/chute-reef-pos-norm</property>

    <force name="chute" frame="WIND">
     <function>
      <product>
       <property>aero/qbar-psf</property>
       <property>systems/chute/chute-reef-pos-norm</property>
       <property>systems/chute/chute-size-factor</property>
       <value> 0.8 </value>	<!-- drag coefficient -->
       <value> 380 </value>	<!-- area in sq. ft, result is 250 sq. ft. -->
      </product>
     </function>
     <location unit="FT">
      <x>  0 </x>
      <y>  0 </y>
      <z> 0.5 </z>
     </location>
     <direction>
      <x>-1 </x>
      <y> 0 </y>
      <z> 0 </z>
     </direction>
    </force>
    <!-- external chute model -->
  </external_reactions>

  <system file="Chute.xml"/>

  <propulsion/>

  <flight_control name="FCS: parachutist">
  </flight_control>

  <aerodynamics>
  <function name="Creare/total/area">
    <description>overall_skydiver_cross_section_area</description>
    <sum>
      <property>Creare/torso/area</property>
      <property>Creare/pelvis/area</property>
      <property>Creare/head/area</property>
      <property>Creare/right-upper-leg/area</property>
      <property>Creare/left-upper-leg/area</property>
      <property>Creare/right-lower-leg/area</property>
      <property>Creare/left-lower-leg/area</property>
      <property>Creare/right-upper-arm/area</property>
      <property>Creare/left-upper-arm/area</property>
      <property>Creare/right-forearm/area</property>
      <property>Creare/left-forearm/area</property>
    </sum>
  </function>


  <function name="aero/torso/alpha-deg">
    <description>torso_local_angle_of_attack</description>
    <rotation_alpha_local>
      <property>aero/alpha-deg</property>
      <property>aero/beta-deg</property>
      <value>0</value>
      <property>Creare/torso/phi-x</property>
      <property>Creare/torso/phi-y</property>
      <property>Creare/torso/phi-z</property>
    </rotation_alpha_local>
  </function>

  <function name="aero/torso/beta-deg">
    <description>torso_local_angle_of_sideslip</description>
    <rotation_beta_local>
      <property>aero/alpha-deg</property>
      <property>aero/beta-deg</property>
      <value>0</value>
      <property>Creare/torso/phi-x</property>
      <property>Creare/torso/phi-y</property>
      <property>Creare/torso/phi-z</property>
    </rotation_beta_local>
  </function>

  <function name="aero/torso/gamma-deg">
    <description>torso_local_angle_of_roll</description>
    <rotation_gamma_local>
      <property>aero/alpha-deg</property>
      <property>aero/beta-deg</property>
      <value>0</value>
      <property>Creare/torso/phi-x</property>
      <property>Creare/torso/phi-y</property>
      <property>Creare/torso/phi-z</property>
    </rotation_gamma_local>
  </function>

  <function name="aero/pelvis/alpha-deg">
    <description>pelvis_local_angle_of_attack</description>
    <rotation_alpha_local>
      <property>aero/alpha-deg</property>
      <property>aero/beta-deg</property>
      <value>0</value>
      <property>Creare/pelvis/phi-x</property>
      <property>Creare/pelvis/phi-y</property>
      <property>Creare/pelvis/phi-z</property>
    </rotation_alpha_local>
  </function>

  <function name="aero/pelvis/beta-deg">
    <description>pelvis_local_angle_of_sideslip</description>
    <rotation_beta_local>
      <property>aero/alpha-deg</property>
      <property>aero/beta-deg</property>
      <value>0</value>
      <property>Creare/pelvis/phi-x</property>
      <property>Creare/pelvis/phi-y</property>
      <property>Creare/pelvis/phi-z</property>
    </rotation_beta_local>
  </function>

  <function name="aero/pelvis/gamma-deg">
    <description>pelvis_local_angle_of_roll</description>
    <rotation_gamma_local>
      <property>aero/alpha-deg</property>
      <property>aero/beta-deg</property>
      <value>0</value>
      <property>Creare/pelvis/phi-x</property>
      <property>Creare/pelvis/phi-y</property>
      <property>Creare/pelvis/phi-z</property>
    </rotation_gamma_local>
  </function>

  <function name="aero/head/alpha-deg">
    <description>head_local_angle_of_attack</description>
    <rotation_alpha_local>
      <property>aero/torso/alpha-deg</property>
      <property>aero/torso/beta-deg</property>
      <property>aero/torso/gamma-deg</property>
      <property>Creare/head/phi-x</property>
      <property>Creare/head/phi-y</property>
      <property>Creare/head/phi-z</property>
    </rotation_alpha_local>
  </function>

  <function name="aero/head/beta-deg">
    <description>head_local_angle_of_sideslip</description>
    <rotation_beta_local>
      <property>aero/torso/alpha-deg</property>
      <property>aero/torso/beta-deg</property>
      <property>aero/torso/gamma-deg</property>
      <property>Creare/head/phi-x</property>
      <property>Creare/head/phi-y</property>
      <property>Creare/head/phi-z</property>
    </rotation_beta_local>
  </function>

  <function name="aero/head/gamma-deg">
    <description>head_local_angle_of_roll</description>
    <rotation_gamma_local>
      <property>aero/torso/alpha-deg</property>
      <property>aero/torso/beta-deg</property>
      <property>aero/torso/gamma-deg</property>
      <property>Creare/head/phi-x</property>
      <property>Creare/head/phi-y</property>
      <property>Creare/head/phi-z</property>
    </rotation_gamma_local>
  </function>

  <function name="aero/right-upper-leg/alpha-deg">
    <description>right-upper-leg_local_angle_of_attack</description>
    <rotation_alpha_local>
      <property>aero/pelvis/alpha-deg</property>
      <property>aero/pelvis/beta-deg</property>
      <property>aero/pelvis/gamma-deg</property>
      <property>Creare/right-upper-leg/phi-x</property>
      <property>Creare/right-upper-leg/phi-y</property>
      <property>Creare/right-upper-leg/phi-z</property>
    </rotation_alpha_local>
  </function>

  <function name="aero/right-upper-leg/beta-deg">
    <description>right-upper-leg_local_angle_of_sideslip</description>
    <rotation_beta_local>
      <property>aero/pelvis/alpha-deg</property>
      <property>aero/pelvis/beta-deg</property>
      <property>aero/pelvis/gamma-deg</property>
      <property>Creare/right-upper-leg/phi-x</property>
      <property>Creare/right-upper-leg/phi-y</property>
      <property>Creare/right-upper-leg/phi-z</property>
    </rotation_beta_local>
  </function>

  <function name="aero/right-upper-leg/gamma-deg">
    <description>right-upper-leg_local_angle_of_roll</description>
    <rotation_gamma_local>
      <property>aero/pelvis/alpha-deg</property>
      <property>aero/pelvis/beta-deg</property>
      <property>aero/pelvis/gamma-deg</property>
      <property>Creare/right-upper-leg/phi-x</property>
      <property>Creare/right-upper-leg/phi-y</property>
      <property>Creare/right-upper-leg/phi-z</property>
    </rotation_gamma_local>
  </function>

  <function name="aero/left-upper-leg/alpha-deg">
    <description>left-upper-leg_local_angle_of_attack</description>
    <rotation_alpha_local>
      <property>aero/pelvis/alpha-deg</property>
      <property>aero/pelvis/beta-deg</property>
      <property>aero/pelvis/gamma-deg</property>
      <property>Creare/left-upper-leg/phi-x</property>
      <property>Creare/left-upper-leg/phi-y</property>
      <property>Creare/left-upper-leg/phi-z</property>
    </rotation_alpha_local>
  </function>

  <function name="aero/left-upper-leg/beta-deg">
    <description>left-upper-leg_local_angle_of_sideslip</description>
    <rotation_beta_local>
      <property>aero/pelvis/alpha-deg</property>
      <property>aero/pelvis/beta-deg</property>
      <property>aero/pelvis/gamma-deg</property>
      <property>Creare/left-upper-leg/phi-x</property>
      <property>Creare/left-upper-leg/phi-y</property>
      <property>Creare/left-upper-leg/phi-z</property>
    </rotation_beta_local>
  </function>

  <function name="aero/left-upper-leg/gamma-deg">
    <description>left-upper-leg_local_angle_of_roll</description>
    <rotation_gamma_local>
      <property>aero/pelvis/alpha-deg</property>
      <property>aero/pelvis/beta-deg</property>
      <property>aero/pelvis/gamma-deg</property>
      <property>Creare/left-upper-leg/phi-x</property>
      <property>Creare/left-upper-leg/phi-y</property>
      <property>Creare/left-upper-leg/phi-z</property>
    </rotation_gamma_local>
  </function>

  <function name="aero/right-lower-leg/alpha-deg">
    <description>right-lower-leg_local_angle_of_attack</description>
    <rotation_alpha_local>
      <property>aero/right-upper-leg/alpha-deg</property>
      <property>aero/right-upper-leg/beta-deg</property>
      <property>aero/right-upper-leg/gamma-deg</property>
      <property>Creare/right-lower-leg/phi-x</property>
      <property>Creare/right-lower-leg/phi-y</property>
      <property>Creare/right-lower-leg/phi-z</property>
    </rotation_alpha_local>
  </function>

  <function name="aero/right-lower-leg/beta-deg">
    <description>right-lower-leg_local_angle_of_sideslip</description>
    <rotation_beta_local>
      <property>aero/right-upper-leg/alpha-deg</property>
      <property>aero/right-upper-leg/beta-deg</property>
      <property>aero/right-upper-leg/gamma-deg</property>
      <property>Creare/right-lower-leg/phi-x</property>
      <property>Creare/right-lower-leg/phi-y</property>
      <property>Creare/right-lower-leg/phi-z</property>
    </rotation_beta_local>
  </function>

  <function name="aero/right-lower-leg/gamma-deg">
    <description>right-lower-leg_local_angle_of_roll</description>
    <rotation_gamma_local>
      <property>aero/right-upper-leg/alpha-deg</property>
      <property>aero/right-upper-leg/beta-deg</property>
      <property>aero/right-upper-leg/gamma-deg</property>
      <property>Creare/right-lower-leg/phi-x</property>
      <property>Creare/right-lower-leg/phi-y</property>
      <property>Creare/right-lower-leg/phi-z</property>
    </rotation_gamma_local>
  </function>

  <function name="aero/left-lower-leg/alpha-deg">
    <description>left-lower-leg_local_angle_of_attack</description>
    <rotation_alpha_local>
      <property>aero/left-upper-leg/alpha-deg</property>
      <property>aero/left-upper-leg/beta-deg</property>
      <property>aero/left-upper-leg/gamma-deg</property>
      <property>Creare/left-lower-leg/phi-x</property>
      <property>Creare/left-lower-leg/phi-y</property>
      <property>Creare/left-lower-leg/phi-z</property>
    </rotation_alpha_local>
  </function>

  <function name="aero/left-lower-leg/beta-deg">
    <description>left-lower-leg_local_angle_of_sideslip</description>
    <rotation_beta_local>
      <property>aero/left-upper-leg/alpha-deg</property>
      <property>aero/left-upper-leg/beta-deg</property>
      <property>aero/left-upper-leg/gamma-deg</property>
      <property>Creare/left-lower-leg/phi-x</property>
      <property>Creare/left-lower-leg/phi-y</property>
      <property>Creare/left-lower-leg/phi-z</property>
    </rotation_beta_local>
  </function>

  <function name="aero/left-lower-leg/gamma-deg">
    <description>left-lower-leg_local_angle_of_roll</description>
    <rotation_gamma_local>
      <property>aero/left-upper-leg/alpha-deg</property>
      <property>aero/left-upper-leg/beta-deg</property>
      <property>aero/left-upper-leg/gamma-deg</property>
      <property>Creare/left-lower-leg/phi-x</property>
      <property>Creare/left-lower-leg/phi-y</property>
      <property>Creare/left-lower-leg/phi-z</property>
    </rotation_gamma_local>
  </function>

  <function name="aero/right-upper-arm/alpha-deg">
    <description>right-upper-arm_local_angle_of_attack</description>
    <rotation_alpha_local>
      <property>aero/torso/alpha-deg</property>
      <property>aero/torso/beta-deg</property>
      <property>aero/torso/gamma-deg</property>
      <property>Creare/right-upper-arm/phi-x</property>
      <property>Creare/right-upper-arm/phi-y</property>
      <property>Creare/right-upper-arm/phi-z</property>
    </rotation_alpha_local>
  </function>

  <function name="aero/right-upper-arm/beta-deg">
    <description>right-upper-arm_local_angle_of_sideslip</description>
    <rotation_beta_local>
      <property>aero/torso/alpha-deg</property>
      <property>aero/torso/beta-deg</property>
      <property>aero/torso/gamma-deg</property>
      <property>Creare/right-upper-arm/phi-x</property>
      <property>Creare/right-upper-arm/phi-y</property>
      <property>Creare/right-upper-arm/phi-z</property>
    </rotation_beta_local>
  </function>

  <function name="aero/right-upper-arm/gamma-deg">
    <description>right-upper-arm_local_angle_of_roll</description>
    <rotation_gamma_local>
      <property>aero/torso/alpha-deg</property>
      <property>aero/torso/beta-deg</property>
      <property>aero/torso/gamma-deg</property>
      <property>Creare/right-upper-arm/phi-x</property>
      <property>Creare/right-upper-arm/phi-y</property>
      <property>Creare/right-upper-arm/phi-z</property>
    </rotation_gamma_local>
  </function>

  <function name="aero/left-upper-arm/alpha-deg">
    <description>left-upper-arm_local_angle_of_attack</description>
    <rotation_alpha_local>
      <property>aero/torso/alpha-deg</property>
      <property>aero/torso/beta-deg</property>
      <property>aero/torso/gamma-deg</property>
      <property>Creare/left-upper-arm/phi-x</property>
      <property>Creare/left-upper-arm/phi-y</property>
      <property>Creare/left-upper-arm/phi-z</property>
    </rotation_alpha_local>
  </function>

  <function name="aero/left-upper-arm/beta-deg">
    <description>left-upper-arm_local_angle_of_sideslip</description>
    <rotation_beta_local>
      <property>aero/torso/alpha-deg</property>
      <property>aero/torso/beta-deg</property>
      <property>aero/torso/gamma-deg</property>
      <property>Creare/left-upper-arm/phi-x</property>
      <property>Creare/left-upper-arm/phi-y</property>
      <property>Creare/left-upper-arm/phi-z</property>
    </rotation_beta_local>
  </function>

  <function name="aero/left-upper-arm/gamma-deg">
    <description>left-upper-arm_local_angle_of_roll</description>
    <rotation_gamma_local>
      <property>aero/torso/alpha-deg</property>
      <property>aero/torso/beta-deg</property>
      <property>aero/torso/gamma-deg</property>
      <property>Creare/left-upper-arm/phi-x</property>
      <property>Creare/left-upper-arm/phi-y</property>
      <property>Creare/left-upper-arm/phi-z</property>
    </rotation_gamma_local>
  </function>

  <function name="aero/right-forearm/alpha-deg">
    <description>right-forearm_local_angle_of_attack</description>
    <rotation_alpha_local>
      <property>aero/right-upper-arm/alpha-deg</property>
      <property>aero/right-upper-arm/beta-deg</property>
      <property>aero/right-upper-arm/gamma-deg</property>
      <property>Creare/right-forearm/phi-x</property>
      <property>Creare/right-forearm/phi-y</property>
      <property>Creare/right-forearm/phi-z</property>
    </rotation_alpha_local>
  </function>

  <function name="aero/right-forearm/beta-deg">
    <description>right-forearm_local_angle_of_sideslip</description>
    <rotation_beta_local>
      <property>aero/right-upper-arm/alpha-deg</property>
      <property>aero/right-upper-arm/beta-deg</property>
      <property>aero/right-upper-arm/gamma-deg</property>
      <property>Creare/right-forearm/phi-x</property>
      <property>Creare/right-forearm/phi-y</property>
      <property>Creare/right-forearm/phi-z</property>
    </rotation_beta_local>
  </function>

  <function name="aero/right-forearm/gamma-deg">
    <description>right-forearm_local_angle_of_roll</description>
    <rotation_gamma_local>
      <property>aero/right-upper-arm/alpha-deg</property>
      <property>aero/right-upper-arm/beta-deg</property>
      <property>aero/right-upper-arm/gamma-deg</property>
      <property>Creare/right-forearm/phi-x</property>
      <property>Creare/right-forearm/phi-y</property>
      <property>Creare/right-forearm/phi-z</property>
    </rotation_gamma_local>
  </function>

  <function name="aero/left-forearm/alpha-deg">
    <description>left-forearm_local_angle_of_attack</description>
    <rotation_alpha_local>
      <property>aero/left-upper-arm/alpha-deg</property>
      <property>aero/left-upper-arm/beta-deg</property>
      <property>aero/left-upper-arm/gamma-deg</property>
      <property>Creare/left-forearm/phi-x</property>
      <property>Creare/left-forearm/phi-y</property>
      <property>Creare/left-forearm/phi-z</property>
    </rotation_alpha_local>
  </function>

  <function name="aero/left-forearm/beta-deg">
    <description>left-forearm_local_angle_of_sideslip</description>
    <rotation_beta_local>
      <property>aero/left-upper-arm/alpha-deg</property>
      <property>aero/left-upper-arm/beta-deg</property>
      <property>aero/left-upper-arm/gamma-deg</property>
      <property>Creare/left-forearm/phi-x</property>
      <property>Creare/left-forearm/phi-y</property>
      <property>Creare/left-forearm/phi-z</property>
    </rotation_beta_local>
  </function>

  <function name="aero/left-forearm/gamma-deg">
    <description>left-forearm_local_angle_of_roll</description>
    <rotation_gamma_local>
      <property>aero/left-upper-arm/alpha-deg</property>
      <property>aero/left-upper-arm/beta-deg</property>
      <property>aero/left-upper-arm/gamma-deg</property>
      <property>Creare/left-forearm/phi-x</property>
      <property>Creare/left-forearm/phi-y</property>
      <property>Creare/left-forearm/phi-z</property>
    </rotation_gamma_local>
  </function>

    <function name="aero/head/Fx">
      <description>localwind_x-axis_force_due_to_head</description>
      <product>
        <property>aero/qbar-psf</property>
        <property>Creare/head/area</property>
        <property>Creare/head/length</property>
        <table>
          <independentVar lookup="row">aero/head/alpha-deg</independentVar>
          <independentVar lookup="column">aero/head/beta-deg</independentVar>
          <tableData>
                       -90.000     -75.000     -60.000     -45.000     -30.000     -15.000       0.000      15.000      30.000      45.000      60.000      75.000      90.000
          -180.000      -0.469      -0.484      -0.477      -0.482      -0.487      -0.494      -0.539      -0.505      -0.506      -0.488      -0.482      -0.469      -0.469
          -165.000      -0.462      -0.487      -0.478      -0.457      -0.457      -0.485      -0.480      -0.479      -0.459      -0.454      -0.452      -0.469      -0.462
          -150.000      -0.445      -0.468      -0.421      -0.392      -0.371      -0.395      -0.449      -0.384      -0.371      -0.375      -0.423      -0.459      -0.445
          -135.000      -0.432      -0.434      -0.392      -0.320      -0.304      -0.316      -0.314      -0.290      -0.275      -0.310      -0.376      -0.444      -0.432
          -120.000      -0.430      -0.420      -0.366      -0.264      -0.208      -0.192      -0.240      -0.219      -0.229      -0.263      -0.326      -0.423      -0.430
          -105.000      -0.401      -0.362      -0.338      -0.245      -0.161      -0.141      -0.170      -0.134      -0.166      -0.222      -0.293      -0.369      -0.401
           -90.000      -0.332      -0.308      -0.291      -0.243      -0.179      -0.105      -0.114      -0.133      -0.182      -0.242      -0.284      -0.323      -0.332
           -75.000      -0.392      -0.402      -0.410      -0.485      -0.473      -0.446      -0.447      -0.443      -0.465      -0.489      -0.414      -0.401      -0.392
           -60.000      -0.429      -0.442      -0.486      -0.458      -0.575      -0.512      -0.531      -0.547      -0.553      -0.531      -0.452      -0.468      -0.429
           -45.000      -0.450      -0.464      -0.489      -0.481      -0.490      -0.650      -0.649      -0.665      -0.614      -0.490      -0.498      -0.458      -0.450
           -30.000      -0.435      -0.488      -0.489      -0.495      -0.600      -0.525      -0.513      -0.505      -0.497      -0.491      -0.492      -0.467      -0.435
           -15.000      -0.439      -0.478      -0.493      -0.480      -0.509      -0.508      -0.522      -0.513      -0.506      -0.493      -0.498      -0.493      -0.439
             0.000      -0.469      -0.484      -0.477      -0.482      -0.487      -0.494      -0.539      -0.505      -0.506      -0.488      -0.482      -0.469      -0.469
            15.000      -0.462      -0.487      -0.478      -0.457      -0.457      -0.485      -0.480      -0.479      -0.459      -0.454      -0.452      -0.469      -0.462
            30.000      -0.445      -0.468      -0.421      -0.392      -0.371      -0.395      -0.449      -0.384      -0.371      -0.375      -0.423      -0.459      -0.445
            45.000      -0.432      -0.434      -0.392      -0.320      -0.304      -0.316      -0.314      -0.290      -0.275      -0.310      -0.376      -0.444      -0.432
            60.000      -0.430      -0.420      -0.366      -0.264      -0.208      -0.192      -0.240      -0.219      -0.229      -0.263      -0.326      -0.423      -0.430
            75.000      -0.401      -0.362      -0.338      -0.245      -0.161      -0.141      -0.170      -0.134      -0.166      -0.222      -0.293      -0.369      -0.401
            90.000      -0.332      -0.308      -0.291      -0.243      -0.179      -0.105      -0.114      -0.133      -0.182      -0.242      -0.284      -0.323      -0.332
           105.000      -0.392      -0.402      -0.410      -0.485      -0.473      -0.446      -0.447      -0.443      -0.465      -0.489      -0.414      -0.401      -0.392
           120.000      -0.429      -0.442      -0.486      -0.458      -0.575      -0.512      -0.531      -0.547      -0.553      -0.531      -0.452      -0.468      -0.429
           135.000      -0.450      -0.464      -0.489      -0.481      -0.490      -0.650      -0.649      -0.665      -0.614      -0.490      -0.498      -0.458      -0.450
           150.000      -0.435      -0.488      -0.489      -0.495      -0.600      -0.525      -0.513      -0.505      -0.497      -0.491      -0.492      -0.467      -0.435
           165.000      -0.439      -0.478      -0.493      -0.480      -0.509      -0.508      -0.522      -0.513      -0.506      -0.493      -0.498      -0.493      -0.439
           180.000      -0.469      -0.484      -0.477      -0.482      -0.487      -0.494      -0.539      -0.505      -0.506      -0.488      -0.482      -0.469      -0.469
          </tableData>
        </table>
      </product>
    </function>
    <function name="aero/head/Fy">
      <description>localwind_y-axis_force_due_to_head</description>
      <product>
        <property>aero/qbar-psf</property>
        <property>Creare/head/area</property>
        <property>Creare/head/length</property>
        <table>
          <independentVar lookup="row">aero/head/alpha-deg</independentVar>
          <independentVar lookup="column">aero/head/beta-deg</independentVar>
          <tableData>
                       -90.000     -75.000     -60.000     -45.000     -30.000     -15.000       0.000      15.000      30.000      45.000      60.000      75.000      90.000
          -180.000      -0.031      -0.024       0.028      -0.040       0.012       0.051       0.064      -0.015       0.043      -0.042       0.037       0.053       0.031
          -165.000      -0.044      -0.062      -0.019       0.095       0.001       0.086       0.006       0.065       0.063      -0.003      -0.028       0.081       0.044
          -150.000      -0.061      -0.053      -0.032       0.058       0.017      -0.015      -0.042       0.014       0.007       0.028       0.020       0.056       0.061
          -135.000      -0.115      -0.087      -0.061       0.043       0.061      -0.065       0.027       0.017      -0.036      -0.038       0.043       0.118       0.115
          -120.000      -0.086      -0.056       0.011       0.027       0.045       0.045      -0.005       0.047      -0.066      -0.040       0.002       0.054       0.086
          -105.000      -0.164      -0.194      -0.071       0.021       0.019       0.022      -0.003       0.035      -0.028       0.054       0.056       0.108       0.164
           -90.000      -0.185      -0.175      -0.145      -0.050      -0.037      -0.056       0.010       0.078       0.038       0.047       0.151       0.168       0.185
           -75.000       0.152       0.157       0.166       0.187       0.086       0.042      -0.085      -0.083      -0.147      -0.194      -0.164      -0.187      -0.152
           -60.000       0.083       0.060       0.093       0.076       0.118      -0.035      -0.136      -0.138      -0.143      -0.163      -0.076      -0.082      -0.083
           -45.000       0.020       0.024       0.043       0.078       0.102       0.271      -0.199      -0.216      -0.097       0.001       0.001      -0.055      -0.020
           -30.000       0.043       0.029       0.088       0.107       0.119       0.052      -0.023      -0.053      -0.050      -0.035      -0.027      -0.025      -0.043
           -15.000      -0.049       0.014      -0.017       0.031       0.022      -0.040      -0.007       0.004      -0.053      -0.025      -0.005       0.007       0.049
             0.000      -0.031      -0.024       0.028      -0.040       0.012       0.051       0.064      -0.015       0.043      -0.042       0.037       0.053       0.031
            15.000      -0.044      -0.062      -0.019       0.095       0.001       0.086       0.006       0.065       0.063      -0.003      -0.028       0.081       0.044
            30.000      -0.061      -0.053      -0.032       0.058       0.017      -0.015      -0.042       0.014       0.007       0.028       0.020       0.056       0.061
            45.000      -0.115      -0.087      -0.061       0.043       0.061      -0.065       0.027       0.017      -0.036      -0.038       0.043       0.118       0.115
            60.000      -0.086      -0.056       0.011       0.027       0.045       0.045      -0.005       0.047      -0.066      -0.040       0.002       0.054       0.086
            75.000      -0.164      -0.194      -0.071       0.021       0.019       0.022      -0.003       0.035      -0.028       0.054       0.056       0.108       0.164
            90.000      -0.185      -0.175      -0.145      -0.050      -0.037      -0.056       0.010       0.078       0.038       0.047       0.151       0.168       0.185
           105.000       0.152       0.157       0.166       0.187       0.086       0.042      -0.085      -0.083      -0.147      -0.194      -0.164      -0.187      -0.152
           120.000       0.083       0.060       0.093       0.076       0.118      -0.035      -0.136      -0.138      -0.143      -0.163      -0.076      -0.082      -0.083
           135.000       0.020       0.024       0.043       0.078       0.102       0.271      -0.199      -0.216      -0.097       0.001       0.001      -0.055      -0.020
           150.000       0.043       0.029       0.088       0.107       0.119       0.052      -0.023      -0.053      -0.050      -0.035      -0.027      -0.025      -0.043
           165.000      -0.049       0.014      -0.017       0.031       0.022      -0.040      -0.007       0.004      -0.053      -0.025      -0.005       0.007       0.049
           180.000      -0.031      -0.024       0.028      -0.040       0.012       0.051       0.064      -0.015       0.043      -0.042       0.037       0.053       0.031
          </tableData>
        </table>
      </product>
    </function>
    <function name="aero/head/Fz">
      <description>localwind_z-axis_force_due_to_head</description>
      <product>
        <property>aero/qbar-psf</property>
        <property>Creare/head/area</property>
        <property>Creare/head/length</property>
        <table>
          <independentVar lookup="row">aero/head/alpha-deg</independentVar>
          <independentVar lookup="column">aero/head/beta-deg</independentVar>
          <tableData>
                       -90.000     -75.000     -60.000     -45.000     -30.000     -15.000       0.000      15.000      30.000      45.000      60.000      75.000      90.000
          -180.000      -0.182      -0.178      -0.193      -0.207      -0.201      -0.197      -0.184      -0.197      -0.208      -0.237      -0.184      -0.192      -0.182
          -165.000      -0.170      -0.159      -0.142      -0.105      -0.098      -0.061      -0.065      -0.087      -0.123      -0.137      -0.153      -0.148      -0.170
          -150.000      -0.195      -0.191      -0.134      -0.141      -0.079       0.006      -0.001      -0.028      -0.081      -0.119      -0.142      -0.172      -0.195
          -135.000      -0.201      -0.171      -0.143      -0.135      -0.064       0.010       0.023      -0.005      -0.097      -0.131      -0.145      -0.151      -0.201
          -120.000      -0.277      -0.228      -0.167      -0.122      -0.139      -0.094      -0.033      -0.040      -0.114      -0.134      -0.155      -0.230      -0.277
          -105.000      -0.333      -0.255      -0.174      -0.167      -0.147      -0.134      -0.184      -0.102      -0.161      -0.116      -0.186      -0.266      -0.333
           -90.000      -0.348      -0.281      -0.180      -0.191      -0.209      -0.211      -0.241      -0.151      -0.232      -0.201      -0.205      -0.281      -0.348
           -75.000      -0.361      -0.442      -0.544      -0.821      -0.804      -0.785      -0.720      -0.781      -0.778      -0.802      -0.540      -0.431      -0.361
           -60.000      -0.346      -0.419      -0.493      -0.548      -0.721      -0.674      -0.667      -0.680      -0.712      -0.632      -0.509      -0.419      -0.346
           -45.000      -0.279      -0.321      -0.379      -0.417      -0.460      -0.608      -0.670      -0.653      -0.596      -0.486      -0.462      -0.313      -0.279
           -30.000      -0.190      -0.238      -0.283      -0.312      -0.503      -0.422      -0.441      -0.395      -0.341      -0.313      -0.285      -0.248      -0.190
           -15.000      -0.205      -0.210      -0.245      -0.242      -0.267      -0.268      -0.296      -0.297      -0.268      -0.262      -0.257      -0.216      -0.205
             0.000      -0.182      -0.178      -0.193      -0.207      -0.201      -0.197      -0.184      -0.197      -0.208      -0.237      -0.184      -0.192      -0.182
            15.000      -0.170      -0.159      -0.142      -0.105      -0.098      -0.061      -0.065      -0.087      -0.123      -0.137      -0.153      -0.148      -0.170
            30.000      -0.195      -0.191      -0.134      -0.141      -0.079       0.006      -0.001      -0.028      -0.081      -0.119      -0.142      -0.172      -0.195
            45.000      -0.201      -0.171      -0.143      -0.135      -0.064       0.010       0.023      -0.005      -0.097      -0.131      -0.145      -0.151      -0.201
            60.000      -0.277      -0.228      -0.167      -0.122      -0.139      -0.094      -0.033      -0.040      -0.114      -0.134      -0.155      -0.230      -0.277
            75.000      -0.333      -0.255      -0.174      -0.167      -0.147      -0.134      -0.184      -0.102      -0.161      -0.116      -0.186      -0.266      -0.333
            90.000      -0.348      -0.281      -0.180      -0.191      -0.209      -0.211      -0.241      -0.151      -0.232      -0.201      -0.205      -0.281      -0.348
           105.000      -0.361      -0.442      -0.544      -0.821      -0.804      -0.785      -0.720      -0.781      -0.778      -0.802      -0.540      -0.431      -0.361
           120.000      -0.346      -0.419      -0.493      -0.548      -0.721      -0.674      -0.667      -0.680      -0.712      -0.632      -0.509      -0.419      -0.346
           135.000      -0.279      -0.321      -0.379      -0.417      -0.460      -0.608      -0.670      -0.653      -0.596      -0.486      -0.462      -0.313      -0.279
           150.000      -0.190      -0.238      -0.283      -0.312      -0.503      -0.422      -0.441      -0.395      -0.341      -0.313      -0.285      -0.248      -0.190
           165.000      -0.205      -0.210      -0.245      -0.242      -0.267      -0.268      -0.296      -0.297      -0.268      -0.262      -0.257      -0.216      -0.205
           180.000      -0.182      -0.178      -0.193      -0.207      -0.201      -0.197      -0.184      -0.197      -0.208      -0.237      -0.184      -0.192      -0.182
          </tableData>
        </table>
      </product>
    </function>
    <function name="aero/head/Mx-lwf">
      <description>localwind_x-axis_moment_due_to_head</description>
      <product>
        <property>aero/qbar-psf</property>
        <property>Creare/head/area</property>
        <property>Creare/head/length</property>
        <table>
          <independentVar lookup="row">aero/head/alpha-deg</independentVar>
          <independentVar lookup="column">aero/head/beta-deg</independentVar>
          <tableData>
                       -90.000     -75.000     -60.000     -45.000     -30.000     -15.000       0.000      15.000      30.000      45.000      60.000      75.000      90.000
          -180.000       0.002      -0.003      -0.006       0.008       0.005      -0.008      -0.013      -0.000      -0.010       0.001      -0.001       0.000       0.002
          -165.000       0.009       0.003      -0.012      -0.016      -0.004      -0.010       0.003      -0.008      -0.003       0.002       0.011      -0.002       0.009
          -150.000       0.010      -0.011      -0.010      -0.014      -0.008      -0.003       0.002       0.005       0.008       0.007       0.008       0.008       0.010
          -135.000       0.008      -0.008      -0.005      -0.016      -0.005       0.007       0.004       0.003       0.012       0.013       0.005       0.005       0.008
          -120.000       0.020      -0.021      -0.023      -0.016      -0.002      -0.001       0.005      -0.005       0.010       0.013       0.021       0.021       0.020
          -105.000       0.011      -0.019      -0.016      -0.018      -0.009      -0.003       0.000       0.001       0.009       0.012       0.015       0.017       0.011
           -90.000       0.008      -0.009      -0.007      -0.014      -0.007      -0.000      -0.002       0.000       0.007       0.016       0.006       0.007       0.008
           -75.000      -0.015       0.012       0.014       0.014       0.006      -0.000       0.003       0.002      -0.009      -0.010      -0.013      -0.010      -0.015
           -60.000      -0.019       0.023       0.015       0.011       0.009       0.010       0.011       0.003      -0.001      -0.004      -0.016      -0.017      -0.019
           -45.000      -0.019       0.024       0.014       0.011       0.005      -0.009       0.020       0.010      -0.006      -0.017      -0.022      -0.017      -0.019
           -30.000      -0.005       0.014       0.002      -0.001      -0.006       0.000       0.007      -0.002      -0.003      -0.016      -0.011      -0.010      -0.005
           -15.000      -0.011      -0.005       0.009       0.004       0.003       0.007      -0.002      -0.007       0.002      -0.006      -0.015      -0.006      -0.011
             0.000       0.002      -0.003      -0.006       0.008       0.005      -0.008      -0.013      -0.000      -0.010       0.001      -0.001       0.000       0.002
            15.000       0.009       0.003      -0.012      -0.016      -0.004      -0.010       0.003      -0.008      -0.003       0.002       0.011      -0.002       0.009
            30.000       0.010      -0.011      -0.010      -0.014      -0.008      -0.003       0.002       0.005       0.008       0.007       0.008       0.008       0.010
            45.000       0.008      -0.008      -0.005      -0.016      -0.005       0.007       0.004       0.003       0.012       0.013       0.005       0.005       0.008
            60.000       0.020      -0.021      -0.023      -0.016      -0.002      -0.001       0.005      -0.005       0.010       0.013       0.021       0.021       0.020
            75.000       0.011      -0.019      -0.016      -0.018      -0.009      -0.003       0.000       0.001       0.009       0.012       0.015       0.017       0.011
            90.000       0.008      -0.009      -0.007      -0.014      -0.007      -0.000      -0.002       0.000       0.007       0.016       0.006       0.007       0.008
           105.000      -0.015       0.012       0.014       0.014       0.006      -0.000       0.003       0.002      -0.009      -0.010      -0.013      -0.010      -0.015
           120.000      -0.019       0.023       0.015       0.011       0.009       0.010       0.011       0.003      -0.001      -0.004      -0.016      -0.017      -0.019
           135.000      -0.019       0.024       0.014       0.011       0.005      -0.009       0.020       0.010      -0.006      -0.017      -0.022      -0.017      -0.019
           150.000      -0.005       0.014       0.002      -0.001      -0.006       0.000       0.007      -0.002      -0.003      -0.016      -0.011      -0.010      -0.005
           165.000      -0.011      -0.005       0.009       0.004       0.003       0.007      -0.002      -0.007       0.002      -0.006      -0.015      -0.006      -0.011
           180.000       0.002      -0.003      -0.006       0.008       0.005      -0.008      -0.013      -0.000      -0.010       0.001      -0.001       0.000       0.002
          </tableData>
        </table>
      </product>
    </function>
    <function name="aero/head/My-lwf">
      <description>localwind_y-axis_moment_due_to_head</description>
      <product>
        <property>aero/qbar-psf</property>
        <property>Creare/head/area</property>
        <property>Creare/head/length</property>
        <table>
          <independentVar lookup="row">aero/head/alpha-deg</independentVar>
          <independentVar lookup="column">aero/head/beta-deg</independentVar>
          <tableData>
                       -90.000     -75.000     -60.000     -45.000     -30.000     -15.000       0.000      15.000      30.000      45.000      60.000      75.000      90.000
          -180.000      -0.019      -0.019      -0.021      -0.022      -0.023      -0.021      -0.025      -0.022      -0.025      -0.023      -0.020      -0.019      -0.019
          -165.000      -0.019      -0.025      -0.027      -0.032      -0.035      -0.035      -0.033      -0.036      -0.034      -0.031      -0.022      -0.020      -0.019
          -150.000      -0.017      -0.024      -0.028      -0.032      -0.036      -0.041      -0.042      -0.040      -0.033      -0.032      -0.027      -0.022      -0.017
          -135.000      -0.019      -0.021      -0.026      -0.027      -0.032      -0.037      -0.041      -0.036      -0.028      -0.025      -0.024      -0.027      -0.019
          -120.000      -0.020      -0.024      -0.022      -0.017      -0.020      -0.025      -0.031      -0.027      -0.020      -0.021      -0.017      -0.023      -0.020
          -105.000      -0.018      -0.012      -0.016      -0.005      -0.002      -0.010      -0.017      -0.009      -0.005      -0.002      -0.006      -0.017      -0.018
           -90.000      -0.018      -0.013      -0.005       0.008       0.009       0.010       0.009       0.010       0.014       0.009      -0.000      -0.012      -0.018
           -75.000      -0.021      -0.017      -0.014      -0.012      -0.016      -0.009      -0.003      -0.009      -0.012      -0.011      -0.013      -0.017      -0.021
           -60.000      -0.015      -0.016      -0.016      -0.008      -0.007       0.001       0.003       0.005      -0.004      -0.006      -0.010      -0.017      -0.015
           -45.000      -0.021      -0.012      -0.014      -0.005      -0.003       0.003       0.004       0.003       0.000      -0.005      -0.013      -0.010      -0.021
           -30.000      -0.015      -0.020      -0.009      -0.008       0.004       0.003       0.006       0.002      -0.001      -0.007      -0.013      -0.012      -0.015
           -15.000      -0.017      -0.014      -0.013      -0.007      -0.009      -0.009      -0.009      -0.008      -0.009      -0.014      -0.020      -0.023      -0.017
             0.000      -0.019      -0.019      -0.021      -0.022      -0.023      -0.021      -0.025      -0.022      -0.025      -0.023      -0.020      -0.019      -0.019
            15.000      -0.019      -0.025      -0.027      -0.032      -0.035      -0.035      -0.033      -0.036      -0.034      -0.031      -0.022      -0.020      -0.019
            30.000      -0.017      -0.024      -0.028      -0.032      -0.036      -0.041      -0.042      -0.040      -0.033      -0.032      -0.027      -0.022      -0.017
            45.000      -0.019      -0.021      -0.026      -0.027      -0.032      -0.037      -0.041      -0.036      -0.028      -0.025      -0.024      -0.027      -0.019
            60.000      -0.020      -0.024      -0.022      -0.017      -0.020      -0.025      -0.031      -0.027      -0.020      -0.021      -0.017      -0.023      -0.020
            75.000      -0.018      -0.012      -0.016      -0.005      -0.002      -0.010      -0.017      -0.009      -0.005      -0.002      -0.006      -0.017      -0.018
            90.000      -0.018      -0.013      -0.005       0.008       0.009       0.010       0.009       0.010       0.014       0.009      -0.000      -0.012      -0.018
           105.000      -0.021      -0.017      -0.014      -0.012      -0.016      -0.009      -0.003      -0.009      -0.012      -0.011      -0.013      -0.017      -0.021
           120.000      -0.015      -0.016      -0.016      -0.008      -0.007       0.001       0.003       0.005      -0.004      -0.006      -0.010      -0.017      -0.015
           135.000      -0.021      -0.012      -0.014      -0.005      -0.003       0.003       0.004       0.003       0.000      -0.005      -0.013      -0.010      -0.021
           150.000      -0.015      -0.020      -0.009      -0.008       0.004       0.003       0.006       0.002      -0.001      -0.007      -0.013      -0.012      -0.015
           165.000      -0.017      -0.014      -0.013      -0.007      -0.009      -0.009      -0.009      -0.008      -0.009      -0.014      -0.020      -0.023      -0.017
           180.000      -0.019      -0.019      -0.021      -0.022      -0.023      -0.021      -0.025      -0.022      -0.025      -0.023      -0.020      -0.019      -0.019
          </tableData>
        </table>
      </product>
    </function>
    <function name="aero/head/Mz-lwf">
      <description>localwind_z-axis_moment_due_to_head</description>
      <product>
        <property>aero/qbar-psf</property>
        <property>Creare/head/area</property>
        <property>Creare/head/length</property>
        <table>
          <independentVar lookup="row">aero/head/alpha-deg</independentVar>
          <independentVar lookup="column">aero/head/beta-deg</independentVar>
          <tableData>
                       -90.000     -75.000     -60.000     -45.000     -30.000     -15.000       0.000      15.000      30.000      45.000      60.000      75.000      90.000
          -180.000      -0.000      -0.000      -0.001       0.001       0.002       0.003       0.000      -0.001      -0.000      -0.001       0.001       0.001      -0.000
          -165.000      -0.004       0.003       0.006       0.011       0.007       0.007      -0.001      -0.001      -0.005      -0.006      -0.006      -0.002      -0.004
          -150.000      -0.008       0.012       0.014       0.020       0.015       0.009      -0.002      -0.009      -0.014      -0.015      -0.014      -0.010      -0.008
          -135.000      -0.011       0.019       0.022       0.030       0.023       0.006      -0.002      -0.012      -0.025      -0.025      -0.019      -0.017      -0.011
          -120.000      -0.014       0.032       0.040       0.036       0.025       0.014      -0.005      -0.007      -0.033      -0.037      -0.033      -0.028      -0.014
          -105.000      -0.006       0.023       0.038       0.045       0.033       0.021      -0.001      -0.013      -0.031      -0.034      -0.031      -0.023      -0.006
           -90.000      -0.006       0.017       0.021       0.030       0.026       0.009       0.003      -0.012      -0.026      -0.030      -0.023      -0.016      -0.006
           -75.000       0.010       0.007       0.023       0.034       0.028       0.019       0.010      -0.016      -0.029      -0.030      -0.020      -0.006       0.010
           -60.000       0.015       0.001       0.013       0.024       0.029       0.026       0.011      -0.014      -0.024      -0.021      -0.012       0.003       0.015
           -45.000       0.014       0.000       0.005       0.013       0.015      -0.001       0.010      -0.002      -0.011      -0.014      -0.008      -0.000       0.014
           -30.000       0.008      -0.006       0.001       0.003       0.004       0.003       0.001      -0.004      -0.003      -0.006       0.001       0.004       0.008
           -15.000       0.004      -0.005      -0.000       0.002       0.003       0.003       0.001      -0.003      -0.002      -0.000       0.003       0.006       0.004
             0.000      -0.000      -0.000      -0.001       0.001       0.002       0.003       0.000      -0.001      -0.000      -0.001       0.001       0.001      -0.000
            15.000      -0.004       0.003       0.006       0.011       0.007       0.007      -0.001      -0.001      -0.005      -0.006      -0.006      -0.002      -0.004
            30.000      -0.008       0.012       0.014       0.020       0.015       0.009      -0.002      -0.009      -0.014      -0.015      -0.014      -0.010      -0.008
            45.000      -0.011       0.019       0.022       0.030       0.023       0.006      -0.002      -0.012      -0.025      -0.025      -0.019      -0.017      -0.011
            60.000      -0.014       0.032       0.040       0.036       0.025       0.014      -0.005      -0.007      -0.033      -0.037      -0.033      -0.028      -0.014
            75.000      -0.006       0.023       0.038       0.045       0.033       0.021      -0.001      -0.013      -0.031      -0.034      -0.031      -0.023      -0.006
            90.000      -0.006       0.017       0.021       0.030       0.026       0.009       0.003      -0.012      -0.026      -0.030      -0.023      -0.016      -0.006
           105.000       0.010       0.007       0.023       0.034       0.028       0.019       0.010      -0.016      -0.029      -0.030      -0.020      -0.006       0.010
           120.000       0.015       0.001       0.013       0.024       0.029       0.026       0.011      -0.014      -0.024      -0.021      -0.012       0.003       0.015
           135.000       0.014       0.000       0.005       0.013       0.015      -0.001       0.010      -0.002      -0.011      -0.014      -0.008      -0.000       0.014
           150.000       0.008      -0.006       0.001       0.003       0.004       0.003       0.001      -0.004      -0.003      -0.006       0.001       0.004       0.008
           165.000       0.004      -0.005      -0.000       0.002       0.003       0.003       0.001      -0.003      -0.002      -0.000       0.003       0.006       0.004
           180.000      -0.000      -0.000      -0.001       0.001       0.002       0.003       0.000      -0.001      -0.000      -0.001       0.001       0.001      -0.000
          </tableData>
        </table>
      </product>
    </function>
    <function name="aero/left-forearm/Fx">
      <description>localwind_x-axis_force_due_to_left-forearm</description>
      <product>
        <property>aero/qbar-psf</property>
        <property>Creare/left-forearm/area</property>
        <property>Creare/left-forearm/length</property>
        <table>
          <independentVar lookup="row">aero/left-forearm/alpha-deg</independentVar>
          <independentVar lookup="column">aero/left-forearm/beta-deg</independentVar>
          <tableData>
                       -90.000     -75.000     -60.000     -45.000     -30.000     -15.000       0.000      15.000      30.000      45.000      60.000      75.000      90.000
          -180.000      -0.371      -0.388      -0.422      -0.447      -0.483      -0.495      -0.512      -0.478      -0.504      -0.467      -0.427      -0.402      -0.371
          -165.000      -0.440      -0.426      -0.466      -0.493      -0.512      -0.529      -0.598      -0.542      -0.536      -0.535      -0.493      -0.441      -0.440
          -150.000      -0.401      -0.425      -0.427      -0.505      -0.596      -0.569      -0.565      -0.631      -0.599      -0.526      -0.484      -0.446      -0.401
          -135.000      -0.353      -0.418      -0.399      -0.494      -0.545      -0.495      -0.420      -0.449      -0.460      -0.475      -0.386      -0.380      -0.353
          -120.000      -0.337      -0.418      -0.420      -0.476      -0.383      -0.311      -0.234      -0.229      -0.295      -0.366      -0.392      -0.345      -0.337
          -105.000      -0.429      -0.283      -0.321      -0.250      -0.150      -0.084      -0.111      -0.143      -0.255      -0.440      -0.489      -0.435      -0.429
           -90.000      -0.429      -0.173      -0.215      -0.182      -0.087      -0.056      -0.051      -0.099      -0.207      -0.364      -0.475      -0.453      -0.429
           -75.000      -0.423      -0.272      -0.252      -0.253      -0.175      -0.123      -0.117      -0.127      -0.146      -0.209      -0.288      -0.355      -0.423
           -60.000      -0.385      -0.380      -0.319      -0.243      -0.205      -0.192      -0.191      -0.217      -0.254      -0.280      -0.314      -0.361      -0.385
           -45.000      -0.410      -0.392      -0.343      -0.318      -0.287      -0.288      -0.301      -0.314      -0.310      -0.328      -0.348      -0.382      -0.410
           -30.000      -0.403      -0.344      -0.346      -0.345      -0.373      -0.370      -0.368      -0.375      -0.368      -0.369      -0.383      -0.382      -0.403
           -15.000      -0.392      -0.371      -0.379      -0.440      -0.433      -0.462      -0.469      -0.458      -0.457      -0.430      -0.415      -0.391      -0.392
             0.000      -0.371      -0.388      -0.422      -0.447      -0.483      -0.495      -0.512      -0.478      -0.504      -0.467      -0.427      -0.402      -0.371
            15.000      -0.440      -0.426      -0.466      -0.493      -0.512      -0.529      -0.598      -0.542      -0.536      -0.535      -0.493      -0.441      -0.440
            30.000      -0.401      -0.425      -0.427      -0.505      -0.596      -0.569      -0.565      -0.631      -0.599      -0.526      -0.484      -0.446      -0.401
            45.000      -0.353      -0.418      -0.399      -0.494      -0.545      -0.495      -0.420      -0.449      -0.460      -0.475      -0.386      -0.380      -0.353
            60.000      -0.337      -0.418      -0.420      -0.476      -0.383      -0.311      -0.234      -0.229      -0.295      -0.366      -0.392      -0.345      -0.337
            75.000      -0.429      -0.283      -0.321      -0.250      -0.150      -0.084      -0.111      -0.143      -0.255      -0.440      -0.489      -0.435      -0.429
            90.000      -0.429      -0.173      -0.215      -0.182      -0.087      -0.056      -0.051      -0.099      -0.207      -0.364      -0.475      -0.453      -0.429
           105.000      -0.423      -0.272      -0.252      -0.253      -0.175      -0.123      -0.117      -0.127      -0.146      -0.209      -0.288      -0.355      -0.423
           120.000      -0.385      -0.380      -0.319      -0.243      -0.205      -0.192      -0.191      -0.217      -0.254      -0.280      -0.314      -0.361      -0.385
           135.000      -0.410      -0.392      -0.343      -0.318      -0.287      -0.288      -0.301      -0.314      -0.310      -0.328      -0.348      -0.382      -0.410
           150.000      -0.403      -0.344      -0.346      -0.345      -0.373      -0.370      -0.368      -0.375      -0.368      -0.369      -0.383      -0.382      -0.403
           165.000      -0.392      -0.371      -0.379      -0.440      -0.433      -0.462      -0.469      -0.458      -0.457      -0.430      -0.415      -0.391      -0.392
           180.000      -0.371      -0.388      -0.422      -0.447      -0.483      -0.495      -0.512      -0.478      -0.504      -0.467      -0.427      -0.402      -0.371
          </tableData>
        </table>
      </product>
    </function>
    <function name="aero/left-forearm/Fy">
      <description>localwind_y-axis_force_due_to_left-forearm</description>
      <product>
        <property>aero/qbar-psf</property>
        <property>Creare/left-forearm/area</property>
        <property>Creare/left-forearm/length</property>
        <table>
          <independentVar lookup="row">aero/left-forearm/alpha-deg</independentVar>
          <independentVar lookup="column">aero/left-forearm/beta-deg</independentVar>
          <tableData>
                       -90.000     -75.000     -60.000     -45.000     -30.000     -15.000       0.000      15.000      30.000      45.000      60.000      75.000      90.000
          -180.000      -0.080       0.035      -0.007       0.018      -0.001       0.007       0.054       0.089       0.094       0.158       0.165       0.119       0.080
          -165.000       0.137      -0.071      -0.110      -0.163      -0.130      -0.162      -0.112      -0.091      -0.046      -0.046      -0.050      -0.083      -0.137
          -150.000       0.101      -0.047      -0.092      -0.118      -0.115      -0.144      -0.100      -0.109      -0.097      -0.052      -0.098      -0.092      -0.101
          -135.000      -0.027       0.084       0.098       0.171       0.200       0.075       0.163       0.156       0.105       0.072       0.068       0.058       0.027
          -120.000      -0.001       0.148       0.200       0.303       0.142      -0.061       0.129       0.216       0.170      -0.065      -0.038       0.006       0.001
          -105.000       0.104       0.068       0.119       0.100      -0.034      -0.143      -0.053      -0.105      -0.221      -0.482      -0.352      -0.186      -0.104
           -90.000       0.110       0.118       0.169       0.183       0.055      -0.027      -0.129      -0.224      -0.343      -0.417      -0.363      -0.227      -0.110
           -75.000      -0.099      -0.009       0.037       0.040       0.052       0.076       0.053      -0.004      -0.024      -0.049      -0.037       0.031       0.099
           -60.000       0.038      -0.004       0.026       0.040       0.013      -0.026      -0.062      -0.074      -0.089      -0.145      -0.116      -0.080      -0.038
           -45.000       0.045      -0.017      -0.001       0.039       0.000      -0.032      -0.019      -0.078      -0.114      -0.133      -0.134      -0.073      -0.045
           -30.000      -0.056       0.045       0.036       0.042       0.015       0.030       0.052       0.037       0.041       0.037       0.064       0.063       0.056
           -15.000      -0.064       0.030       0.027      -0.036       0.020       0.031       0.045       0.089       0.118       0.117       0.127       0.089       0.064
             0.000      -0.080       0.035      -0.007       0.018      -0.001       0.007       0.054       0.089       0.094       0.158       0.165       0.119       0.080
            15.000       0.137      -0.071      -0.110      -0.163      -0.130      -0.162      -0.112      -0.091      -0.046      -0.046      -0.050      -0.083      -0.137
            30.000       0.101      -0.047      -0.092      -0.118      -0.115      -0.144      -0.100      -0.109      -0.097      -0.052      -0.098      -0.092      -0.101
            45.000      -0.027       0.084       0.098       0.171       0.200       0.075       0.163       0.156       0.105       0.072       0.068       0.058       0.027
            60.000      -0.001       0.148       0.200       0.303       0.142      -0.061       0.129       0.216       0.170      -0.065      -0.038       0.006       0.001
            75.000       0.104       0.068       0.119       0.100      -0.034      -0.143      -0.053      -0.105      -0.221      -0.482      -0.352      -0.186      -0.104
            90.000       0.110       0.118       0.169       0.183       0.055      -0.027      -0.129      -0.224      -0.343      -0.417      -0.363      -0.227      -0.110
           105.000      -0.099      -0.009       0.037       0.040       0.052       0.076       0.053      -0.004      -0.024      -0.049      -0.037       0.031       0.099
           120.000       0.038      -0.004       0.026       0.040       0.013      -0.026      -0.062      -0.074      -0.089      -0.145      -0.116      -0.080      -0.038
           135.000       0.045      -0.017      -0.001       0.039       0.000      -0.032      -0.019      -0.078      -0.114      -0.133      -0.134      -0.073      -0.045
           150.000      -0.056       0.045       0.036       0.042       0.015       0.030       0.052       0.037       0.041       0.037       0.064       0.063       0.056
           165.000      -0.064       0.030       0.027      -0.036       0.020       0.031       0.045       0.089       0.118       0.117       0.127       0.089       0.064
           180.000      -0.080       0.035      -0.007       0.018      -0.001       0.007       0.054       0.089       0.094       0.158       0.165       0.119       0.080
          </tableData>
        </table>
      </product>
    </function>
    <function name="aero/left-forearm/Fz">
      <description>localwind_z-axis_force_due_to_left-forearm</description>
      <product>
        <property>aero/qbar-psf</property>
        <property>Creare/left-forearm/area</property>
        <property>Creare/left-forearm/length</property>
        <table>
          <independentVar lookup="row">aero/left-forearm/alpha-deg</independentVar>
          <independentVar lookup="column">aero/left-forearm/beta-deg</independentVar>
          <tableData>
                       -90.000     -75.000     -60.000     -45.000     -30.000     -15.000       0.000      15.000      30.000      45.000      60.000      75.000      90.000
          -180.000       0.109       0.117       0.131       0.110       0.089       0.065       0.076       0.075       0.079       0.101       0.115       0.124       0.109
          -165.000       0.067       0.177       0.228       0.242       0.251       0.261       0.296       0.230       0.233       0.223       0.193       0.128       0.067
          -150.000       0.067       0.225       0.303       0.397       0.471       0.453       0.450       0.463       0.413       0.331       0.225       0.148       0.067
          -135.000       0.196       0.171       0.243       0.350       0.478       0.535       0.471       0.528       0.543       0.508       0.383       0.316       0.196
          -120.000       0.247       0.148       0.233       0.346       0.521       0.546       0.386       0.463       0.612       0.472       0.450       0.358       0.247
          -105.000       0.034       0.362       0.448       0.499       0.496       0.310       0.245       0.350       0.467       0.093       0.106       0.127       0.034
           -90.000       0.046       0.461       0.473       0.387       0.287       0.138       0.088       0.128       0.165       0.017       0.072       0.077       0.046
           -75.000       0.035       0.216       0.165      -0.018       0.015       0.060      -0.067      -0.070      -0.026      -0.014       0.028      -0.010       0.035
           -60.000       0.274       0.062       0.014      -0.019      -0.086      -0.126      -0.124      -0.098      -0.042       0.087       0.156       0.213       0.274
           -45.000       0.202       0.055       0.008      -0.032      -0.101      -0.151      -0.161      -0.132      -0.052       0.048       0.122       0.149       0.202
           -30.000       0.092       0.117       0.077       0.019      -0.062      -0.095      -0.116      -0.120      -0.095      -0.044      -0.001       0.047       0.092
           -15.000       0.096       0.103       0.092       0.033      -0.002      -0.035      -0.045      -0.046      -0.041      -0.003       0.039       0.070       0.096
             0.000       0.109       0.117       0.131       0.110       0.089       0.065       0.076       0.075       0.079       0.101       0.115       0.124       0.109
            15.000       0.067       0.177       0.228       0.242       0.251       0.261       0.296       0.230       0.233       0.223       0.193       0.128       0.067
            30.000       0.067       0.225       0.303       0.397       0.471       0.453       0.450       0.463       0.413       0.331       0.225       0.148       0.067
            45.000       0.196       0.171       0.243       0.350       0.478       0.535       0.471       0.528       0.543       0.508       0.383       0.316       0.196
            60.000       0.247       0.148       0.233       0.346       0.521       0.546       0.386       0.463       0.612       0.472       0.450       0.358       0.247
            75.000       0.034       0.362       0.448       0.499       0.496       0.310       0.245       0.350       0.467       0.093       0.106       0.127       0.034
            90.000       0.046       0.461       0.473       0.387       0.287       0.138       0.088       0.128       0.165       0.017       0.072       0.077       0.046
           105.000       0.035       0.216       0.165      -0.018       0.015       0.060      -0.067      -0.070      -0.026      -0.014       0.028      -0.010       0.035
           120.000       0.274       0.062       0.014      -0.019      -0.086      -0.126      -0.124      -0.098      -0.042       0.087       0.156       0.213       0.274
           135.000       0.202       0.055       0.008      -0.032      -0.101      -0.151      -0.161      -0.132      -0.052       0.048       0.122       0.149       0.202
           150.000       0.092       0.117       0.077       0.019      -0.062      -0.095      -0.116      -0.120      -0.095      -0.044      -0.001       0.047       0.092
           165.000       0.096       0.103       0.092       0.033      -0.002      -0.035      -0.045      -0.046      -0.041      -0.003       0.039       0.070       0.096
           180.000       0.109       0.117       0.131       0.110       0.089       0.065       0.076       0.075       0.079       0.101       0.115       0.124       0.109
          </tableData>
        </table>
      </product>
    </function>
    <function name="aero/left-forearm/Mx-lwf">
      <description>localwind_x-axis_moment_due_to_left-forearm</description>
      <product>
        <property>aero/qbar-psf</property>
        <property>Creare/left-forearm/area</property>
        <property>Creare/left-forearm/length</property>
        <table>
          <independentVar lookup="row">aero/left-forearm/alpha-deg</independentVar>
          <independentVar lookup="column">aero/left-forearm/beta-deg</independentVar>
          <tableData>
                       -90.000     -75.000     -60.000     -45.000     -30.000     -15.000       0.000      15.000      30.000      45.000      60.000      75.000      90.000
          -180.000       0.012       0.033       0.041       0.039       0.036       0.027       0.011      -0.003      -0.014      -0.023      -0.019      -0.009       0.012
          -165.000      -0.014       0.022       0.036       0.036       0.036       0.026      -0.009      -0.035      -0.044      -0.057      -0.059      -0.032      -0.014
          -150.000      -0.015       0.023       0.040       0.062       0.050       0.030      -0.019      -0.080      -0.063      -0.065      -0.062      -0.031      -0.015
          -135.000       0.006       0.029       0.044       0.056       0.090       0.072       0.004      -0.046      -0.060      -0.051      -0.047      -0.023       0.006
          -120.000      -0.006       0.018       0.035       0.068       0.069       0.032       0.001      -0.018      -0.056      -0.041      -0.047      -0.026      -0.006
          -105.000      -0.008       0.034       0.043       0.052       0.030       0.008      -0.001      -0.010      -0.031      -0.051      -0.015      -0.032      -0.008
           -90.000      -0.010       0.083       0.066       0.043       0.019       0.004       0.000      -0.003      -0.014      -0.016      -0.002      -0.021      -0.010
           -75.000      -0.004       0.006       0.012       0.024       0.017       0.005       0.001      -0.003      -0.008      -0.005       0.005      -0.004      -0.004
           -60.000      -0.020       0.010       0.014       0.013       0.014       0.008      -0.008      -0.025      -0.033      -0.029      -0.033      -0.041      -0.020
           -45.000      -0.018       0.010       0.007       0.010       0.009       0.010      -0.005      -0.017      -0.030      -0.026      -0.031      -0.031      -0.018
           -30.000       0.004       0.027       0.019       0.023       0.029       0.020       0.013      -0.005      -0.010      -0.008      -0.003       0.004       0.004
           -15.000       0.006       0.029       0.031       0.024       0.030       0.025       0.012      -0.004      -0.019      -0.015      -0.019      -0.004       0.006
             0.000       0.012       0.033       0.041       0.039       0.036       0.027       0.011      -0.003      -0.014      -0.023      -0.019      -0.009       0.012
            15.000      -0.014       0.022       0.036       0.036       0.036       0.026      -0.009      -0.035      -0.044      -0.057      -0.059      -0.032      -0.014
            30.000      -0.015       0.023       0.040       0.062       0.050       0.030      -0.019      -0.080      -0.063      -0.065      -0.062      -0.031      -0.015
            45.000       0.006       0.029       0.044       0.056       0.090       0.072       0.004      -0.046      -0.060      -0.051      -0.047      -0.023       0.006
            60.000      -0.006       0.018       0.035       0.068       0.069       0.032       0.001      -0.018      -0.056      -0.041      -0.047      -0.026      -0.006
            75.000      -0.008       0.034       0.043       0.052       0.030       0.008      -0.001      -0.010      -0.031      -0.051      -0.015      -0.032      -0.008
            90.000      -0.010       0.083       0.066       0.043       0.019       0.004       0.000      -0.003      -0.014      -0.016      -0.002      -0.021      -0.010
           105.000      -0.004       0.006       0.012       0.024       0.017       0.005       0.001      -0.003      -0.008      -0.005       0.005      -0.004      -0.004
           120.000      -0.020       0.010       0.014       0.013       0.014       0.008      -0.008      -0.025      -0.033      -0.029      -0.033      -0.041      -0.020
           135.000      -0.018       0.010       0.007       0.010       0.009       0.010      -0.005      -0.017      -0.030      -0.026      -0.031      -0.031      -0.018
           150.000       0.004       0.027       0.019       0.023       0.029       0.020       0.013      -0.005      -0.010      -0.008      -0.003       0.004       0.004
           165.000       0.006       0.029       0.031       0.024       0.030       0.025       0.012      -0.004      -0.019      -0.015      -0.019      -0.004       0.006
           180.000       0.012       0.033       0.041       0.039       0.036       0.027       0.011      -0.003      -0.014      -0.023      -0.019      -0.009       0.012
          </tableData>
        </table>
      </product>
    </function>
    <function name="aero/left-forearm/My-lwf">
      <description>localwind_y-axis_moment_due_to_left-forearm</description>
      <product>
        <property>aero/qbar-psf</property>
        <property>Creare/left-forearm/area</property>
        <property>Creare/left-forearm/length</property>
        <table>
          <independentVar lookup="row">aero/left-forearm/alpha-deg</independentVar>
          <independentVar lookup="column">aero/left-forearm/beta-deg</independentVar>
          <tableData>
                       -90.000     -75.000     -60.000     -45.000     -30.000     -15.000       0.000      15.000      30.000      45.000      60.000      75.000      90.000
          -180.000       0.026       0.031       0.041       0.048       0.053       0.058       0.056       0.052       0.046       0.042       0.033       0.026       0.026
          -120.000       0.048      -0.005       0.010       0.056       0.094       0.080       0.061       0.069       0.081       0.088       0.085       0.068       0.048
           -60.000       0.037      -0.004       0.001       0.006       0.013       0.024       0.033       0.030       0.030       0.015       0.014       0.025       0.037
             0.000       0.026       0.031       0.041       0.048       0.053       0.058       0.056       0.052       0.046       0.042       0.033       0.026       0.026
            60.000       0.048      -0.005       0.010       0.056       0.094       0.080       0.061       0.069       0.081       0.088       0.085       0.068       0.048
           120.000       0.037      -0.004       0.001       0.006       0.013       0.024       0.033       0.030       0.030       0.015       0.014       0.025       0.037
           180.000       0.026       0.031       0.041       0.048       0.053       0.058       0.056       0.052       0.046       0.042       0.033       0.026       0.026
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          </tableData>
        </table>
      </product>
    </function>
    <function name="aero/left-forearm/Mz-lwf">
      <description>localwind_z-axis_moment_due_to_left-forearm</description>
      <product>
        <property>aero/qbar-psf</property>
        <property>Creare/left-forearm/area</property>
        <property>Creare/left-forearm/length</property>
        <table>
          <independentVar lookup="row">aero/left-forearm/alpha-deg</independentVar>
          <independentVar lookup="column">aero/left-forearm/beta-deg</independentVar>
          <tableData>
                       -90.000     -75.000     -60.000     -45.000     -30.000     -15.000       0.000      15.000      30.000      45.000      60.000      75.000      90.000
          -180.000      -0.028      -0.025      -0.032      -0.039      -0.044      -0.054      -0.056      -0.055      -0.052      -0.051      -0.043      -0.033      -0.028
          -120.000       0.009      -0.050      -0.069      -0.070      -0.070      -0.051      -0.056      -0.059      -0.079      -0.032      -0.014       0.005       0.009
           -60.000      -0.007       0.020       0.013       0.013       0.022       0.041       0.052       0.049       0.036       0.019       0.012       0.003      -0.007
             0.000      -0.028      -0.025      -0.032      -0.039      -0.044      -0.054      -0.056      -0.055      -0.052      -0.051      -0.043      -0.033      -0.028
            60.000       0.009      -0.050      -0.069      -0.070      -0.070      -0.051      -0.056      -0.059      -0.079      -0.032      -0.014       0.005       0.009
           120.000      -0.007       0.020       0.013       0.013       0.022       0.041       0.052       0.049       0.036       0.019       0.012       0.003      -0.007
           180.000      -0.028      -0.025      -0.032      -0.039      -0.044      -0.054      -0.056      -0.055      -0.052      -0.051      -0.043      -0.033      -0.028
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          </tableData>
        </table>
      </product>
    </function>
    <function name="aero/left-lower-leg/Fx">
      <description>localwind_x-axis_force_due_to_left-lower-leg</description>
      <product>
        <property>aero/qbar-psf</property>
        <property>Creare/left-lower-leg/area</property>
        <property>Creare/left-lower-leg/length</property>
        <table>
          <independentVar lookup="row">aero/left-lower-leg/alpha-deg</independentVar>
          <independentVar lookup="column">aero/left-lower-leg/beta-deg</independentVar>
          <tableData>
                       -90.000     -75.000     -60.000     -45.000     -30.000     -15.000       0.000      15.000      30.000      45.000      60.000      75.000      90.000
          -180.000      -0.455      -0.490      -0.512      -0.546      -0.579      -0.535      -0.521      -0.534      -0.552      -0.528      -0.494      -0.485      -0.455
          -120.000      -0.459      -0.476      -0.552      -0.471      -0.343      -0.262      -0.205      -0.240      -0.397      -0.482      -0.511      -0.479      -0.459
           -60.000      -0.457      -0.435      -0.375      -0.322      -0.271      -0.229      -0.213      -0.243      -0.304      -0.369      -0.419      -0.460      -0.457
             0.000      -0.455      -0.490      -0.512      -0.546      -0.579      -0.535      -0.521      -0.534      -0.552      -0.528      -0.494      -0.485      -0.455
            60.000      -0.459      -0.476      -0.552      -0.471      -0.343      -0.262      -0.205      -0.240      -0.397      -0.482      -0.511      -0.479      -0.459
           120.000      -0.457      -0.435      -0.375      -0.322      -0.271      -0.229      -0.213      -0.243      -0.304      -0.369      -0.419      -0.460      -0.457
           180.000      -0.455      -0.490      -0.512      -0.546      -0.579      -0.535      -0.521      -0.534      -0.552      -0.528      -0.494      -0.485      -0.455
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          </tableData>
        </table>
      </product>
    </function>
    <function name="aero/left-lower-leg/Fy">
      <description>localwind_y-axis_force_due_to_left-lower-leg</description>
      <product>
        <property>aero/qbar-psf</property>
        <property>Creare/left-lower-leg/area</property>
        <property>Creare/left-lower-leg/length</property>
        <table>
          <independentVar lookup="row">aero/left-lower-leg/alpha-deg</independentVar>
          <independentVar lookup="column">aero/left-lower-leg/beta-deg</independentVar>
          <tableData>
                       -90.000     -75.000     -60.000     -45.000     -30.000     -15.000       0.000      15.000      30.000      45.000      60.000      75.000      90.000
          -180.000      -0.058      -0.022       0.025       0.031       0.105       0.059       0.003      -0.011      -0.018      -0.001       0.026       0.035       0.058
          -120.000       0.037       0.167       0.334       0.463       0.490       0.491      -0.210       0.055      -0.465      -0.322      -0.211      -0.132      -0.037
           -60.000      -0.131       0.018       0.085       0.096       0.086       0.048      -0.018      -0.077      -0.090      -0.095      -0.074       0.005       0.131
             0.000      -0.058      -0.022       0.025       0.031       0.105       0.059       0.003      -0.011      -0.018      -0.001       0.026       0.035       0.058
            60.000       0.037       0.167       0.334       0.463       0.490       0.491      -0.210       0.055      -0.465      -0.322      -0.211      -0.132      -0.037
           120.000      -0.131       0.018       0.085       0.096       0.086       0.048      -0.018      -0.077      -0.090      -0.095      -0.074       0.005       0.131
           180.000      -0.058      -0.022       0.025       0.031       0.105       0.059       0.003      -0.011      -0.018      -0.001       0.026       0.035       0.058
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          </tableData>
        </table>
      </product>
    </function>
    <function name="aero/left-lower-leg/Fz">
      <description>localwind_z-axis_force_due_to_left-lower-leg</description>
      <product>
        <property>aero/qbar-psf</property>
        <property>Creare/left-lower-leg/area</property>
        <property>Creare/left-lower-leg/length</property>
        <table>
          <independentVar lookup="row">aero/left-lower-leg/alpha-deg</independentVar>
          <independentVar lookup="column">aero/left-lower-leg/beta-deg</independentVar>
          <tableData>
                       -90.000     -75.000     -60.000     -45.000     -30.000     -15.000       0.000      15.000      30.000      45.000      60.000      75.000      90.000
          -180.000       0.081       0.128       0.144       0.208       0.218       0.209       0.196       0.200       0.206       0.160       0.121       0.089       0.081
          -120.000       0.132       0.180       0.197       0.076       0.133       0.260       0.343       0.443       0.188       0.247       0.303       0.189       0.132
           -60.000       0.044      -0.018      -0.041      -0.079      -0.094      -0.095      -0.100      -0.097      -0.092      -0.089      -0.039       0.011       0.044
             0.000       0.081       0.128       0.144       0.208       0.218       0.209       0.196       0.200       0.206       0.160       0.121       0.089       0.081
            60.000       0.132       0.180       0.197       0.076       0.133       0.260       0.343       0.443       0.188       0.247       0.303       0.189       0.132
           120.000       0.044      -0.018      -0.041      -0.079      -0.094      -0.095      -0.100      -0.097      -0.092      -0.089      -0.039       0.011       0.044
           180.000       0.081       0.128       0.144       0.208       0.218       0.209       0.196       0.200       0.206       0.160       0.121       0.089       0.081
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          </tableData>
        </table>
      </product>
    </function>
    <function name="aero/left-lower-leg/Mx-lwf">
      <description>localwind_x-axis_moment_due_to_left-lower-leg</description>
      <product>
        <property>aero/qbar-psf</property>
        <property>Creare/left-lower-leg/area</property>
        <property>Creare/left-lower-leg/length</property>
        <table>
          <independentVar lookup="row">aero/left-lower-leg/alpha-deg</independentVar>
          <independentVar lookup="column">aero/left-lower-leg/beta-deg</independentVar>
          <tableData>
                       -90.000     -75.000     -60.000     -45.000     -30.000     -15.000       0.000      15.000      30.000      45.000      60.000      75.000      90.000
          -180.000      -0.002      -0.001      -0.005       0.000      -0.015      -0.009       0.010       0.012       0.007       0.004       0.002       0.006      -0.002
          -120.000       0.011      -0.017      -0.037      -0.068      -0.041      -0.015       0.003       0.026       0.058       0.077       0.036       0.018       0.011
           -60.000      -0.015      -0.002      -0.004      -0.004      -0.001      -0.002      -0.001       0.002       0.002       0.005       0.002      -0.006      -0.015
             0.000      -0.002      -0.001      -0.005       0.000      -0.015      -0.009       0.010       0.012       0.007       0.004       0.002       0.006      -0.002
            60.000       0.011      -0.017      -0.037      -0.068      -0.041      -0.015       0.003       0.026       0.058       0.077       0.036       0.018       0.011
           120.000      -0.015      -0.002      -0.004      -0.004      -0.001      -0.002      -0.001       0.002       0.002       0.005       0.002      -0.006      -0.015
           180.000      -0.002      -0.001      -0.005       0.000      -0.015      -0.009       0.010       0.012       0.007       0.004       0.002       0.006      -0.002
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          </tableData>
        </table>
      </product>
    </function>
    <function name="aero/left-lower-leg/My-lwf">
      <description>localwind_y-axis_moment_due_to_left-lower-leg</description>
      <product>
        <property>aero/qbar-psf</property>
        <property>Creare/left-lower-leg/area</property>
        <property>Creare/left-lower-leg/length</property>
        <table>
          <independentVar lookup="row">aero/left-lower-leg/alpha-deg</independentVar>
          <independentVar lookup="column">aero/left-lower-leg/beta-deg</independentVar>
          <tableData>
                       -90.000     -75.000     -60.000     -45.000     -30.000     -15.000       0.000      15.000      30.000      45.000      60.000      75.000      90.000
          -180.000      -0.029      -0.041      -0.047      -0.060      -0.068      -0.061      -0.053      -0.053      -0.056      -0.048      -0.038      -0.036      -0.029
          -120.000       0.016      -0.059      -0.057      -0.034      -0.024      -0.012       0.002       0.042       0.067       0.069       0.038       0.025       0.016
           -60.000       0.012      -0.045      -0.041      -0.042      -0.038      -0.032      -0.021      -0.011      -0.002       0.005       0.007       0.008       0.012
             0.000      -0.029      -0.041      -0.047      -0.060      -0.068      -0.061      -0.053      -0.053      -0.056      -0.048      -0.038      -0.036      -0.029
            60.000       0.016      -0.059      -0.057      -0.034      -0.024      -0.012       0.002       0.042       0.067       0.069       0.038       0.025       0.016
           120.000       0.012      -0.045      -0.041      -0.042      -0.038      -0.032      -0.021      -0.011      -0.002       0.005       0.007       0.008       0.012
           180.000      -0.029      -0.041      -0.047      -0.060      -0.068      -0.061      -0.053      -0.053      -0.056      -0.048      -0.038      -0.036      -0.029
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          </tableData>
        </table>
      </product>
    </function>
    <function name="aero/left-lower-leg/Mz-lwf">
      <description>localwind_z-axis_moment_due_to_left-lower-leg</description>
      <product>
        <property>aero/qbar-psf</property>
        <property>Creare/left-lower-leg/area</property>
        <property>Creare/left-lower-leg/length</property>
        <table>
          <independentVar lookup="row">aero/left-lower-leg/alpha-deg</independentVar>
          <independentVar lookup="column">aero/left-lower-leg/beta-deg</independentVar>
          <tableData>
                       -90.000     -75.000     -60.000     -45.000     -30.000     -15.000       0.000      15.000      30.000      45.000      60.000      75.000      90.000
          -180.000      -0.032      -0.037      -0.041      -0.054      -0.064      -0.060      -0.057      -0.062      -0.065      -0.058      -0.045      -0.041      -0.032
          -120.000      -0.050       0.024       0.036       0.066       0.052       0.020      -0.004      -0.019      -0.035      -0.049      -0.075      -0.063      -0.050
           -60.000       0.049      -0.008      -0.007      -0.003       0.006       0.013       0.021       0.033       0.037       0.039       0.040       0.044       0.049
             0.000      -0.032      -0.037      -0.041      -0.054      -0.064      -0.060      -0.057      -0.062      -0.065      -0.058      -0.045      -0.041      -0.032
            60.000      -0.050       0.024       0.036       0.066       0.052       0.020      -0.004      -0.019      -0.035      -0.049      -0.075      -0.063      -0.050
           120.000       0.049      -0.008      -0.007      -0.003       0.006       0.013       0.021       0.033       0.037       0.039       0.040       0.044       0.049
           180.000      -0.032      -0.037      -0.041      -0.054      -0.064      -0.060      -0.057      -0.062      -0.065      -0.058      -0.045      -0.041      -0.032
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          </tableData>
        </table>
      </product>
    </function>
    <function name="aero/left-upper-arm/Fx">
      <description>localwind_x-axis_force_due_to_left-upper-arm</description>
      <product>
        <property>aero/qbar-psf</property>
        <property>Creare/left-upper-arm/area</property>
        <property>Creare/left-upper-arm/length</property>
        <table>
          <independentVar lookup="row">aero/left-upper-arm/alpha-deg</independentVar>
          <independentVar lookup="column">aero/left-upper-arm/beta-deg</independentVar>
          <tableData>
                       -90.000     -75.000     -60.000     -45.000     -30.000     -15.000       0.000      15.000      30.000      45.000      60.000      75.000      90.000
          -180.000      -0.213      -0.261      -0.283      -0.316      -0.339      -0.369      -0.389      -0.344      -0.294      -0.249      -0.218      -0.216      -0.213
          -120.000      -0.091      -0.247      -0.268      -0.288      -0.273      -0.260      -0.228      -0.216      -0.251      -0.248      -0.163      -0.140      -0.091
           -60.000      -0.134      -0.136      -0.089      -0.170      -0.053      -0.123      -0.132      -0.075      -0.188      -0.057      -0.111      -0.152      -0.134
             0.000      -0.213      -0.261      -0.283      -0.316      -0.339      -0.369      -0.389      -0.344      -0.294      -0.249      -0.218      -0.216      -0.213
            60.000      -0.091      -0.247      -0.268      -0.288      -0.273      -0.260      -0.228      -0.216      -0.251      -0.248      -0.163      -0.140      -0.091
           120.000      -0.134      -0.136      -0.089      -0.170      -0.053      -0.123      -0.132      -0.075      -0.188      -0.057      -0.111      -0.152      -0.134
           180.000      -0.213      -0.261      -0.283      -0.316      -0.339      -0.369      -0.389      -0.344      -0.294      -0.249      -0.218      -0.216      -0.213
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          </tableData>
        </table>
      </product>
    </function>
    <function name="aero/left-upper-arm/Fy">
      <description>localwind_y-axis_force_due_to_left-upper-arm</description>
      <product>
        <property>aero/qbar-psf</property>
        <property>Creare/left-upper-arm/area</property>
        <property>Creare/left-upper-arm/length</property>
        <table>
          <independentVar lookup="row">aero/left-upper-arm/alpha-deg</independentVar>
          <independentVar lookup="column">aero/left-upper-arm/beta-deg</independentVar>
          <tableData>
                       -90.000     -75.000     -60.000     -45.000     -30.000     -15.000       0.000      15.000      30.000      45.000      60.000      75.000      90.000
          -180.000      -0.079       0.111       0.137       0.157       0.195       0.211       0.074       0.249       0.209       0.178       0.128       0.094       0.079
          -120.000      -0.164       0.113       0.144       0.219       0.248       0.274       0.313       0.281       0.255       0.222       0.115       0.117       0.164
           -60.000       0.134       0.256      -0.114       0.294      -0.149       0.258      -0.275       0.211      -0.245       0.102      -0.269       0.064      -0.134
             0.000      -0.079       0.111       0.137       0.157       0.195       0.211       0.074       0.249       0.209       0.178       0.128       0.094       0.079
            60.000      -0.164       0.113       0.144       0.219       0.248       0.274       0.313       0.281       0.255       0.222       0.115       0.117       0.164
           120.000       0.134       0.256      -0.114       0.294      -0.149       0.258      -0.275       0.211      -0.245       0.102      -0.269       0.064      -0.134
           180.000      -0.079       0.111       0.137       0.157       0.195       0.211       0.074       0.249       0.209       0.178       0.128       0.094       0.079
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          </tableData>
        </table>
      </product>
    </function>
    <function name="aero/left-upper-arm/Fz">
      <description>localwind_z-axis_force_due_to_left-upper-arm</description>
      <product>
        <property>aero/qbar-psf</property>
        <property>Creare/left-upper-arm/area</property>
        <property>Creare/left-upper-arm/length</property>
        <table>
          <independentVar lookup="row">aero/left-upper-arm/alpha-deg</independentVar>
          <independentVar lookup="column">aero/left-upper-arm/beta-deg</independentVar>
          <tableData>
                       -90.000     -75.000     -60.000     -45.000     -30.000     -15.000       0.000      15.000      30.000      45.000      60.000      75.000      90.000
          -180.000       0.136       0.141       0.125       0.133       0.122       0.133       0.157       0.116       0.118       0.137       0.131       0.140       0.136
          -120.000       0.410       0.206       0.254       0.388       0.432       0.499       0.502       0.566       0.706       0.707       0.356       0.345       0.410
           -60.000       0.402       0.501       0.166       0.367       0.166       0.155       0.129       0.110       0.243       0.149       0.506       0.152       0.402
             0.000       0.136       0.141       0.125       0.133       0.122       0.133       0.157       0.116       0.118       0.137       0.131       0.140       0.136
            60.000       0.410       0.206       0.254       0.388       0.432       0.499       0.502       0.566       0.706       0.707       0.356       0.345       0.410
           120.000       0.402       0.501       0.166       0.367       0.166       0.155       0.129       0.110       0.243       0.149       0.506       0.152       0.402
           180.000       0.136       0.141       0.125       0.133       0.122       0.133       0.157       0.116       0.118       0.137       0.131       0.140       0.136
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          </tableData>
        </table>
      </product>
    </function>
    <function name="aero/left-upper-arm/Mx-lwf">
      <description>localwind_x-axis_moment_due_to_left-upper-arm</description>
      <product>
        <property>aero/qbar-psf</property>
        <property>Creare/left-upper-arm/area</property>
        <property>Creare/left-upper-arm/length</property>
        <table>
          <independentVar lookup="row">aero/left-upper-arm/alpha-deg</independentVar>
          <independentVar lookup="column">aero/left-upper-arm/beta-deg</independentVar>
          <tableData>
                       -90.000     -75.000     -60.000     -45.000     -30.000     -15.000       0.000      15.000      30.000      45.000      60.000      75.000      90.000
          -180.000       0.016       0.007      -0.000      -0.003      -0.012      -0.019      -0.048      -0.027      -0.021      -0.011       0.007       0.010       0.016
          -120.000      -0.017      -0.002      -0.001       0.007       0.002      -0.010      -0.020      -0.028      -0.037      -0.048      -0.007      -0.003      -0.017
           -60.000       0.009      -0.048       0.011      -0.018       0.015       0.001       0.011      -0.017      -0.002      -0.013       0.043      -0.006       0.009
             0.000       0.016       0.007      -0.000      -0.003      -0.012      -0.019      -0.048      -0.027      -0.021      -0.011       0.007       0.010       0.016
            60.000      -0.017      -0.002      -0.001       0.007       0.002      -0.010      -0.020      -0.028      -0.037      -0.048      -0.007      -0.003      -0.017
           120.000       0.009      -0.048       0.011      -0.018       0.015       0.001       0.011      -0.017      -0.002      -0.013       0.043      -0.006       0.009
           180.000       0.016       0.007      -0.000      -0.003      -0.012      -0.019      -0.048      -0.027      -0.021      -0.011       0.007       0.010       0.016
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          </tableData>
        </table>
      </product>
    </function>
    <function name="aero/left-upper-arm/My-lwf">
      <description>localwind_y-axis_moment_due_to_left-upper-arm</description>
      <product>
        <property>aero/qbar-psf</property>
        <property>Creare/left-upper-arm/area</property>
        <property>Creare/left-upper-arm/length</property>
        <table>
          <independentVar lookup="row">aero/left-upper-arm/alpha-deg</independentVar>
          <independentVar lookup="column">aero/left-upper-arm/beta-deg</independentVar>
          <tableData>
                       -90.000     -75.000     -60.000     -45.000     -30.000     -15.000       0.000      15.000      30.000      45.000      60.000      75.000      90.000
          -180.000       0.014       0.027       0.031       0.036       0.040       0.045      -0.008       0.038       0.027       0.018       0.012       0.012       0.014
          -120.000       0.013      -0.007      -0.005       0.003       0.016       0.023       0.041       0.068       0.085       0.082       0.050       0.033       0.013
           -60.000       0.037       0.024       0.008       0.022       0.018       0.030       0.040       0.035       0.038       0.011       0.018       0.000       0.037
             0.000       0.014       0.027       0.031       0.036       0.040       0.045      -0.008       0.038       0.027       0.018       0.012       0.012       0.014
            60.000       0.013      -0.007      -0.005       0.003       0.016       0.023       0.041       0.068       0.085       0.082       0.050       0.033       0.013
           120.000       0.037       0.024       0.008       0.022       0.018       0.030       0.040       0.035       0.038       0.011       0.018       0.000       0.037
           180.000       0.014       0.027       0.031       0.036       0.040       0.045      -0.008       0.038       0.027       0.018       0.012       0.012       0.014
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          </tableData>
        </table>
      </product>
    </function>
    <function name="aero/left-upper-arm/Mz-lwf">
      <description>localwind_z-axis_moment_due_to_left-upper-arm</description>
      <product>
        <property>aero/qbar-psf</property>
        <property>Creare/left-upper-arm/area</property>
        <property>Creare/left-upper-arm/length</property>
        <table>
          <independentVar lookup="row">aero/left-upper-arm/alpha-deg</independentVar>
          <independentVar lookup="column">aero/left-upper-arm/beta-deg</independentVar>
          <tableData>
                       -90.000     -75.000     -60.000     -45.000     -30.000     -15.000       0.000      15.000      30.000      45.000      60.000      75.000      90.000
          -180.000      -0.014      -0.024      -0.025      -0.030      -0.034      -0.040      -0.057      -0.034      -0.025      -0.017      -0.013      -0.012      -0.014
          -120.000       0.006      -0.042      -0.050      -0.076      -0.073      -0.083      -0.082      -0.072      -0.048      -0.029       0.007       0.009       0.006
           -60.000      -0.010       0.015      -0.013       0.015      -0.007      -0.007       0.008      -0.005       0.004       0.011      -0.022      -0.001      -0.010
             0.000      -0.014      -0.024      -0.025      -0.030      -0.034      -0.040      -0.057      -0.034      -0.025      -0.017      -0.013      -0.012      -0.014
            60.000       0.006      -0.042      -0.050      -0.076      -0.073      -0.083      -0.082      -0.072      -0.048      -0.029       0.007       0.009       0.006
           120.000      -0.010       0.015      -0.013       0.015      -0.007      -0.007       0.008      -0.005       0.004       0.011      -0.022      -0.001      -0.010
           180.000      -0.014      -0.024      -0.025      -0.030      -0.034      -0.040      -0.057      -0.034      -0.025      -0.017      -0.013      -0.012      -0.014
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          </tableData>
        </table>
      </product>
    </function>
    <function name="aero/left-upper-leg/Fx">
      <description>localwind_x-axis_force_due_to_left-upper-leg</description>
      <product>
        <property>aero/qbar-psf</property>
        <property>Creare/left-upper-leg/area</property>
        <property>Creare/left-upper-leg/length</property>
        <table>
          <independentVar lookup="row">aero/left-upper-leg/alpha-deg</independentVar>
          <independentVar lookup="column">aero/left-upper-leg/beta-deg</independentVar>
          <tableData>
                       -90.000     -75.000     -60.000     -45.000     -30.000     -15.000       0.000      15.000      30.000      45.000      60.000      75.000      90.000
          -180.000      -0.478      -0.476      -0.469      -0.458      -0.451      -0.438      -0.428      -0.426      -0.444      -0.455      -0.469      -0.484      -0.478
          -120.000      -0.485      -0.432      -0.414      -0.378      -0.318      -0.268      -0.252      -0.251      -0.289      -0.385      -0.456      -0.478      -0.485
           -60.000      -0.448      -0.375      -0.294      -0.195      -0.116      -0.071      -0.067      -0.081      -0.145      -0.262      -0.335      -0.423      -0.448
             0.000      -0.478      -0.476      -0.469      -0.458      -0.451      -0.438      -0.428      -0.426      -0.444      -0.455      -0.469      -0.484      -0.478
            60.000      -0.485      -0.432      -0.414      -0.378      -0.318      -0.268      -0.252      -0.251      -0.289      -0.385      -0.456      -0.478      -0.485
           120.000      -0.448      -0.375      -0.294      -0.195      -0.116      -0.071      -0.067      -0.081      -0.145      -0.262      -0.335      -0.423      -0.448
           180.000      -0.478      -0.476      -0.469      -0.458      -0.451      -0.438      -0.428      -0.426      -0.444      -0.455      -0.469      -0.484      -0.478
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          </tableData>
        </table>
      </product>
    </function>
    <function name="aero/left-upper-leg/Fy">
      <description>localwind_y-axis_force_due_to_left-upper-leg</description>
      <product>
        <property>aero/qbar-psf</property>
        <property>Creare/left-upper-leg/area</property>
        <property>Creare/left-upper-leg/length</property>
        <table>
          <independentVar lookup="row">aero/left-upper-leg/alpha-deg</independentVar>
          <independentVar lookup="column">aero/left-upper-leg/beta-deg</independentVar>
          <tableData>
                       -90.000     -75.000     -60.000     -45.000     -30.000     -15.000       0.000      15.000      30.000      45.000      60.000      75.000      90.000
          -180.000       0.034       0.092       0.098       0.090       0.088       0.058       0.031       0.012      -0.009      -0.032      -0.030      -0.032      -0.034
          -120.000       0.047       0.098       0.154       0.199       0.176       0.135       0.164       0.065      -0.063      -0.149      -0.139      -0.098      -0.047
           -60.000       0.036       0.123       0.137       0.127       0.094       0.082       0.001      -0.065      -0.130      -0.164      -0.163      -0.113      -0.036
             0.000       0.034       0.092       0.098       0.090       0.088       0.058       0.031       0.012      -0.009      -0.032      -0.030      -0.032      -0.034
            60.000       0.047       0.098       0.154       0.199       0.176       0.135       0.164       0.065      -0.063      -0.149      -0.139      -0.098      -0.047
           120.000       0.036       0.123       0.137       0.127       0.094       0.082       0.001      -0.065      -0.130      -0.164      -0.163      -0.113      -0.036
           180.000       0.034       0.092       0.098       0.090       0.088       0.058       0.031       0.012      -0.009      -0.032      -0.030      -0.032      -0.034
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          </tableData>
        </table>
      </product>
    </function>
    <function name="aero/left-upper-leg/Fz">
      <description>localwind_z-axis_force_due_to_left-upper-leg</description>
      <product>
        <property>aero/qbar-psf</property>
        <property>Creare/left-upper-leg/area</property>
        <property>Creare/left-upper-leg/length</property>
        <table>
          <independentVar lookup="row">aero/left-upper-leg/alpha-deg</independentVar>
          <independentVar lookup="column">aero/left-upper-leg/beta-deg</independentVar>
          <tableData>
                       -90.000     -75.000     -60.000     -45.000     -30.000     -15.000       0.000      15.000      30.000      45.000      60.000      75.000      90.000
          -180.000       0.061       0.079       0.079       0.073       0.060       0.054       0.050       0.045       0.046       0.051       0.057       0.064       0.061
          -120.000       0.075       0.153       0.219       0.312       0.379       0.423       0.423       0.482       0.424       0.312       0.247       0.167       0.075
           -60.000       0.237       0.182       0.125       0.094       0.102       0.116       0.088       0.099       0.110       0.109       0.160       0.195       0.237
             0.000       0.061       0.079       0.079       0.073       0.060       0.054       0.050       0.045       0.046       0.051       0.057       0.064       0.061
            60.000       0.075       0.153       0.219       0.312       0.379       0.423       0.423       0.482       0.424       0.312       0.247       0.167       0.075
           120.000       0.237       0.182       0.125       0.094       0.102       0.116       0.088       0.099       0.110       0.109       0.160       0.195       0.237
           180.000       0.061       0.079       0.079       0.073       0.060       0.054       0.050       0.045       0.046       0.051       0.057       0.064       0.061
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          </tableData>
        </table>
      </product>
    </function>
    <function name="aero/left-upper-leg/Mx-lwf">
      <description>localwind_x-axis_moment_due_to_left-upper-leg</description>
      <product>
        <property>aero/qbar-psf</property>
        <property>Creare/left-upper-leg/area</property>
        <property>Creare/left-upper-leg/length</property>
        <table>
          <independentVar lookup="row">aero/left-upper-leg/alpha-deg</independentVar>
          <independentVar lookup="column">aero/left-upper-leg/beta-deg</independentVar>
          <tableData>
                       -90.000     -75.000     -60.000     -45.000     -30.000     -15.000       0.000      15.000      30.000      45.000      60.000      75.000      90.000
          -180.000       0.020      -0.025      -0.025      -0.024      -0.022      -0.013      -0.006       0.003       0.013       0.019       0.023       0.023       0.020
          -120.000       0.038      -0.030      -0.029      -0.025      -0.010      -0.007      -0.001       0.009       0.019       0.028       0.030       0.041       0.038
           -60.000       0.001      -0.008      -0.009      -0.010      -0.011      -0.009      -0.000       0.009       0.011       0.008       0.004       0.000       0.001
             0.000       0.020      -0.025      -0.025      -0.024      -0.022      -0.013      -0.006       0.003       0.013       0.019       0.023       0.023       0.020
            60.000       0.038      -0.030      -0.029      -0.025      -0.010      -0.007      -0.001       0.009       0.019       0.028       0.030       0.041       0.038
           120.000       0.001      -0.008      -0.009      -0.010      -0.011      -0.009      -0.000       0.009       0.011       0.008       0.004       0.000       0.001
           180.000       0.020      -0.025      -0.025      -0.024      -0.022      -0.013      -0.006       0.003       0.013       0.019       0.023       0.023       0.020
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          </tableData>
        </table>
      </product>
    </function>
    <function name="aero/left-upper-leg/My-lwf">
      <description>localwind_y-axis_moment_due_to_left-upper-leg</description>
      <product>
        <property>aero/qbar-psf</property>
        <property>Creare/left-upper-leg/area</property>
        <property>Creare/left-upper-leg/length</property>
        <table>
          <independentVar lookup="row">aero/left-upper-leg/alpha-deg</independentVar>
          <independentVar lookup="column">aero/left-upper-leg/beta-deg</independentVar>
          <tableData>
                       -90.000     -75.000     -60.000     -45.000     -30.000     -15.000       0.000      15.000      30.000      45.000      60.000      75.000      90.000
          -180.000      -0.037      -0.039      -0.037      -0.034      -0.032      -0.030      -0.029      -0.029      -0.032      -0.034      -0.036      -0.040      -0.037
          -120.000       0.009      -0.054      -0.057      -0.060      -0.039      -0.042      -0.013       0.001       0.014       0.021       0.023       0.018       0.009
           -60.000       0.016      -0.050      -0.038      -0.023      -0.006       0.005       0.009       0.014       0.012       0.010       0.011       0.014       0.016
             0.000      -0.037      -0.039      -0.037      -0.034      -0.032      -0.030      -0.029      -0.029      -0.032      -0.034      -0.036      -0.040      -0.037
            60.000       0.009      -0.054      -0.057      -0.060      -0.039      -0.042      -0.013       0.001       0.014       0.021       0.023       0.018       0.009
           120.000       0.016      -0.050      -0.038      -0.023      -0.006       0.005       0.009       0.014       0.012       0.010       0.011       0.014       0.016
           180.000      -0.037      -0.039      -0.037      -0.034      -0.032      -0.030      -0.029      -0.029      -0.032      -0.034      -0.036      -0.040      -0.037
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          </tableData>
        </table>
      </product>
    </function>
    <function name="aero/left-upper-leg/Mz-lwf">
      <description>localwind_z-axis_moment_due_to_left-upper-leg</description>
      <product>
        <property>aero/qbar-psf</property>
        <property>Creare/left-upper-leg/area</property>
        <property>Creare/left-upper-leg/length</property>
        <table>
          <independentVar lookup="row">aero/left-upper-leg/alpha-deg</independentVar>
          <independentVar lookup="column">aero/left-upper-leg/beta-deg</independentVar>
          <tableData>
                       -90.000     -75.000     -60.000     -45.000     -30.000     -15.000       0.000      15.000      30.000      45.000      60.000      75.000      90.000
          -180.000      -0.034      -0.039      -0.037      -0.034      -0.033      -0.030      -0.029      -0.029      -0.031      -0.033      -0.034      -0.037      -0.034
          -120.000      -0.049       0.021       0.025       0.026       0.009      -0.007      -0.012      -0.039      -0.052      -0.055      -0.055      -0.050      -0.049
           -60.000       0.057      -0.015      -0.012      -0.010      -0.013      -0.018      -0.010      -0.002       0.014       0.037       0.043       0.053       0.057
             0.000      -0.034      -0.039      -0.037      -0.034      -0.033      -0.030      -0.029      -0.029      -0.031      -0.033      -0.034      -0.037      -0.034
            60.000      -0.049       0.021       0.025       0.026       0.009      -0.007      -0.012      -0.039      -0.052      -0.055      -0.055      -0.050      -0.049
           120.000       0.057      -0.015      -0.012      -0.010      -0.013      -0.018      -0.010      -0.002       0.014       0.037       0.043       0.053       0.057
           180.000      -0.034      -0.039      -0.037      -0.034      -0.033      -0.030      -0.029      -0.029      -0.031      -0.033      -0.034      -0.037      -0.034
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          </tableData>
        </table>
      </product>
    </function>
    <function name="aero/pelvis/Fx">
      <description>localwind_x-axis_force_due_to_pelvis</description>
      <product>
        <property>aero/qbar-psf</property>
        <property>Creare/pelvis/area</property>
        <property>Creare/pelvis/length</property>
        <table>
          <independentVar lookup="row">aero/pelvis/alpha-deg</independentVar>
          <independentVar lookup="column">aero/pelvis/beta-deg</independentVar>
          <tableData>
                       -90.000     -75.000     -60.000     -45.000     -30.000     -15.000       0.000      15.000      30.000      45.000      60.000      75.000      90.000
          -180.000      -0.303      -0.333      -0.420      -0.475      -0.507      -0.505      -0.554      -0.514      -0.512      -0.485      -0.409      -0.333      -0.303
          -120.000      -0.317      -0.339      -0.360      -0.360      -0.368      -0.369      -0.079      -0.366      -0.374      -0.371      -0.363      -0.347      -0.317
           -60.000      -0.278      -0.263      -0.245      -0.181      -0.071      -0.007       0.005      -0.010      -0.079      -0.184      -0.247      -0.263      -0.278
             0.000      -0.303      -0.333      -0.420      -0.475      -0.507      -0.505      -0.554      -0.514      -0.512      -0.485      -0.409      -0.333      -0.303
            60.000      -0.317      -0.339      -0.360      -0.360      -0.368      -0.369      -0.079      -0.366      -0.374      -0.371      -0.363      -0.347      -0.317
           120.000      -0.278      -0.263      -0.245      -0.181      -0.071      -0.007       0.005      -0.010      -0.079      -0.184      -0.247      -0.263      -0.278
           180.000      -0.303      -0.333      -0.420      -0.475      -0.507      -0.505      -0.554      -0.514      -0.512      -0.485      -0.409      -0.333      -0.303
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          </tableData>
        </table>
      </product>
    </function>
    <function name="aero/pelvis/Fy">
      <description>localwind_y-axis_force_due_to_pelvis</description>
      <product>
        <property>aero/qbar-psf</property>
        <property>Creare/pelvis/area</property>
        <property>Creare/pelvis/length</property>
        <table>
          <independentVar lookup="row">aero/pelvis/alpha-deg</independentVar>
          <independentVar lookup="column">aero/pelvis/beta-deg</independentVar>
          <tableData>
                       -90.000     -75.000     -60.000     -45.000     -30.000     -15.000       0.000      15.000      30.000      45.000      60.000      75.000      90.000
          -180.000       0.066      -0.025      -0.138      -0.210      -0.152      -0.079      -0.000       0.079       0.171       0.221       0.163       0.013      -0.066
          -120.000      -0.102      -0.142      -0.188      -0.198      -0.153      -0.094       0.002       0.098       0.177       0.199       0.214       0.160       0.102
           -60.000       0.198       0.193       0.180       0.190       0.180       0.108       0.001      -0.109      -0.179      -0.187      -0.175      -0.189      -0.198
             0.000       0.066      -0.025      -0.138      -0.210      -0.152      -0.079      -0.000       0.079       0.171       0.221       0.163       0.013      -0.066
            60.000      -0.102      -0.142      -0.188      -0.198      -0.153      -0.094       0.002       0.098       0.177       0.199       0.214       0.160       0.102
           120.000       0.198       0.193       0.180       0.190       0.180       0.108       0.001      -0.109      -0.179      -0.187      -0.175      -0.189      -0.198
           180.000       0.066      -0.025      -0.138      -0.210      -0.152      -0.079      -0.000       0.079       0.171       0.221       0.163       0.013      -0.066
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          </tableData>
        </table>
      </product>
    </function>
    <function name="aero/pelvis/Fz">
      <description>localwind_z-axis_force_due_to_pelvis</description>
      <product>
        <property>aero/qbar-psf</property>
        <property>Creare/pelvis/area</property>
        <property>Creare/pelvis/length</property>
        <table>
          <independentVar lookup="row">aero/pelvis/alpha-deg</independentVar>
          <independentVar lookup="column">aero/pelvis/beta-deg</independentVar>
          <tableData>
                       -90.000     -75.000     -60.000     -45.000     -30.000     -15.000       0.000      15.000      30.000      45.000      60.000      75.000      90.000
          -180.000       0.102       0.089       0.069       0.048       0.010      -0.004      -0.030      -0.022       0.015       0.039       0.081       0.100       0.102
          -120.000       0.281       0.365       0.445       0.472       0.423       0.374      -0.077       0.361       0.443       0.469       0.472       0.390       0.281
           -60.000       0.491       0.442       0.414       0.415       0.285       0.182       0.081       0.174       0.286       0.397       0.409       0.449       0.491
             0.000       0.102       0.089       0.069       0.048       0.010      -0.004      -0.030      -0.022       0.015       0.039       0.081       0.100       0.102
            60.000       0.281       0.365       0.445       0.472       0.423       0.374      -0.077       0.361       0.443       0.469       0.472       0.390       0.281
           120.000       0.491       0.442       0.414       0.415       0.285       0.182       0.081       0.174       0.286       0.397       0.409       0.449       0.491
           180.000       0.102       0.089       0.069       0.048       0.010      -0.004      -0.030      -0.022       0.015       0.039       0.081       0.100       0.102
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          </tableData>
        </table>
      </product>
    </function>
    <function name="aero/pelvis/Mx-lwf">
      <description>localwind_x-axis_moment_due_to_pelvis</description>
      <product>
        <property>aero/qbar-psf</property>
        <property>Creare/pelvis/area</property>
        <property>Creare/pelvis/length</property>
        <table>
          <independentVar lookup="row">aero/pelvis/alpha-deg</independentVar>
          <independentVar lookup="column">aero/pelvis/beta-deg</independentVar>
          <tableData>
                       -90.000     -75.000     -60.000     -45.000     -30.000     -15.000       0.000      15.000      30.000      45.000      60.000      75.000      90.000
          -180.000       0.004      -0.005      -0.003      -0.001      -0.002       0.001       0.000       0.000       0.000      -0.002       0.002       0.008       0.004
          -120.000       0.022      -0.021      -0.025      -0.022      -0.019      -0.011      -0.001       0.008       0.020       0.022       0.021       0.018       0.022
           -60.000      -0.006       0.001      -0.008      -0.017      -0.002       0.002      -0.001      -0.004       0.002       0.014       0.008      -0.001      -0.006
             0.000       0.004      -0.005      -0.003      -0.001      -0.002       0.001       0.000       0.000       0.000      -0.002       0.002       0.008       0.004
            60.000       0.022      -0.021      -0.025      -0.022      -0.019      -0.011      -0.001       0.008       0.020       0.022       0.021       0.018       0.022
           120.000      -0.006       0.001      -0.008      -0.017      -0.002       0.002      -0.001      -0.004       0.002       0.014       0.008      -0.001      -0.006
           180.000       0.004      -0.005      -0.003      -0.001      -0.002       0.001       0.000       0.000       0.000      -0.002       0.002       0.008       0.004
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          </tableData>
        </table>
      </product>
    </function>
    <function name="aero/pelvis/My-lwf">
      <description>localwind_y-axis_moment_due_to_pelvis</description>
      <product>
        <property>aero/qbar-psf</property>
        <property>Creare/pelvis/area</property>
        <property>Creare/pelvis/length</property>
        <table>
          <independentVar lookup="row">aero/pelvis/alpha-deg</independentVar>
          <independentVar lookup="column">aero/pelvis/beta-deg</independentVar>
          <tableData>
                       -90.000     -75.000     -60.000     -45.000     -30.000     -15.000       0.000      15.000      30.000      45.000      60.000      75.000      90.000
          -180.000      -0.012      -0.015      -0.017      -0.015      -0.015      -0.018      -0.018      -0.019      -0.015      -0.016      -0.016      -0.013      -0.012
          -120.000      -0.024      -0.032      -0.035      -0.036      -0.029      -0.027      -0.015      -0.025      -0.033      -0.040      -0.036      -0.034      -0.024
           -60.000      -0.029      -0.021      -0.013       0.000       0.011       0.006       0.007       0.006       0.010       0.001      -0.016      -0.021      -0.029
             0.000      -0.012      -0.015      -0.017      -0.015      -0.015      -0.018      -0.018      -0.019      -0.015      -0.016      -0.016      -0.013      -0.012
            60.000      -0.024      -0.032      -0.035      -0.036      -0.029      -0.027      -0.015      -0.025      -0.033      -0.040      -0.036      -0.034      -0.024
           120.000      -0.029      -0.021      -0.013       0.000       0.011       0.006       0.007       0.006       0.010       0.001      -0.016      -0.021      -0.029
           180.000      -0.012      -0.015      -0.017      -0.015      -0.015      -0.018      -0.018      -0.019      -0.015      -0.016      -0.016      -0.013      -0.012
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          </tableData>
        </table>
      </product>
    </function>
    <function name="aero/pelvis/Mz-lwf">
      <description>localwind_z-axis_moment_due_to_pelvis</description>
      <product>
        <property>aero/qbar-psf</property>
        <property>Creare/pelvis/area</property>
        <property>Creare/pelvis/length</property>
        <table>
          <independentVar lookup="row">aero/pelvis/alpha-deg</independentVar>
          <independentVar lookup="column">aero/pelvis/beta-deg</independentVar>
          <tableData>
                       -90.000     -75.000     -60.000     -45.000     -30.000     -15.000       0.000      15.000      30.000      45.000      60.000      75.000      90.000
          -180.000      -0.001      -0.018      -0.042      -0.054      -0.047      -0.027      -0.001       0.028       0.047       0.056       0.044       0.020      -0.001
          -120.000      -0.003       0.000      -0.008      -0.011      -0.007      -0.005      -0.000       0.010       0.012       0.013       0.011       0.001      -0.003
           -60.000      -0.001      -0.001      -0.007      -0.013      -0.017      -0.012      -0.000       0.013       0.015       0.012       0.007       0.001      -0.001
             0.000      -0.001      -0.018      -0.042      -0.054      -0.047      -0.027      -0.001       0.028       0.047       0.056       0.044       0.020      -0.001
            60.000      -0.003       0.000      -0.008      -0.011      -0.007      -0.005      -0.000       0.010       0.012       0.013       0.011       0.001      -0.003
           120.000      -0.001      -0.001      -0.007      -0.013      -0.017      -0.012      -0.000       0.013       0.015       0.012       0.007       0.001      -0.001
           180.000      -0.001      -0.018      -0.042      -0.054      -0.047      -0.027      -0.001       0.028       0.047       0.056       0.044       0.020      -0.001
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          </tableData>
        </table>
      </product>
    </function>
    <function name="aero/right-forearm/Fx">
      <description>localwind_x-axis_force_due_to_right-forearm</description>
      <product>
        <property>aero/qbar-psf</property>
        <property>Creare/right-forearm/area</property>
        <property>Creare/right-forearm/length</property>
        <table>
          <independentVar lookup="row">aero/right-forearm/alpha-deg</independentVar>
          <independentVar lookup="column">aero/right-forearm/beta-deg</independentVar>
          <tableData>
                       -90.000     -75.000     -60.000     -45.000     -30.000     -15.000       0.000      15.000      30.000      45.000      60.000      75.000      90.000
          -180.000      -0.371      -0.388      -0.422      -0.447      -0.483      -0.495      -0.512      -0.478      -0.504      -0.467      -0.427      -0.402      -0.371
          -120.000      -0.337      -0.418      -0.420      -0.476      -0.383      -0.311      -0.234      -0.229      -0.295      -0.366      -0.392      -0.345      -0.337
           -60.000      -0.385      -0.380      -0.319      -0.243      -0.205      -0.192      -0.191      -0.217      -0.254      -0.280      -0.314      -0.361      -0.385
             0.000      -0.371      -0.388      -0.422      -0.447      -0.483      -0.495      -0.512      -0.478      -0.504      -0.467      -0.427      -0.402      -0.371
            60.000      -0.337      -0.418      -0.420      -0.476      -0.383      -0.311      -0.234      -0.229      -0.295      -0.366      -0.392      -0.345      -0.337
           120.000      -0.385      -0.380      -0.319      -0.243      -0.205      -0.192      -0.191      -0.217      -0.254      -0.280      -0.314      -0.361      -0.385
           180.000      -0.371      -0.388      -0.422      -0.447      -0.483      -0.495      -0.512      -0.478      -0.504      -0.467      -0.427      -0.402      -0.371
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          </tableData>
        </table>
      </product>
    </function>
    <function name="aero/right-forearm/Fy">
      <description>localwind_y-axis_force_due_to_right-forearm</description>
      <product>
        <property>aero/qbar-psf</property>
        <property>Creare/right-forearm/area</property>
        <property>Creare/right-forearm/length</property>
        <table>
          <independentVar lookup="row">aero/right-forearm/alpha-deg</independentVar>
          <independentVar lookup="column">aero/right-forearm/beta-deg</independentVar>
          <tableData>
                       -90.000     -75.000     -60.000     -45.000     -30.000     -15.000       0.000      15.000      30.000      45.000      60.000      75.000      90.000
          -180.000      -0.080       0.035      -0.007       0.018      -0.001       0.007       0.054       0.089       0.094       0.158       0.165       0.119       0.080
          -120.000      -0.001       0.148       0.200       0.303       0.142      -0.061       0.129       0.216       0.170      -0.065      -0.038       0.006       0.001
           -60.000       0.038      -0.004       0.026       0.040       0.013      -0.026      -0.062      -0.074      -0.089      -0.145      -0.116      -0.080      -0.038
             0.000      -0.080       0.035      -0.007       0.018      -0.001       0.007       0.054       0.089       0.094       0.158       0.165       0.119       0.080
            60.000      -0.001       0.148       0.200       0.303       0.142      -0.061       0.129       0.216       0.170      -0.065      -0.038       0.006       0.001
           120.000       0.038      -0.004       0.026       0.040       0.013      -0.026      -0.062      -0.074      -0.089      -0.145      -0.116      -0.080      -0.038
           180.000      -0.080       0.035      -0.007       0.018      -0.001       0.007       0.054       0.089       0.094       0.158       0.165       0.119       0.080
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          </tableData>
        </table>
      </product>
    </function>
    <function name="aero/right-forearm/Fz">
      <description>localwind_z-axis_force_due_to_right-forearm</description>
      <product>
        <property>aero/qbar-psf</property>
        <property>Creare/right-forearm/area</property>
        <property>Creare/right-forearm/length</property>
        <table>
          <independentVar lookup="row">aero/right-forearm/alpha-deg</independentVar>
          <independentVar lookup="column">aero/right-forearm/beta-deg</independentVar>
          <tableData>
                       -90.000     -75.000     -60.000     -45.000     -30.000     -15.000       0.000      15.000      30.000      45.000      60.000      75.000      90.000
          -180.000       0.109       0.117       0.131       0.110       0.089       0.065       0.076       0.075       0.079       0.101       0.115       0.124       0.109
          -120.000       0.247       0.148       0.233       0.346       0.521       0.546       0.386       0.463       0.612       0.472       0.450       0.358       0.247
           -60.000       0.274       0.062       0.014      -0.019      -0.086      -0.126      -0.124      -0.098      -0.042       0.087       0.156       0.213       0.274
             0.000       0.109       0.117       0.131       0.110       0.089       0.065       0.076       0.075       0.079       0.101       0.115       0.124       0.109
            60.000       0.247       0.148       0.233       0.346       0.521       0.546       0.386       0.463       0.612       0.472       0.450       0.358       0.247
           120.000       0.274       0.062       0.014      -0.019      -0.086      -0.126      -0.124      -0.098      -0.042       0.087       0.156       0.213       0.274
           180.000       0.109       0.117       0.131       0.110       0.089       0.065       0.076       0.075       0.079       0.101       0.115       0.124       0.109
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          </tableData>
        </table>
      </product>
    </function>
    <function name="aero/right-forearm/Mx-lwf">
      <description>localwind_x-axis_moment_due_to_right-forearm</description>
      <product>
        <property>aero/qbar-psf</property>
        <property>Creare/right-forearm/area</property>
        <property>Creare/right-forearm/length</property>
        <table>
          <independentVar lookup="row">aero/right-forearm/alpha-deg</independentVar>
          <independentVar lookup="column">aero/right-forearm/beta-deg</independentVar>
          <tableData>
                       -90.000     -75.000     -60.000     -45.000     -30.000     -15.000       0.000      15.000      30.000      45.000      60.000      75.000      90.000
          -180.000       0.012       0.033       0.041       0.039       0.036       0.027       0.011      -0.003      -0.014      -0.023      -0.019      -0.009       0.012
          -120.000      -0.006       0.018       0.035       0.068       0.069       0.032       0.001      -0.018      -0.056      -0.041      -0.047      -0.026      -0.006
           -60.000      -0.020       0.010       0.014       0.013       0.014       0.008      -0.008      -0.025      -0.033      -0.029      -0.033      -0.041      -0.020
             0.000       0.012       0.033       0.041       0.039       0.036       0.027       0.011      -0.003      -0.014      -0.023      -0.019      -0.009       0.012
            60.000      -0.006       0.018       0.035       0.068       0.069       0.032       0.001      -0.018      -0.056      -0.041      -0.047      -0.026      -0.006
           120.000      -0.020       0.010       0.014       0.013       0.014       0.008      -0.008      -0.025      -0.033      -0.029      -0.033      -0.041      -0.020
           180.000       0.012       0.033       0.041       0.039       0.036       0.027       0.011      -0.003      -0.014      -0.023      -0.019      -0.009       0.012
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          </tableData>
        </table>
      </product>
    </function>
    <function name="aero/right-forearm/My-lwf">
      <description>localwind_y-axis_moment_due_to_right-forearm</description>
      <product>
        <property>aero/qbar-psf</property>
        <property>Creare/right-forearm/area</property>
        <property>Creare/right-forearm/length</property>
        <table>
          <independentVar lookup="row">aero/right-forearm/alpha-deg</independentVar>
          <independentVar lookup="column">aero/right-forearm/beta-deg</independentVar>
          <tableData>
                       -90.000     -75.000     -60.000     -45.000     -30.000     -15.000       0.000      15.000      30.000      45.000      60.000      75.000      90.000
          -180.000       0.026       0.031       0.041       0.048       0.053       0.058       0.056       0.052       0.046       0.042       0.033       0.026       0.026
          -120.000       0.048      -0.005       0.010       0.056       0.094       0.080       0.061       0.069       0.081       0.088       0.085       0.068       0.048
           -60.000       0.037      -0.004       0.001       0.006       0.013       0.024       0.033       0.030       0.030       0.015       0.014       0.025       0.037
             0.000       0.026       0.031       0.041       0.048       0.053       0.058       0.056       0.052       0.046       0.042       0.033       0.026       0.026
            60.000       0.048      -0.005       0.010       0.056       0.094       0.080       0.061       0.069       0.081       0.088       0.085       0.068       0.048
           120.000       0.037      -0.004       0.001       0.006       0.013       0.024       0.033       0.030       0.030       0.015       0.014       0.025       0.037
           180.000       0.026       0.031       0.041       0.048       0.053       0.058       0.056       0.052       0.046       0.042       0.033       0.026       0.026
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          </tableData>
        </table>
      </product>
    </function>
    <function name="aero/right-forearm/Mz-lwf">
      <description>localwind_z-axis_moment_due_to_right-forearm</description>
      <product>
        <property>aero/qbar-psf</property>
        <property>Creare/right-forearm/area</property>
        <property>Creare/right-forearm/length</property>
        <table>
          <independentVar lookup="row">aero/right-forearm/alpha-deg</independentVar>
          <independentVar lookup="column">aero/right-forearm/beta-deg</independentVar>
          <tableData>
                       -90.000     -75.000     -60.000     -45.000     -30.000     -15.000       0.000      15.000      30.000      45.000      60.000      75.000      90.000
          -180.000      -0.028      -0.025      -0.032      -0.039      -0.044      -0.054      -0.056      -0.055      -0.052      -0.051      -0.043      -0.033      -0.028
          -120.000       0.009      -0.050      -0.069      -0.070      -0.070      -0.051      -0.056      -0.059      -0.079      -0.032      -0.014       0.005       0.009
           -60.000      -0.007       0.020       0.013       0.013       0.022       0.041       0.052       0.049       0.036       0.019       0.012       0.003      -0.007
             0.000      -0.028      -0.025      -0.032      -0.039      -0.044      -0.054      -0.056      -0.055      -0.052      -0.051      -0.043      -0.033      -0.028
            60.000       0.009      -0.050      -0.069      -0.070      -0.070      -0.051      -0.056      -0.059      -0.079      -0.032      -0.014       0.005       0.009
           120.000      -0.007       0.020       0.013       0.013       0.022       0.041       0.052       0.049       0.036       0.019       0.012       0.003      -0.007
           180.000      -0.028      -0.025      -0.032      -0.039      -0.044      -0.054      -0.056      -0.055      -0.052      -0.051      -0.043      -0.033      -0.028
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          </tableData>
        </table>
      </product>
    </function>
    <function name="aero/right-lower-leg/Fx">
      <description>localwind_x-axis_force_due_to_right-lower-leg</description>
      <product>
        <property>aero/qbar-psf</property>
        <property>Creare/right-lower-leg/area</property>
        <property>Creare/right-lower-leg/length</property>
        <table>
          <independentVar lookup="row">aero/right-lower-leg/alpha-deg</independentVar>
          <independentVar lookup="column">aero/right-lower-leg/beta-deg</independentVar>
          <tableData>
                       -90.000     -75.000     -60.000     -45.000     -30.000     -15.000       0.000      15.000      30.000      45.000      60.000      75.000      90.000
          -180.000      -0.455      -0.490      -0.512      -0.546      -0.579      -0.535      -0.521      -0.534      -0.552      -0.528      -0.494      -0.485      -0.455
          -120.000      -0.459      -0.476      -0.552      -0.471      -0.343      -0.262      -0.205      -0.240      -0.397      -0.482      -0.511      -0.479      -0.459
           -60.000      -0.457      -0.435      -0.375      -0.322      -0.271      -0.229      -0.213      -0.243      -0.304      -0.369      -0.419      -0.460      -0.457
             0.000      -0.455      -0.490      -0.512      -0.546      -0.579      -0.535      -0.521      -0.534      -0.552      -0.528      -0.494      -0.485      -0.455
            60.000      -0.459      -0.476      -0.552      -0.471      -0.343      -0.262      -0.205      -0.240      -0.397      -0.482      -0.511      -0.479      -0.459
           120.000      -0.457      -0.435      -0.375      -0.322      -0.271      -0.229      -0.213      -0.243      -0.304      -0.369      -0.419      -0.460      -0.457
           180.000      -0.455      -0.490      -0.512      -0.546      -0.579      -0.535      -0.521      -0.534      -0.552      -0.528      -0.494      -0.485      -0.455
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          </tableData>
        </table>
      </product>
    </function>
    <function name="aero/right-lower-leg/Fy">
      <description>localwind_y-axis_force_due_to_right-lower-leg</description>
      <product>
        <property>aero/qbar-psf</property>
        <property>Creare/right-lower-leg/area</property>
        <property>Creare/right-lower-leg/length</property>
        <table>
          <independentVar lookup="row">aero/right-lower-leg/alpha-deg</independentVar>
          <independentVar lookup="column">aero/right-lower-leg/beta-deg</independentVar>
          <tableData>
                       -90.000     -75.000     -60.000     -45.000     -30.000     -15.000       0.000      15.000      30.000      45.000      60.000      75.000      90.000
          -180.000      -0.058      -0.022       0.025       0.031       0.105       0.059       0.003      -0.011      -0.018      -0.001       0.026       0.035       0.058
          -120.000       0.037       0.167       0.334       0.463       0.490       0.491      -0.210       0.055      -0.465      -0.322      -0.211      -0.132      -0.037
           -60.000      -0.131       0.018       0.085       0.096       0.086       0.048      -0.018      -0.077      -0.090      -0.095      -0.074       0.005       0.131
             0.000      -0.058      -0.022       0.025       0.031       0.105       0.059       0.003      -0.011      -0.018      -0.001       0.026       0.035       0.058
            60.000       0.037       0.167       0.334       0.463       0.490       0.491      -0.210       0.055      -0.465      -0.322      -0.211      -0.132      -0.037
           120.000      -0.131       0.018       0.085       0.096       0.086       0.048      -0.018      -0.077      -0.090      -0.095      -0.074       0.005       0.131
           180.000      -0.058      -0.022       0.025       0.031       0.105       0.059       0.003      -0.011      -0.018      -0.001       0.026       0.035       0.058
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          </tableData>
        </table>
      </product>
    </function>
    <function name="aero/right-lower-leg/Fz">
      <description>localwind_z-axis_force_due_to_right-lower-leg</description>
      <product>
        <property>aero/qbar-psf</property>
        <property>Creare/right-lower-leg/area</property>
        <property>Creare/right-lower-leg/length</property>
        <table>
          <independentVar lookup="row">aero/right-lower-leg/alpha-deg</independentVar>
          <independentVar lookup="column">aero/right-lower-leg/beta-deg</independentVar>
          <tableData>
                       -90.000     -75.000     -60.000     -45.000     -30.000     -15.000       0.000      15.000      30.000      45.000      60.000      75.000      90.000
          -180.000       0.081       0.128       0.144       0.208       0.218       0.209       0.196       0.200       0.206       0.160       0.121       0.089       0.081
          -120.000       0.132       0.180       0.197       0.076       0.133       0.260       0.343       0.443       0.188       0.247       0.303       0.189       0.132
           -60.000       0.044      -0.018      -0.041      -0.079      -0.094      -0.095      -0.100      -0.097      -0.092      -0.089      -0.039       0.011       0.044
             0.000       0.081       0.128       0.144       0.208       0.218       0.209       0.196       0.200       0.206       0.160       0.121       0.089       0.081
            60.000       0.132       0.180       0.197       0.076       0.133       0.260       0.343       0.443       0.188       0.247       0.303       0.189       0.132
           120.000       0.044      -0.018      -0.041      -0.079      -0.094      -0.095      -0.100      -0.097      -0.092      -0.089      -0.039       0.011       0.044
           180.000       0.081       0.128       0.144       0.208       0.218       0.209       0.196       0.200       0.206       0.160       0.121       0.089       0.081
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          </tableData>
        </table>
      </product>
    </function>
    <function name="aero/right-lower-leg/Mx-lwf">
      <description>localwind_x-axis_moment_due_to_right-lower-leg</description>
      <product>
        <property>aero/qbar-psf</property>
        <property>Creare/right-lower-leg/area</property>
        <property>Creare/right-lower-leg/length</property>
        <table>
          <independentVar lookup="row">aero/right-lower-leg/alpha-deg</independentVar>
          <independentVar lookup="column">aero/right-lower-leg/beta-deg</independentVar>
          <tableData>
                       -90.000     -75.000     -60.000     -45.000     -30.000     -15.000       0.000      15.000      30.000      45.000      60.000      75.000      90.000
          -180.000      -0.002      -0.001      -0.005       0.000      -0.015      -0.009       0.010       0.012       0.007       0.004       0.002       0.006      -0.002
          -120.000       0.011      -0.017      -0.037      -0.068      -0.041      -0.015       0.003       0.026       0.058       0.077       0.036       0.018       0.011
           -60.000      -0.015      -0.002      -0.004      -0.004      -0.001      -0.002      -0.001       0.002       0.002       0.005       0.002      -0.006      -0.015
             0.000      -0.002      -0.001      -0.005       0.000      -0.015      -0.009       0.010       0.012       0.007       0.004       0.002       0.006      -0.002
            60.000       0.011      -0.017      -0.037      -0.068      -0.041      -0.015       0.003       0.026       0.058       0.077       0.036       0.018       0.011
           120.000      -0.015      -0.002      -0.004      -0.004      -0.001      -0.002      -0.001       0.002       0.002       0.005       0.002      -0.006      -0.015
           180.000      -0.002      -0.001      -0.005       0.000      -0.015      -0.009       0.010       0.012       0.007       0.004       0.002       0.006      -0.002
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          </tableData>
        </table>
      </product>
    </function>
    <function name="aero/right-lower-leg/My-lwf">
      <description>localwind_y-axis_moment_due_to_right-lower-leg</description>
      <product>
        <property>aero/qbar-psf</property>
        <property>Creare/right-lower-leg/area</property>
        <property>Creare/right-lower-leg/length</property>
        <table>
          <independentVar lookup="row">aero/right-lower-leg/alpha-deg</independentVar>
          <independentVar lookup="column">aero/right-lower-leg/beta-deg</independentVar>
          <tableData>
                       -90.000     -75.000     -60.000     -45.000     -30.000     -15.000       0.000      15.000      30.000      45.000      60.000      75.000      90.000
          -180.000      -0.029      -0.041      -0.047      -0.060      -0.068      -0.061      -0.053      -0.053      -0.056      -0.048      -0.038      -0.036      -0.029
          -120.000       0.016      -0.059      -0.057      -0.034      -0.024      -0.012       0.002       0.042       0.067       0.069       0.038       0.025       0.016
           -60.000       0.012      -0.045      -0.041      -0.042      -0.038      -0.032      -0.021      -0.011      -0.002       0.005       0.007       0.008       0.012
             0.000      -0.029      -0.041      -0.047      -0.060      -0.068      -0.061      -0.053      -0.053      -0.056      -0.048      -0.038      -0.036      -0.029
            60.000       0.016      -0.059      -0.057      -0.034      -0.024      -0.012       0.002       0.042       0.067       0.069       0.038       0.025       0.016
           120.000       0.012      -0.045      -0.041      -0.042      -0.038      -0.032      -0.021      -0.011      -0.002       0.005       0.007       0.008       0.012
           180.000      -0.029      -0.041      -0.047      -0.060      -0.068      -0.061      -0.053      -0.053      -0.056      -0.048      -0.038      -0.036      -0.029
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          </tableData>
        </table>
      </product>
    </function>
    <function name="aero/right-lower-leg/Mz-lwf">
      <description>localwind_z-axis_moment_due_to_right-lower-leg</description>
      <product>
        <property>aero/qbar-psf</property>
        <property>Creare/right-lower-leg/area</property>
        <property>Creare/right-lower-leg/length</property>
        <table>
          <independentVar lookup="row">aero/right-lower-leg/alpha-deg</independentVar>
          <independentVar lookup="column">aero/right-lower-leg/beta-deg</independentVar>
          <tableData>
                       -90.000     -75.000     -60.000     -45.000     -30.000     -15.000       0.000      15.000      30.000      45.000      60.000      75.000      90.000
          -180.000      -0.032      -0.037      -0.041      -0.054      -0.064      -0.060      -0.057      -0.062      -0.065      -0.058      -0.045      -0.041      -0.032
          -120.000      -0.050       0.024       0.036       0.066       0.052       0.020      -0.004      -0.019      -0.035      -0.049      -0.075      -0.063      -0.050
           -60.000       0.049      -0.008      -0.007      -0.003       0.006       0.013       0.021       0.033       0.037       0.039       0.040       0.044       0.049
             0.000      -0.032      -0.037      -0.041      -0.054      -0.064      -0.060      -0.057      -0.062      -0.065      -0.058      -0.045      -0.041      -0.032
            60.000      -0.050       0.024       0.036       0.066       0.052       0.020      -0.004      -0.019      -0.035      -0.049      -0.075      -0.063      -0.050
           120.000       0.049      -0.008      -0.007      -0.003       0.006       0.013       0.021       0.033       0.037       0.039       0.040       0.044       0.049
           180.000      -0.032      -0.037      -0.041      -0.054      -0.064      -0.060      -0.057      -0.062      -0.065      -0.058      -0.045      -0.041      -0.032
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          </tableData>
        </table>
      </product>
    </function>
    <function name="aero/right-upper-arm/Fx">
      <description>localwind_x-axis_force_due_to_right-upper-arm</description>
      <product>
        <property>aero/qbar-psf</property>
        <property>Creare/right-upper-arm/area</property>
        <property>Creare/right-upper-arm/length</property>
        <table>
          <independentVar lookup="row">aero/right-upper-arm/alpha-deg</independentVar>
          <independentVar lookup="column">aero/right-upper-arm/beta-deg</independentVar>
          <tableData>
                       -90.000     -75.000     -60.000     -45.000     -30.000     -15.000       0.000      15.000      30.000      45.000      60.000      75.000      90.000
          -180.000      -0.213      -0.261      -0.283      -0.316      -0.339      -0.369      -0.361      -0.344      -0.294      -0.249      -0.218      -0.216      -0.213
          -120.000      -0.091      -0.247      -0.268      -0.288      -0.273      -0.260      -0.228      -0.216      -0.251      -0.248      -0.163      -0.140      -0.091
           -60.000      -0.134      -0.126      -0.089      -0.065      -0.053      -0.077      -0.132      -0.134      -0.188      -0.151      -0.111      -0.157      -0.134
             0.000      -0.213      -0.261      -0.283      -0.316      -0.339      -0.369      -0.361      -0.344      -0.294      -0.249      -0.218      -0.216      -0.213
            60.000      -0.091      -0.247      -0.268      -0.288      -0.273      -0.260      -0.228      -0.216      -0.251      -0.248      -0.163      -0.140      -0.091
           120.000      -0.134      -0.126      -0.089      -0.065      -0.053      -0.077      -0.132      -0.134      -0.188      -0.151      -0.111      -0.157      -0.134
           180.000      -0.213      -0.261      -0.283      -0.316      -0.339      -0.369      -0.361      -0.344      -0.294      -0.249      -0.218      -0.216      -0.213
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          </tableData>
        </table>
      </product>
    </function>
    <function name="aero/right-upper-arm/Fy">
      <description>localwind_y-axis_force_due_to_right-upper-arm</description>
      <product>
        <property>aero/qbar-psf</property>
        <property>Creare/right-upper-arm/area</property>
        <property>Creare/right-upper-arm/length</property>
        <table>
          <independentVar lookup="row">aero/right-upper-arm/alpha-deg</independentVar>
          <independentVar lookup="column">aero/right-upper-arm/beta-deg</independentVar>
          <tableData>
                       -90.000     -75.000     -60.000     -45.000     -30.000     -15.000       0.000      15.000      30.000      45.000      60.000      75.000      90.000
          -180.000      -0.079       0.111       0.137       0.157       0.195       0.211      -0.076       0.249       0.209       0.178       0.128       0.094       0.079
          -120.000      -0.164       0.113       0.144       0.219       0.248       0.274       0.313       0.281       0.255       0.222       0.115       0.117       0.164
           -60.000       0.134      -0.092      -0.114      -0.115      -0.149      -0.204      -0.275      -0.250      -0.245      -0.287      -0.269      -0.228      -0.134
             0.000      -0.079       0.111       0.137       0.157       0.195       0.211      -0.076       0.249       0.209       0.178       0.128       0.094       0.079
            60.000      -0.164       0.113       0.144       0.219       0.248       0.274       0.313       0.281       0.255       0.222       0.115       0.117       0.164
           120.000       0.134      -0.092      -0.114      -0.115      -0.149      -0.204      -0.275      -0.250      -0.245      -0.287      -0.269      -0.228      -0.134
           180.000      -0.079       0.111       0.137       0.157       0.195       0.211      -0.076       0.249       0.209       0.178       0.128       0.094       0.079
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          </tableData>
        </table>
      </product>
    </function>
    <function name="aero/right-upper-arm/Fz">
      <description>localwind_z-axis_force_due_to_right-upper-arm</description>
      <product>
        <property>aero/qbar-psf</property>
        <property>Creare/right-upper-arm/area</property>
        <property>Creare/right-upper-arm/length</property>
        <table>
          <independentVar lookup="row">aero/right-upper-arm/alpha-deg</independentVar>
          <independentVar lookup="column">aero/right-upper-arm/beta-deg</independentVar>
          <tableData>
                       -90.000     -75.000     -60.000     -45.000     -30.000     -15.000       0.000      15.000      30.000      45.000      60.000      75.000      90.000
          -180.000       0.136       0.141       0.125       0.133       0.122       0.133       0.166       0.116       0.118       0.137       0.131       0.140       0.136
          -120.000       0.410       0.206       0.254       0.388       0.432       0.499       0.502       0.566       0.706       0.707       0.356       0.345       0.410
           -60.000       0.402       0.165       0.166       0.163       0.166       0.105       0.129       0.143       0.243       0.390       0.506       0.504       0.402
             0.000       0.136       0.141       0.125       0.133       0.122       0.133       0.166       0.116       0.118       0.137       0.131       0.140       0.136
            60.000       0.410       0.206       0.254       0.388       0.432       0.499       0.502       0.566       0.706       0.707       0.356       0.345       0.410
           120.000       0.402       0.165       0.166       0.163       0.166       0.105       0.129       0.143       0.243       0.390       0.506       0.504       0.402
           180.000       0.136       0.141       0.125       0.133       0.122       0.133       0.166       0.116       0.118       0.137       0.131       0.140       0.136
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          </tableData>
        </table>
      </product>
    </function>
    <function name="aero/right-upper-arm/Mx-lwf">
      <description>localwind_x-axis_moment_due_to_right-upper-arm</description>
      <product>
        <property>aero/qbar-psf</property>
        <property>Creare/right-upper-arm/area</property>
        <property>Creare/right-upper-arm/length</property>
        <table>
          <independentVar lookup="row">aero/right-upper-arm/alpha-deg</independentVar>
          <independentVar lookup="column">aero/right-upper-arm/beta-deg</independentVar>
          <tableData>
                       -90.000     -75.000     -60.000     -45.000     -30.000     -15.000       0.000      15.000      30.000      45.000      60.000      75.000      90.000
          -180.000       0.016       0.007      -0.000      -0.003      -0.012      -0.019       0.046      -0.027      -0.021      -0.011       0.007       0.010       0.016
          -120.000      -0.017      -0.002      -0.001       0.007       0.002      -0.010      -0.020      -0.028      -0.037      -0.048      -0.007      -0.003      -0.017
           -60.000       0.009       0.009       0.011       0.014       0.015       0.016       0.011      -0.003      -0.002       0.020       0.043       0.041       0.009
             0.000       0.016       0.007      -0.000      -0.003      -0.012      -0.019       0.046      -0.027      -0.021      -0.011       0.007       0.010       0.016
            60.000      -0.017      -0.002      -0.001       0.007       0.002      -0.010      -0.020      -0.028      -0.037      -0.048      -0.007      -0.003      -0.017
           120.000       0.009       0.009       0.011       0.014       0.015       0.016       0.011      -0.003      -0.002       0.020       0.043       0.041       0.009
           180.000       0.016       0.007      -0.000      -0.003      -0.012      -0.019       0.046      -0.027      -0.021      -0.011       0.007       0.010       0.016
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          </tableData>
        </table>
      </product>
    </function>
    <function name="aero/right-upper-arm/My-lwf">
      <description>localwind_y-axis_moment_due_to_right-upper-arm</description>
      <product>
        <property>aero/qbar-psf</property>
        <property>Creare/right-upper-arm/area</property>
        <property>Creare/right-upper-arm/length</property>
        <table>
          <independentVar lookup="row">aero/right-upper-arm/alpha-deg</independentVar>
          <independentVar lookup="column">aero/right-upper-arm/beta-deg</independentVar>
          <tableData>
                       -90.000     -75.000     -60.000     -45.000     -30.000     -15.000       0.000      15.000      30.000      45.000      60.000      75.000      90.000
          -180.000       0.014       0.027       0.031       0.036       0.040       0.045      -0.007       0.038       0.027       0.018       0.012       0.012       0.014
          -120.000       0.013      -0.007      -0.005       0.003       0.016       0.023       0.041       0.068       0.085       0.082       0.050       0.033       0.013
           -60.000       0.037       0.003       0.008       0.013       0.018       0.035       0.040       0.035       0.038       0.025       0.018       0.032       0.037
             0.000       0.014       0.027       0.031       0.036       0.040       0.045      -0.007       0.038       0.027       0.018       0.012       0.012       0.014
            60.000       0.013      -0.007      -0.005       0.003       0.016       0.023       0.041       0.068       0.085       0.082       0.050       0.033       0.013
           120.000       0.037       0.003       0.008       0.013       0.018       0.035       0.040       0.035       0.038       0.025       0.018       0.032       0.037
           180.000       0.014       0.027       0.031       0.036       0.040       0.045      -0.007       0.038       0.027       0.018       0.012       0.012       0.014
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          </tableData>
        </table>
      </product>
    </function>
    <function name="aero/right-upper-arm/Mz-lwf">
      <description>localwind_z-axis_moment_due_to_right-upper-arm</description>
      <product>
        <property>aero/qbar-psf</property>
        <property>Creare/right-upper-arm/area</property>
        <property>Creare/right-upper-arm/length</property>
        <table>
          <independentVar lookup="row">aero/right-upper-arm/alpha-deg</independentVar>
          <independentVar lookup="column">aero/right-upper-arm/beta-deg</independentVar>
          <tableData>
                       -90.000     -75.000     -60.000     -45.000     -30.000     -15.000       0.000      15.000      30.000      45.000      60.000      75.000      90.000
          -180.000      -0.014      -0.024      -0.025      -0.030      -0.034      -0.040       0.055      -0.034      -0.025      -0.017      -0.013      -0.012      -0.014
          -120.000       0.006      -0.042      -0.050      -0.076      -0.073      -0.083      -0.082      -0.072      -0.048      -0.029       0.007       0.009       0.006
           -60.000      -0.010      -0.003      -0.013      -0.012      -0.007       0.009       0.008       0.012       0.004      -0.019      -0.022      -0.016      -0.010
             0.000      -0.014      -0.024      -0.025      -0.030      -0.034      -0.040       0.055      -0.034      -0.025      -0.017      -0.013      -0.012      -0.014
            60.000       0.006      -0.042      -0.050      -0.076      -0.073      -0.083      -0.082      -0.072      -0.048      -0.029       0.007       0.009       0.006
           120.000      -0.010      -0.003      -0.013      -0.012      -0.007       0.009       0.008       0.012       0.004      -0.019      -0.022      -0.016      -0.010
           180.000      -0.014      -0.024      -0.025      -0.030      -0.034      -0.040       0.055      -0.034      -0.025      -0.017      -0.013      -0.012      -0.014
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          </tableData>
        </table>
      </product>
    </function>
    <function name="aero/right-upper-leg/Fx">
      <description>localwind_x-axis_force_due_to_right-upper-leg</description>
      <product>
        <property>aero/qbar-psf</property>
        <property>Creare/right-upper-leg/area</property>
        <property>Creare/right-upper-leg/length</property>
        <table>
          <independentVar lookup="row">aero/right-upper-leg/alpha-deg</independentVar>
          <independentVar lookup="column">aero/right-upper-leg/beta-deg</independentVar>
          <tableData>
                       -90.000     -75.000     -60.000     -45.000     -30.000     -15.000       0.000      15.000      30.000      45.000      60.000      75.000      90.000
          -180.000      -0.478      -0.476      -0.469      -0.458      -0.451      -0.438      -0.428      -0.426      -0.444      -0.455      -0.469      -0.484      -0.478
          -120.000      -0.485      -0.432      -0.414      -0.378      -0.318      -0.268      -0.252      -0.251      -0.289      -0.385      -0.456      -0.478      -0.485
           -60.000      -0.448      -0.375      -0.294      -0.195      -0.116      -0.071      -0.067      -0.081      -0.145      -0.262      -0.335      -0.423      -0.448
             0.000      -0.478      -0.476      -0.469      -0.458      -0.451      -0.438      -0.428      -0.426      -0.444      -0.455      -0.469      -0.484      -0.478
            60.000      -0.485      -0.432      -0.414      -0.378      -0.318      -0.268      -0.252      -0.251      -0.289      -0.385      -0.456      -0.478      -0.485
           120.000      -0.448      -0.375      -0.294      -0.195      -0.116      -0.071      -0.067      -0.081      -0.145      -0.262      -0.335      -0.423      -0.448
           180.000      -0.478      -0.476      -0.469      -0.458      -0.451      -0.438      -0.428      -0.426      -0.444      -0.455      -0.469      -0.484      -0.478
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          </tableData>
        </table>
      </product>
    </function>
    <function name="aero/right-upper-leg/Fy">
      <description>localwind_y-axis_force_due_to_right-upper-leg</description>
      <product>
        <property>aero/qbar-psf</property>
        <property>Creare/right-upper-leg/area</property>
        <property>Creare/right-upper-leg/length</property>
        <table>
          <independentVar lookup="row">aero/right-upper-leg/alpha-deg</independentVar>
          <independentVar lookup="column">aero/right-upper-leg/beta-deg</independentVar>
          <tableData>
                       -90.000     -75.000     -60.000     -45.000     -30.000     -15.000       0.000      15.000      30.000      45.000      60.000      75.000      90.000
          -180.000       0.034       0.092       0.098       0.090       0.088       0.058       0.031       0.012      -0.009      -0.032      -0.030      -0.032      -0.034
          -120.000       0.047       0.098       0.154       0.199       0.176       0.135       0.164       0.065      -0.063      -0.149      -0.139      -0.098      -0.047
           -60.000       0.036       0.123       0.137       0.127       0.094       0.082       0.001      -0.065      -0.130      -0.164      -0.163      -0.113      -0.036
             0.000       0.034       0.092       0.098       0.090       0.088       0.058       0.031       0.012      -0.009      -0.032      -0.030      -0.032      -0.034
            60.000       0.047       0.098       0.154       0.199       0.176       0.135       0.164       0.065      -0.063      -0.149      -0.139      -0.098      -0.047
           120.000       0.036       0.123       0.137       0.127       0.094       0.082       0.001      -0.065      -0.130      -0.164      -0.163      -0.113      -0.036
           180.000       0.034       0.092       0.098       0.090       0.088       0.058       0.031       0.012      -0.009      -0.032      -0.030      -0.032      -0.034
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          </tableData>
        </table>
      </product>
    </function>
    <function name="aero/right-upper-leg/Fz">
      <description>localwind_z-axis_force_due_to_right-upper-leg</description>
      <product>
        <property>aero/qbar-psf</property>
        <property>Creare/right-upper-leg/area</property>
        <property>Creare/right-upper-leg/length</property>
        <table>
          <independentVar lookup="row">aero/right-upper-leg/alpha-deg</independentVar>
          <independentVar lookup="column">aero/right-upper-leg/beta-deg</independentVar>
          <tableData>
                       -90.000     -75.000     -60.000     -45.000     -30.000     -15.000       0.000      15.000      30.000      45.000      60.000      75.000      90.000
          -180.000       0.061       0.079       0.079       0.073       0.060       0.054       0.050       0.045       0.046       0.051       0.057       0.064       0.061
          -120.000       0.075       0.153       0.219       0.312       0.379       0.423       0.423       0.482       0.424       0.312       0.247       0.167       0.075
           -60.000       0.237       0.182       0.125       0.094       0.102       0.116       0.088       0.099       0.110       0.109       0.160       0.195       0.237
             0.000       0.061       0.079       0.079       0.073       0.060       0.054       0.050       0.045       0.046       0.051       0.057       0.064       0.061
            60.000       0.075       0.153       0.219       0.312       0.379       0.423       0.423       0.482       0.424       0.312       0.247       0.167       0.075
           120.000       0.237       0.182       0.125       0.094       0.102       0.116       0.088       0.099       0.110       0.109       0.160       0.195       0.237
           180.000       0.061       0.079       0.079       0.073       0.060       0.054       0.050       0.045       0.046       0.051       0.057       0.064       0.061
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          </tableData>
        </table>
      </product>
    </function>
    <function name="aero/right-upper-leg/Mx-lwf">
      <description>localwind_x-axis_moment_due_to_right-upper-leg</description>
      <product>
        <property>aero/qbar-psf</property>
        <property>Creare/right-upper-leg/area</property>
        <property>Creare/right-upper-leg/length</property>
        <table>
          <independentVar lookup="row">aero/right-upper-leg/alpha-deg</independentVar>
          <independentVar lookup="column">aero/right-upper-leg/beta-deg</independentVar>
          <tableData>
                       -90.000     -75.000     -60.000     -45.000     -30.000     -15.000       0.000      15.000      30.000      45.000      60.000      75.000      90.000
          -180.000       0.020      -0.025      -0.025      -0.024      -0.022      -0.013      -0.006       0.003       0.013       0.019       0.023       0.023       0.020
          -120.000       0.038      -0.030      -0.029      -0.025      -0.010      -0.007      -0.001       0.009       0.019       0.028       0.030       0.041       0.038
           -60.000       0.001      -0.008      -0.009      -0.010      -0.011      -0.009      -0.000       0.009       0.011       0.008       0.004       0.000       0.001
             0.000       0.020      -0.025      -0.025      -0.024      -0.022      -0.013      -0.006       0.003       0.013       0.019       0.023       0.023       0.020
            60.000       0.038      -0.030      -0.029      -0.025      -0.010      -0.007      -0.001       0.009       0.019       0.028       0.030       0.041       0.038
           120.000       0.001      -0.008      -0.009      -0.010      -0.011      -0.009      -0.000       0.009       0.011       0.008       0.004       0.000       0.001
           180.000       0.020      -0.025      -0.025      -0.024      -0.022      -0.013      -0.006       0.003       0.013       0.019       0.023       0.023       0.020
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          </tableData>
        </table>
      </product>
    </function>
    <function name="aero/right-upper-leg/My-lwf">
      <description>localwind_y-axis_moment_due_to_right-upper-leg</description>
      <product>
        <property>aero/qbar-psf</property>
        <property>Creare/right-upper-leg/area</property>
        <property>Creare/right-upper-leg/length</property>
        <table>
          <independentVar lookup="row">aero/right-upper-leg/alpha-deg</independentVar>
          <independentVar lookup="column">aero/right-upper-leg/beta-deg</independentVar>
          <tableData>
                       -90.000     -75.000     -60.000     -45.000     -30.000     -15.000       0.000      15.000      30.000      45.000      60.000      75.000      90.000
          -180.000      -0.037      -0.039      -0.037      -0.034      -0.032      -0.030      -0.029      -0.029      -0.032      -0.034      -0.036      -0.040      -0.037
          -120.000       0.009      -0.054      -0.057      -0.060      -0.039      -0.042      -0.013       0.001       0.014       0.021       0.023       0.018       0.009
           -60.000       0.016      -0.050      -0.038      -0.023      -0.006       0.005       0.009       0.014       0.012       0.010       0.011       0.014       0.016
             0.000      -0.037      -0.039      -0.037      -0.034      -0.032      -0.030      -0.029      -0.029      -0.032      -0.034      -0.036      -0.040      -0.037
            60.000       0.009      -0.054      -0.057      -0.060      -0.039      -0.042      -0.013       0.001       0.014       0.021       0.023       0.018       0.009
           120.000       0.016      -0.050      -0.038      -0.023      -0.006       0.005       0.009       0.014       0.012       0.010       0.011       0.014       0.016
           180.000      -0.037      -0.039      -0.037      -0.034      -0.032      -0.030      -0.029      -0.029      -0.032      -0.034      -0.036      -0.040      -0.037
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          </tableData>
        </table>
      </product>
    </function>
    <function name="aero/right-upper-leg/Mz-lwf">
      <description>localwind_z-axis_moment_due_to_right-upper-leg</description>
      <product>
        <property>aero/qbar-psf</property>
        <property>Creare/right-upper-leg/area</property>
        <property>Creare/right-upper-leg/length</property>
        <table>
          <independentVar lookup="row">aero/right-upper-leg/alpha-deg</independentVar>
          <independentVar lookup="column">aero/right-upper-leg/beta-deg</independentVar>
          <tableData>
                       -90.000     -75.000     -60.000     -45.000     -30.000     -15.000       0.000      15.000      30.000      45.000      60.000      75.000      90.000
          -180.000      -0.034      -0.039      -0.037      -0.034      -0.033      -0.030      -0.029      -0.029      -0.031      -0.033      -0.034      -0.037      -0.034
          -120.000      -0.049       0.021       0.025       0.026       0.009      -0.007      -0.012      -0.039      -0.052      -0.055      -0.055      -0.050      -0.049
           -60.000       0.057      -0.015      -0.012      -0.010      -0.013      -0.018      -0.010      -0.002       0.014       0.037       0.043       0.053       0.057
             0.000      -0.034      -0.039      -0.037      -0.034      -0.033      -0.030      -0.029      -0.029      -0.031      -0.033      -0.034      -0.037      -0.034
            60.000      -0.049       0.021       0.025       0.026       0.009      -0.007      -0.012      -0.039      -0.052      -0.055      -0.055      -0.050      -0.049
           120.000       0.057      -0.015      -0.012      -0.010      -0.013      -0.018      -0.010      -0.002       0.014       0.037       0.043       0.053       0.057
           180.000      -0.034      -0.039      -0.037      -0.034      -0.033      -0.030      -0.029      -0.029      -0.031      -0.033      -0.034      -0.037      -0.034
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          </tableData>
        </table>
      </product>
    </function>
    <function name="aero/torso/Fx">
      <description>localwind_x-axis_force_due_to_torso</description>
      <product>
        <property>aero/qbar-psf</property>
        <property>Creare/torso/area</property>
        <property>Creare/torso/length</property>
        <table>
          <independentVar lookup="row">aero/torso/alpha-deg</independentVar>
          <independentVar lookup="column">aero/torso/beta-deg</independentVar>
          <tableData>
                       -90.000     -75.000     -60.000     -45.000     -30.000     -15.000       0.000      15.000      30.000      45.000      60.000      75.000      90.000
          -180.000      -0.283      -0.338      -0.448      -0.535      -0.657      -0.734      -0.745      -0.739      -0.655      -0.555      -0.441      -0.338      -0.283
          -120.000      -0.278      -0.259      -0.284      -0.295      -0.307      -0.322      -0.281      -0.319      -0.308      -0.292      -0.282      -0.259      -0.278
           -60.000      -0.277      -0.326      -0.392      -0.466      -0.434      -0.477      -0.222      -0.448      -0.418      -0.467      -0.378      -0.331      -0.277
             0.000      -0.283      -0.338      -0.448      -0.535      -0.657      -0.734      -0.745      -0.739      -0.655      -0.555      -0.441      -0.338      -0.283
            60.000      -0.278      -0.259      -0.284      -0.295      -0.307      -0.322      -0.281      -0.319      -0.308      -0.292      -0.282      -0.259      -0.278
           120.000      -0.277      -0.326      -0.392      -0.466      -0.434      -0.477      -0.222      -0.448      -0.418      -0.467      -0.378      -0.331      -0.277
           180.000      -0.283      -0.338      -0.448      -0.535      -0.657      -0.734      -0.745      -0.739      -0.655      -0.555      -0.441      -0.338      -0.283
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          </tableData>
        </table>
      </product>
    </function>
    <function name="aero/torso/Fy">
      <description>localwind_y-axis_force_due_to_torso</description>
      <product>
        <property>aero/qbar-psf</property>
        <property>Creare/torso/area</property>
        <property>Creare/torso/length</property>
        <table>
          <independentVar lookup="row">aero/torso/alpha-deg</independentVar>
          <independentVar lookup="column">aero/torso/beta-deg</independentVar>
          <tableData>
                       -90.000     -75.000     -60.000     -45.000     -30.000     -15.000       0.000      15.000      30.000      45.000      60.000      75.000      90.000
          -180.000       0.029      -0.215      -0.316      -0.228      -0.229      -0.143      -0.000       0.145       0.228       0.292       0.339       0.219      -0.029
          -120.000       0.102       0.076       0.026       0.013       0.011       0.011       0.001       0.005       0.009      -0.010      -0.035      -0.074      -0.102
           -60.000      -0.090      -0.108      -0.133      -0.249      -0.165      -0.020       0.009       0.100       0.140       0.206       0.110       0.101       0.090
             0.000       0.029      -0.215      -0.316      -0.228      -0.229      -0.143      -0.000       0.145       0.228       0.292       0.339       0.219      -0.029
            60.000       0.102       0.076       0.026       0.013       0.011       0.011       0.001       0.005       0.009      -0.010      -0.035      -0.074      -0.102
           120.000      -0.090      -0.108      -0.133      -0.249      -0.165      -0.020       0.009       0.100       0.140       0.206       0.110       0.101       0.090
           180.000       0.029      -0.215      -0.316      -0.228      -0.229      -0.143      -0.000       0.145       0.228       0.292       0.339       0.219      -0.029
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          </tableData>
        </table>
      </product>
    </function>
    <function name="aero/torso/Fz">
      <description>localwind_z-axis_force_due_to_torso</description>
      <product>
        <property>aero/qbar-psf</property>
        <property>Creare/torso/area</property>
        <property>Creare/torso/length</property>
        <table>
          <independentVar lookup="row">aero/torso/alpha-deg</independentVar>
          <independentVar lookup="column">aero/torso/beta-deg</independentVar>
          <tableData>
                       -90.000     -75.000     -60.000     -45.000     -30.000     -15.000       0.000      15.000      30.000      45.000      60.000      75.000      90.000
          -180.000      -0.105      -0.112      -0.126      -0.158      -0.152      -0.128      -0.120      -0.124      -0.138      -0.158      -0.131      -0.112      -0.105
          -120.000      -0.319      -0.195      -0.088      -0.019       0.100       0.170       0.244       0.174       0.098      -0.032      -0.098      -0.193      -0.319
           -60.000      -0.289      -0.404      -0.552      -0.739      -0.665      -0.610      -0.160      -0.601      -0.635      -0.688      -0.543      -0.426      -0.289
             0.000      -0.105      -0.112      -0.126      -0.158      -0.152      -0.128      -0.120      -0.124      -0.138      -0.158      -0.131      -0.112      -0.105
            60.000      -0.319      -0.195      -0.088      -0.019       0.100       0.170       0.244       0.174       0.098      -0.032      -0.098      -0.193      -0.319
           120.000      -0.289      -0.404      -0.552      -0.739      -0.665      -0.610      -0.160      -0.601      -0.635      -0.688      -0.543      -0.426      -0.289
           180.000      -0.105      -0.112      -0.126      -0.158      -0.152      -0.128      -0.120      -0.124      -0.138      -0.158      -0.131      -0.112      -0.105
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          </tableData>
        </table>
      </product>
    </function>
    <function name="aero/torso/Mx-lwf">
      <description>localwind_x-axis_moment_due_to_torso</description>
      <product>
        <property>aero/qbar-psf</property>
        <property>Creare/torso/area</property>
        <property>Creare/torso/length</property>
        <table>
          <independentVar lookup="row">aero/torso/alpha-deg</independentVar>
          <independentVar lookup="column">aero/torso/beta-deg</independentVar>
          <tableData>
                       -90.000     -75.000     -60.000     -45.000     -30.000     -15.000       0.000      15.000      30.000      45.000      60.000      75.000      90.000
          -180.000      -0.007       0.010       0.010       0.007       0.002       0.000       0.002      -0.001      -0.002      -0.010      -0.011      -0.012      -0.007
          -120.000       0.039      -0.029      -0.023      -0.022      -0.020      -0.009      -0.000       0.010       0.018       0.021       0.022       0.030       0.039
           -60.000      -0.050       0.054       0.064       0.060       0.037       0.008      -0.000      -0.014      -0.034      -0.057      -0.058      -0.054      -0.050
             0.000      -0.007       0.010       0.010       0.007       0.002       0.000       0.002      -0.001      -0.002      -0.010      -0.011      -0.012      -0.007
            60.000       0.039      -0.029      -0.023      -0.022      -0.020      -0.009      -0.000       0.010       0.018       0.021       0.022       0.030       0.039
           120.000      -0.050       0.054       0.064       0.060       0.037       0.008      -0.000      -0.014      -0.034      -0.057      -0.058      -0.054      -0.050
           180.000      -0.007       0.010       0.010       0.007       0.002       0.000       0.002      -0.001      -0.002      -0.010      -0.011      -0.012      -0.007
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          </tableData>
        </table>
      </product>
    </function>
    <function name="aero/torso/My-lwf">
      <description>localwind_y-axis_moment_due_to_torso</description>
      <product>
        <property>aero/qbar-psf</property>
        <property>Creare/torso/area</property>
        <property>Creare/torso/length</property>
        <table>
          <independentVar lookup="row">aero/torso/alpha-deg</independentVar>
          <independentVar lookup="column">aero/torso/beta-deg</independentVar>
          <tableData>
                       -90.000     -75.000     -60.000     -45.000     -30.000     -15.000       0.000      15.000      30.000      45.000      60.000      75.000      90.000
          -180.000      -0.019      -0.024      -0.023      -0.016      -0.009      -0.005       0.002      -0.004      -0.010      -0.016      -0.021      -0.022      -0.019
          -120.000       0.003      -0.009      -0.020      -0.025      -0.021      -0.025      -0.026      -0.025      -0.023      -0.026      -0.021      -0.009       0.003
           -60.000       0.001       0.006      -0.000       0.001       0.008       0.017       0.070       0.021       0.012       0.002      -0.001       0.005       0.001
             0.000      -0.019      -0.024      -0.023      -0.016      -0.009      -0.005       0.002      -0.004      -0.010      -0.016      -0.021      -0.022      -0.019
            60.000       0.003      -0.009      -0.020      -0.025      -0.021      -0.025      -0.026      -0.025      -0.023      -0.026      -0.021      -0.009       0.003
           120.000       0.001       0.006      -0.000       0.001       0.008       0.017       0.070       0.021       0.012       0.002      -0.001       0.005       0.001
           180.000      -0.019      -0.024      -0.023      -0.016      -0.009      -0.005       0.002      -0.004      -0.010      -0.016      -0.021      -0.022      -0.019
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          </tableData>
        </table>
      </product>
    </function>
    <function name="aero/torso/Mz-lwf">
      <description>localwind_z-axis_moment_due_to_torso</description>
      <product>
        <property>aero/qbar-psf</property>
        <property>Creare/torso/area</property>
        <property>Creare/torso/length</property>
        <table>
          <independentVar lookup="row">aero/torso/alpha-deg</independentVar>
          <independentVar lookup="column">aero/torso/beta-deg</independentVar>
          <tableData>
                       -90.000     -75.000     -60.000     -45.000     -30.000     -15.000       0.000      15.000      30.000      45.000      60.000      75.000      90.000
          -180.000      -0.001      -0.032      -0.046      -0.044      -0.038      -0.023       0.001       0.024       0.038       0.046       0.049       0.034      -0.001
          -120.000      -0.024       0.019       0.016       0.009       0.008       0.005       0.001      -0.003      -0.007      -0.009      -0.016      -0.021      -0.024
           -60.000       0.024      -0.029      -0.033      -0.028      -0.013      -0.001      -0.005       0.006       0.011       0.025       0.033       0.028       0.024
             0.000      -0.001      -0.032      -0.046      -0.044      -0.038      -0.023       0.001       0.024       0.038       0.046       0.049       0.034      -0.001
            60.000      -0.024       0.019       0.016       0.009       0.008       0.005       0.001      -0.003      -0.007      -0.009      -0.016      -0.021      -0.024
           120.000       0.024      -0.029      -0.033      -0.028      -0.013      -0.001      -0.005       0.006       0.011       0.025       0.033       0.028       0.024
           180.000      -0.001      -0.032      -0.046      -0.044      -0.038      -0.023       0.001       0.024       0.038       0.046       0.049       0.034      -0.001
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          </tableData>
        </table>
      </product>
    </function>
<function name="aero/torso/Drag">
  <product>
    <property>aero/torso/Fx</property>
    <value>-1</value>
  </product>
</function>

<function name="aero/pelvis/Drag">
  <product>
    <property>aero/pelvis/Fx</property>
    <value>-1</value>
  </product>
</function>

<function name="aero/head/Drag">
  <product>
    <property>aero/head/Fx</property>
    <value>-1</value>
  </product>
</function>

<function name="aero/right-upper-leg/Drag">
  <product>
    <property>aero/right-upper-leg/Fx</property>
    <value>-1</value>
  </product>
</function>

<function name="aero/left-upper-leg/Drag">
  <product>
    <property>aero/left-upper-leg/Fx</property>
    <value>-1</value>
  </product>
</function>

<function name="aero/right-lower-leg/Drag">
  <product>
    <property>aero/right-lower-leg/Fx</property>
    <value>-1</value>
  </product>
</function>

<function name="aero/left-lower-leg/Drag">
  <product>
    <property>aero/left-lower-leg/Fx</property>
    <value>-1</value>
  </product>
</function>

<function name="aero/right-upper-arm/Drag">
  <product>
    <property>aero/right-upper-arm/Fx</property>
    <value>-1</value>
  </product>
</function>

<function name="aero/left-upper-arm/Drag">
  <product>
    <property>aero/left-upper-arm/Fx</property>
    <value>-1</value>
  </product>
</function>

<function name="aero/right-forearm/Drag">
  <product>
    <property>aero/right-forearm/Fx</property>
    <value>-1</value>
  </product>
</function>

<function name="aero/left-forearm/Drag">
  <product>
    <property>aero/left-forearm/Fx</property>
    <value>-1</value>
  </product>
</function>


<function name="aero/torso/Sideforce">
  <sum>
    <product>
      <property>aero/torso/Fy</property>
      <cos>
        <product>
          <property>aero/torso/gamma-deg</property>
          <value>0.0174533</value>
        </product>
      </cos>
    </product>
    <product>
      <value>-1</value>
      <property>aero/torso/Fz</property>
      <sin>
        <product>
          <property>aero/torso/gamma-deg</property>
          <value>0.0174533</value>
        </product>
      </sin>
    </product>
  </sum>
</function>

<function name="aero/pelvis/Sideforce">
  <sum>
    <product>
      <property>aero/pelvis/Fy</property>
      <cos>
        <product>
          <property>aero/pelvis/gamma-deg</property>
          <value>0.0174533</value>
        </product>
      </cos>
    </product>
    <product>
      <value>-1</value>
      <property>aero/pelvis/Fz</property>
      <sin>
        <product>
          <property>aero/pelvis/gamma-deg</property>
          <value>0.0174533</value>
        </product>
      </sin>
    </product>
  </sum>
</function>

<function name="aero/head/Sideforce">
  <sum>
    <product>
      <property>aero/head/Fy</property>
      <cos>
        <product>
          <property>aero/head/gamma-deg</property>
          <value>0.0174533</value>
        </product>
      </cos>
    </product>
    <product>
      <value>-1</value>
      <property>aero/head/Fz</property>
      <sin>
        <product>
          <property>aero/head/gamma-deg</property>
          <value>0.0174533</value>
        </product>
      </sin>
    </product>
  </sum>
</function>

<function name="aero/right-upper-leg/Sideforce">
  <sum>
    <product>
      <property>aero/right-upper-leg/Fy</property>
      <cos>
        <product>
          <property>aero/right-upper-leg/gamma-deg</property>
          <value>0.0174533</value>
        </product>
      </cos>
    </product>
    <product>
      <value>-1</value>
      <property>aero/right-upper-leg/Fz</property>
      <sin>
        <product>
          <property>aero/right-upper-leg/gamma-deg</property>
          <value>0.0174533</value>
        </product>
      </sin>
    </product>
  </sum>
</function>

<function name="aero/left-upper-leg/Sideforce">
  <sum>
    <product>
      <property>aero/left-upper-leg/Fy</property>
      <cos>
        <product>
          <property>aero/left-upper-leg/gamma-deg</property>
          <value>0.0174533</value>
        </product>
      </cos>
    </product>
    <product>
      <value>-1</value>
      <property>aero/left-upper-leg/Fz</property>
      <sin>
        <product>
          <property>aero/left-upper-leg/gamma-deg</property>
          <value>0.0174533</value>
        </product>
      </sin>
    </product>
  </sum>
</function>
<function name="aero/right-lower-leg/Sideforce">
  <sum>
    <product>
      <property>aero/right-lower-leg/Fy</property>
      <cos>
        <product>
          <property>aero/right-lower-leg/gamma-deg</property>
          <value>0.0174533</value>
        </product>
      </cos>
    </product>
    <product>
      <value>-1</value>
      <property>aero/right-lower-leg/Fz</property>
      <sin>
        <product>
          <property>aero/right-lower-leg/gamma-deg</property>
          <value>0.0174533</value>
        </product>
      </sin>
    </product>
  </sum>
</function>

<function name="aero/left-lower-leg/Sideforce">
  <sum>
    <product>
      <property>aero/left-lower-leg/Fy</property>
      <cos>
        <product>
          <property>aero/left-lower-leg/gamma-deg</property>
          <value>0.0174533</value>
        </product>
      </cos>
    </product>
    <product>
      <value>-1</value>
      <property>aero/left-lower-leg/Fz</property>
      <sin>
        <product>
          <property>aero/left-lower-leg/gamma-deg</property>
          <value>0.0174533</value>
        </product>
      </sin>
    </product>
  </sum>
</function>

<function name="aero/right-upper-arm/Sideforce">
  <sum>
    <product>
      <property>aero/right-upper-arm/Fy</property>
      <cos>
        <product>
          <property>aero/right-upper-arm/gamma-deg</property>
          <value>0.0174533</value>
        </product>
      </cos>
    </product>
    <product>
      <value>-1</value>
      <property>aero/right-upper-arm/Fz</property>
      <sin>
        <product>
          <property>aero/right-upper-arm/gamma-deg</property>
          <value>0.0174533</value>
        </product>
      </sin>
    </product>
  </sum>
</function>

<function name="aero/left-upper-arm/Sideforce">
  <sum>
    <product>
      <property>aero/left-upper-arm/Fy</property>
      <cos>
        <product>
          <property>aero/left-upper-arm/gamma-deg</property>
          <value>0.0174533</value>
        </product>
      </cos>
    </product>
    <product>
      <value>-1</value>
      <property>aero/left-upper-arm/Fz</property>
      <sin>
        <product>
          <property>aero/left-upper-arm/gamma-deg</property>
          <value>0.0174533</value>
        </product>
      </sin>
    </product>
  </sum>
</function>

<function name="aero/right-forearm/Sideforce">
  <sum>
    <product>
      <property>aero/right-forearm/Fy</property>
      <cos>
        <product>
          <property>aero/right-forearm/gamma-deg</property>
          <value>0.0174533</value>
        </product>
      </cos>
    </product>
    <product>
      <value>-1</value>
      <property>aero/right-forearm/Fz</property>
      <sin>
        <product>
          <property>aero/right-forearm/gamma-deg</property>
          <value>0.0174533</value>
        </product>
      </sin>
    </product>
  </sum>
</function>

<function name="aero/left-forearm/Sideforce">
  <sum>
    <product>
      <property>aero/left-forearm/Fy</property>
      <cos>
        <product>
          <property>aero/left-forearm/gamma-deg</property>
          <value>0.0174533</value>
        </product>
      </cos>
    </product>
    <product>
      <value>-1</value>
      <property>aero/left-forearm/Fz</property>
      <sin>
        <product>
          <property>aero/left-forearm/gamma-deg</property>
          <value>0.0174533</value>
        </product>
      </sin>
    </product>
  </sum>
</function>


<function name="aero/torso/Lift">
  <sum>
    <product>
      <value>-1</value>
      <property>aero/torso/Fy</property>
      <sin>
        <product>
          <property>aero/torso/gamma-deg</property>
          <value>0.0174533</value>
        </product>
      </sin>
    </product>
    <product>
      <value>-1</value>
      <property>aero/torso/Fz</property>
      <cos>
        <product>
          <property>aero/torso/gamma-deg</property>
          <value>0.0174533</value>
        </product>
      </cos>
    </product>
  </sum>
</function>
<function name="aero/pelvis/Lift">
  <sum>
    <product>
      <value>-1</value>
      <property>aero/pelvis/Fy</property>
      <sin>
        <product>
          <property>aero/pelvis/gamma-deg</property>
          <value>0.0174533</value>
        </product>
      </sin>
    </product>
    <product>
      <value>-1</value>
      <property>aero/pelvis/Fz</property>
      <cos>
        <product>
          <property>aero/pelvis/gamma-deg</property>
          <value>0.0174533</value>
        </product>
      </cos>
    </product>
  </sum>
</function>
<function name="aero/head/Lift">
  <sum>
    <product>
      <value>-1</value>
      <property>aero/head/Fy</property>
      <sin>
        <product>
          <property>aero/head/gamma-deg</property>
          <value>0.0174533</value>
        </product>
      </sin>
    </product>
    <product>
      <value>-1</value>
      <property>aero/head/Fz</property>
      <cos>
        <product>
          <property>aero/head/gamma-deg</property>
          <value>0.0174533</value>
        </product>
      </cos>
    </product>
  </sum>
</function>
<function name="aero/right-upper-leg/Lift">
  <sum>
    <product>
      <value>-1</value>
      <property>aero/right-upper-leg/Fy</property>
      <sin>
        <product>
          <property>aero/right-upper-leg/gamma-deg</property>
          <value>0.0174533</value>
        </product>
      </sin>
    </product>
    <product>
      <value>-1</value>
      <property>aero/right-upper-leg/Fz</property>
      <cos>
        <product>
          <property>aero/right-upper-leg/gamma-deg</property>
          <value>0.0174533</value>
        </product>
      </cos>
    </product>
  </sum>
</function>
<function name="aero/left-upper-leg/Lift">
  <sum>
    <product>
      <value>-1</value>
      <property>aero/left-upper-leg/Fy</property>
      <sin>
        <product>
          <property>aero/left-upper-leg/gamma-deg</property>
          <value>0.0174533</value>
        </product>
      </sin>
    </product>
    <product>
      <value>-1</value>
      <property>aero/left-upper-leg/Fz</property>
      <cos>
        <product>
          <property>aero/left-upper-leg/gamma-deg</property>
          <value>0.0174533</value>
        </product>
      </cos>
    </product>
  </sum>
</function>
<function name="aero/right-lower-leg/Lift">
  <sum>
    <product>
      <value>-1</value>
      <property>aero/right-lower-leg/Fy</property>
      <sin>
        <product>
          <property>aero/right-lower-leg/gamma-deg</property>
          <value>0.0174533</value>
        </product>
      </sin>
    </product>
    <product>
      <value>-1</value>
      <property>aero/right-lower-leg/Fz</property>
      <cos>
        <product>
          <property>aero/right-lower-leg/gamma-deg</property>
          <value>0.0174533</value>
        </product>
      </cos>
    </product>
  </sum>
</function>
<function name="aero/left-lower-leg/Lift">
  <sum>
    <product>
      <value>-1</value>
      <property>aero/left-lower-leg/Fy</property>
      <sin>
        <product>
          <property>aero/left-lower-leg/gamma-deg</property>
          <value>0.0174533</value>
        </product>
      </sin>
    </product>
    <product>
      <value>-1</value>
      <property>aero/left-lower-leg/Fz</property>
      <cos>
        <product>
          <property>aero/left-lower-leg/gamma-deg</property>
          <value>0.0174533</value>
        </product>
      </cos>
    </product>
  </sum>
</function>
<function name="aero/right-upper-arm/Lift">
  <sum>
    <product>
      <value>-1</value>
      <property>aero/right-upper-arm/Fy</property>
      <sin>
        <product>
          <property>aero/right-upper-arm/gamma-deg</property>
          <value>0.0174533</value>
        </product>
      </sin>
    </product>
    <product>
      <value>-1</value>
      <property>aero/right-upper-arm/Fz</property>
      <cos>
        <product>
          <property>aero/right-upper-arm/gamma-deg</property>
          <value>0.0174533</value>
        </product>
      </cos>
    </product>
  </sum>
</function>
<function name="aero/left-upper-arm/Lift">
  <sum>
    <product>
      <value>-1</value>
      <property>aero/left-upper-arm/Fy</property>
      <sin>
        <product>
          <property>aero/left-upper-arm/gamma-deg</property>
          <value>0.0174533</value>
        </product>
      </sin>
    </product>
    <product>
      <value>-1</value>
      <property>aero/left-upper-arm/Fz</property>
      <cos>
        <product>
          <property>aero/left-upper-arm/gamma-deg</property>
          <value>0.0174533</value>
        </product>
      </cos>
    </product>
  </sum>
</function>
<function name="aero/right-forearm/Lift">
  <sum>
    <product>
      <value>-1</value>
      <property>aero/right-forearm/Fy</property>
      <sin>
        <product>
          <property>aero/right-forearm/gamma-deg</property>
          <value>0.0174533</value>
        </product>
      </sin>
    </product>
    <product>
      <value>-1</value>
      <property>aero/right-forearm/Fz</property>
      <cos>
        <product>
          <property>aero/right-forearm/gamma-deg</property>
          <value>0.0174533</value>
        </product>
      </cos>
    </product>
  </sum>
</function>
<function name="aero/left-forearm/Lift">
  <sum>
    <product>
      <value>-1</value>
      <property>aero/left-forearm/Fy</property>
      <sin>
        <product>
          <property>aero/left-forearm/gamma-deg</property>
          <value>0.0174533</value>
        </product>
      </sin>
    </product>
    <product>
      <value>-1</value>
      <property>aero/left-forearm/Fz</property>
      <cos>
        <product>
          <property>aero/left-forearm/gamma-deg</property>
          <value>0.0174533</value>
        </product>
      </cos>
    </product>
  </sum>
</function>

<function name="aero/torso/Mx-gwf">
  <product>
    <property>aero/torso/Mx-lwf</property>
    <value>1</value>
  </product>
</function>

<function name="aero/pelvis/Mx-gwf">
  <product>
    <property>aero/pelvis/Mx-lwf</property>
    <value>1</value>
  </product>
</function>

<function name="aero/head/Mx-gwf">
  <product>
    <property>aero/head/Mx-lwf</property>
    <value>1</value>
  </product>
</function>

<function name="aero/right-upper-leg/Mx-gwf">
  <product>
    <property>aero/right-upper-leg/Mx-lwf</property>
    <value>1</value>
  </product>
</function>

<function name="aero/left-upper-leg/Mx-gwf">
  <product>
    <property>aero/left-upper-leg/Mx-lwf</property>
    <value>1</value>
  </product>
</function>

<function name="aero/right-lower-leg/Mx-gwf">
  <product>
    <property>aero/right-lower-leg/Mx-lwf</property>
    <value>1</value>
  </product>
</function>

<function name="aero/left-lower-leg/Mx-gwf">
  <product>
    <property>aero/left-lower-leg/Mx-lwf</property>
    <value>1</value>
  </product>
</function>

<function name="aero/right-upper-arm/Mx-gwf">
  <product>
    <property>aero/right-upper-arm/Mx-lwf</property>
    <value>1</value>
  </product>
</function>

<function name="aero/left-upper-arm/Mx-gwf">
  <product>
    <property>aero/left-upper-arm/Mx-lwf</property>
    <value>1</value>
  </product>
</function>

<function name="aero/right-forearm/Mx-gwf">
  <product>
    <property>aero/right-forearm/Mx-lwf</property>
    <value>1</value>
  </product>
</function>

<function name="aero/left-forearm/Mx-gwf">
  <product>
    <property>aero/left-forearm/Mx-lwf</property>
    <value>1</value>
  </product>
</function>


<function name="aero/torso/My-gwf">
  <sum>
    <product>
      <property>aero/torso/My-lwf</property>
      <cos>
        <product>
          <property>aero/torso/gamma-deg</property>
          <value>0.0174533</value>
        </product>
      </cos>
    </product>
    <product>
      <value>-1</value>
      <property>aero/torso/Mz-lwf</property>
      <sin>
        <product>
          <property>aero/torso/gamma-deg</property>
          <value>0.0174533</value>
        </product>
      </sin>
    </product>
  </sum>
</function>
<function name="aero/pelvis/My-gwf">
  <sum>
    <product>
      <property>aero/pelvis/My-lwf</property>
      <cos>
        <product>
          <property>aero/pelvis/gamma-deg</property>
          <value>0.0174533</value>
        </product>
      </cos>
    </product>
    <product>
      <value>-1</value>
      <property>aero/pelvis/Mz-lwf</property>
      <sin>
        <product>
          <property>aero/pelvis/gamma-deg</property>
          <value>0.0174533</value>
        </product>
      </sin>
    </product>
  </sum>
</function>
<function name="aero/head/My-gwf">
  <sum>
    <product>
      <property>aero/head/My-lwf</property>
      <cos>
        <product>
          <property>aero/head/gamma-deg</property>
          <value>0.0174533</value>
        </product>
      </cos>
    </product>
    <product>
      <value>-1</value>
      <property>aero/head/Mz-lwf</property>
      <sin>
        <product>
          <property>aero/head/gamma-deg</property>
          <value>0.0174533</value>
        </product>
      </sin>
    </product>
  </sum>
</function>
<function name="aero/right-upper-leg/My-gwf">
  <sum>
    <product>
      <property>aero/right-upper-leg/My-lwf</property>
      <cos>
        <product>
          <property>aero/right-upper-leg/gamma-deg</property>
          <value>0.0174533</value>
        </product>
      </cos>
    </product>
    <product>
      <value>-1</value>
      <property>aero/right-upper-leg/Mz-lwf</property>
      <sin>
        <product>
          <property>aero/right-upper-leg/gamma-deg</property>
          <value>0.0174533</value>
        </product>
      </sin>
    </product>
  </sum>
</function>
<function name="aero/left-upper-leg/My-gwf">
  <sum>
    <product>
      <property>aero/left-upper-leg/My-lwf</property>
      <cos>
        <product>
          <property>aero/left-upper-leg/gamma-deg</property>
          <value>0.0174533</value>
        </product>
      </cos>
    </product>
    <product>
      <value>-1</value>
      <property>aero/left-upper-leg/Mz-lwf</property>
      <sin>
        <product>
          <property>aero/left-upper-leg/gamma-deg</property>
          <value>0.0174533</value>
        </product>
      </sin>
    </product>
  </sum>
</function>
<function name="aero/right-lower-leg/My-gwf">
  <sum>
    <product>
      <property>aero/right-lower-leg/My-lwf</property>
      <cos>
        <product>
          <property>aero/right-lower-leg/gamma-deg</property>
          <value>0.0174533</value>
        </product>
      </cos>
    </product>
    <product>
      <value>-1</value>
      <property>aero/right-lower-leg/Mz-lwf</property>
      <sin>
        <product>
          <property>aero/right-lower-leg/gamma-deg</property>
          <value>0.0174533</value>
        </product>
      </sin>
    </product>
  </sum>
</function>
<function name="aero/left-lower-leg/My-gwf">
  <sum>
    <product>
      <property>aero/left-lower-leg/My-lwf</property>
      <cos>
        <product>
          <property>aero/left-lower-leg/gamma-deg</property>
          <value>0.0174533</value>
        </product>
      </cos>
    </product>
    <product>
      <value>-1</value>
      <property>aero/left-lower-leg/Mz-lwf</property>
      <sin>
        <product>
          <property>aero/left-lower-leg/gamma-deg</property>
          <value>0.0174533</value>
        </product>
      </sin>
    </product>
  </sum>
</function>
<function name="aero/right-upper-arm/My-gwf">
  <sum>
    <product>
      <property>aero/right-upper-arm/My-lwf</property>
      <cos>
        <product>
          <property>aero/right-upper-arm/gamma-deg</property>
          <value>0.0174533</value>
        </product>
      </cos>
    </product>
    <product>
      <value>-1</value>
      <property>aero/right-upper-arm/Mz-lwf</property>
      <sin>
        <product>
          <property>aero/right-upper-arm/gamma-deg</property>
          <value>0.0174533</value>
        </product>
      </sin>
    </product>
  </sum>
</function>
<function name="aero/left-upper-arm/My-gwf">
  <sum>
    <product>
      <property>aero/left-upper-arm/My-lwf</property>
      <cos>
        <product>
          <property>aero/left-upper-arm/gamma-deg</property>
          <value>0.0174533</value>
        </product>
      </cos>
    </product>
    <product>
      <value>-1</value>
      <property>aero/left-upper-arm/Mz-lwf</property>
      <sin>
        <product>
          <property>aero/left-upper-arm/gamma-deg</property>
          <value>0.0174533</value>
        </product>
      </sin>
    </product>
  </sum>
</function>
<function name="aero/right-forearm/My-gwf">
  <sum>
    <product>
      <property>aero/right-forearm/My-lwf</property>
      <cos>
        <product>
          <property>aero/right-forearm/gamma-deg</property>
          <value>0.0174533</value>
        </product>
      </cos>
    </product>
    <product>
      <value>-1</value>
      <property>aero/right-forearm/Mz-lwf</property>
      <sin>
        <product>
          <property>aero/right-forearm/gamma-deg</property>
          <value>0.0174533</value>
        </product>
      </sin>
    </product>
  </sum>
</function>
<function name="aero/left-forearm/My-gwf">
  <sum>
    <product>
      <property>aero/left-forearm/My-lwf</property>
      <cos>
        <product>
          <property>aero/left-forearm/gamma-deg</property>
          <value>0.0174533</value>
        </product>
      </cos>
    </product>
    <product>
      <value>-1</value>
      <property>aero/left-forearm/Mz-lwf</property>
      <sin>
        <product>
          <property>aero/left-forearm/gamma-deg</property>
          <value>0.0174533</value>
        </product>
      </sin>
    </product>
  </sum>
</function>

<function name="aero/torso/Mz-gwf">
  <sum>
    <product>
      <property>aero/torso/My-lwf</property>
      <sin>
        <product>
          <property>aero/torso/gamma-deg</property>
          <value>0.0174533</value>
        </product>
      </sin>
    </product>
    <product>
      <property>aero/torso/Mz-lwf</property>
      <cos>
        <product>
          <property>aero/torso/gamma-deg</property>
          <value>0.0174533</value>
        </product>
      </cos>
    </product>
  </sum>
</function>
<function name="aero/pelvis/Mz-gwf">
  <sum>
    <product>
      <property>aero/pelvis/My-lwf</property>
      <sin>
        <product>
          <property>aero/pelvis/gamma-deg</property>
          <value>0.0174533</value>
        </product>
      </sin>
    </product>
    <product>
      <property>aero/pelvis/Mz-lwf</property>
      <cos>
        <product>
          <property>aero/pelvis/gamma-deg</property>
          <value>0.0174533</value>
        </product>
      </cos>
    </product>
  </sum>
</function>
<function name="aero/head/Mz-gwf">
  <sum>
    <product>
      <property>aero/head/My-lwf</property>
      <sin>
        <product>
          <property>aero/head/gamma-deg</property>
          <value>0.0174533</value>
        </product>
      </sin>
    </product>
    <product>
      <property>aero/head/Mz-lwf</property>
      <cos>
        <product>
          <property>aero/head/gamma-deg</property>
          <value>0.0174533</value>
        </product>
      </cos>
    </product>
  </sum>
</function>
<function name="aero/right-upper-leg/Mz-gwf">
  <sum>
    <product>
      <property>aero/right-upper-leg/My-lwf</property>
      <sin>
        <product>
          <property>aero/right-upper-leg/gamma-deg</property>
          <value>0.0174533</value>
        </product>
      </sin>
    </product>
    <product>
      <property>aero/right-upper-leg/Mz-lwf</property>
      <cos>
        <product>
          <property>aero/right-upper-leg/gamma-deg</property>
          <value>0.0174533</value>
        </product>
      </cos>
    </product>
  </sum>
</function>
<function name="aero/left-upper-leg/Mz-gwf">
  <sum>
    <product>
      <property>aero/left-upper-leg/My-lwf</property>
      <sin>
        <product>
          <property>aero/left-upper-leg/gamma-deg</property>
          <value>0.0174533</value>
        </product>
      </sin>
    </product>
    <product>
      <property>aero/left-upper-leg/Mz-lwf</property>
      <cos>
        <product>
          <property>aero/left-upper-leg/gamma-deg</property>
          <value>0.0174533</value>
        </product>
      </cos>
    </product>
  </sum>
</function>
<function name="aero/right-lower-leg/Mz-gwf">
  <sum>
    <product>
      <property>aero/right-lower-leg/My-lwf</property>
      <sin>
        <product>
          <property>aero/right-lower-leg/gamma-deg</property>
          <value>0.0174533</value>
        </product>
      </sin>
    </product>
    <product>
      <property>aero/right-lower-leg/Mz-lwf</property>
      <cos>
        <product>
          <property>aero/right-lower-leg/gamma-deg</property>
          <value>0.0174533</value>
        </product>
      </cos>
    </product>
  </sum>
</function>
<function name="aero/left-lower-leg/Mz-gwf">
  <sum>
    <product>
      <property>aero/left-lower-leg/My-lwf</property>
      <sin>
        <product>
          <property>aero/left-lower-leg/gamma-deg</property>
          <value>0.0174533</value>
        </product>
      </sin>
    </product>
    <product>
      <property>aero/left-lower-leg/Mz-lwf</property>
      <cos>
        <product>
          <property>aero/left-lower-leg/gamma-deg</property>
          <value>0.0174533</value>
        </product>
      </cos>
    </product>
  </sum>
</function>
<function name="aero/right-upper-arm/Mz-gwf">
  <sum>
    <product>
      <property>aero/right-upper-arm/My-lwf</property>
      <sin>
        <product>
          <property>aero/right-upper-arm/gamma-deg</property>
          <value>0.0174533</value>
        </product>
      </sin>
    </product>
    <product>
      <property>aero/right-upper-arm/Mz-lwf</property>
      <cos>
        <product>
          <property>aero/right-upper-arm/gamma-deg</property>
          <value>0.0174533</value>
        </product>
      </cos>
    </product>
  </sum>
</function>
<function name="aero/left-upper-arm/Mz-gwf">
  <sum>
    <product>
      <property>aero/left-upper-arm/My-lwf</property>
      <sin>
        <product>
          <property>aero/left-upper-arm/gamma-deg</property>
          <value>0.0174533</value>
        </product>
      </sin>
    </product>
    <product>
      <property>aero/left-upper-arm/Mz-lwf</property>
      <cos>
        <product>
          <property>aero/left-upper-arm/gamma-deg</property>
          <value>0.0174533</value>
        </product>
      </cos>
    </product>
  </sum>
</function>
<function name="aero/right-forearm/Mz-gwf">
  <sum>
    <product>
      <property>aero/right-forearm/My-lwf</property>
      <sin>
        <product>
          <property>aero/right-forearm/gamma-deg</property>
          <value>0.0174533</value>
        </product>
      </sin>
    </product>
    <product>
      <property>aero/right-forearm/Mz-lwf</property>
      <cos>
        <product>
          <property>aero/right-forearm/gamma-deg</property>
          <value>0.0174533</value>
        </product>
      </cos>
    </product>
  </sum>
</function>
<function name="aero/left-forearm/Mz-gwf">
  <sum>
    <product>
      <property>aero/left-forearm/My-lwf</property>
      <sin>
        <product>
          <property>aero/left-forearm/gamma-deg</property>
          <value>0.0174533</value>
        </product>
      </sin>
    </product>
    <product>
      <property>aero/left-forearm/Mz-lwf</property>
      <cos>
        <product>
          <property>aero/left-forearm/gamma-deg</property>
          <value>0.0174533</value>
        </product>
      </cos>
    </product>
  </sum>
</function>

<function name="aero/torso/cg-gwf-x">
  <description>Location of torso cg in the global wind axes with origin of the local body frame, x-component</description>
  <rotation_bf_to_wf>
    <property>Creare/torso/cg-lbf-x</property>
    <property>Creare/torso/cg-lbf-y</property>
    <property>Creare/torso/cg-lbf-z</property>
    <property>aero/torso/alpha-deg</property>
    <property>aero/torso/beta-deg</property>
    <property>aero/torso/gamma-deg</property>
    <value>1</value>
  </rotation_bf_to_wf>
</function>
<function name="aero/torso/cg-gwf-y">
  <description>Location of torso cg in the global wind axes with origin of the local body frame, y-component</description>
  <rotation_bf_to_wf>
    <property>Creare/torso/cg-lbf-x</property>
    <property>Creare/torso/cg-lbf-y</property>
    <property>Creare/torso/cg-lbf-z</property>
    <property>aero/torso/alpha-deg</property>
    <property>aero/torso/beta-deg</property>
    <property>aero/torso/gamma-deg</property>
    <value>2</value>
  </rotation_bf_to_wf>
</function>
<function name="aero/torso/cg-gwf-z">
  <description>Location of torso cg in the global wind axes with origin of the local body frame, z-component</description>
  <rotation_bf_to_wf>
    <property>Creare/torso/cg-lbf-x</property>
    <property>Creare/torso/cg-lbf-y</property>
    <property>Creare/torso/cg-lbf-z</property>
    <property>aero/torso/alpha-deg</property>
    <property>aero/torso/beta-deg</property>
    <property>aero/torso/gamma-deg</property>
    <value>3</value>
  </rotation_bf_to_wf>
</function>
<function name="aero/pelvis/cg-gwf-x">
  <description>Location of pelvis cg in the global wind axes with origin of the local body frame, x-component</description>
  <rotation_bf_to_wf>
    <property>Creare/pelvis/cg-lbf-x</property>
    <property>Creare/pelvis/cg-lbf-y</property>
    <property>Creare/pelvis/cg-lbf-z</property>
    <property>aero/pelvis/alpha-deg</property>
    <property>aero/pelvis/beta-deg</property>
    <property>aero/pelvis/gamma-deg</property>
    <value>1</value>
  </rotation_bf_to_wf>
</function>
<function name="aero/pelvis/cg-gwf-y">
  <description>Location of pelvis cg in the global wind axes with origin of the local body frame, y-component</description>
  <rotation_bf_to_wf>
    <property>Creare/pelvis/cg-lbf-x</property>
    <property>Creare/pelvis/cg-lbf-y</property>
    <property>Creare/pelvis/cg-lbf-z</property>
    <property>aero/pelvis/alpha-deg</property>
    <property>aero/pelvis/beta-deg</property>
    <property>aero/pelvis/gamma-deg</property>
    <value>2</value>
  </rotation_bf_to_wf>
</function>
<function name="aero/pelvis/cg-gwf-z">
  <description>Location of pelvis cg in the global wind axes with origin of the local body frame, z-component</description>
  <rotation_bf_to_wf>
    <property>Creare/pelvis/cg-lbf-x</property>
    <property>Creare/pelvis/cg-lbf-y</property>
    <property>Creare/pelvis/cg-lbf-z</property>
    <property>aero/pelvis/alpha-deg</property>
    <property>aero/pelvis/beta-deg</property>
    <property>aero/pelvis/gamma-deg</property>
    <value>3</value>
  </rotation_bf_to_wf>
</function>
<function name="aero/head/cg-gwf-x">
  <description>Location of head cg in the global wind axes with origin of the local body frame, x-component</description>
  <rotation_bf_to_wf>
    <property>Creare/head/cg-lbf-x</property>
    <property>Creare/head/cg-lbf-y</property>
    <property>Creare/head/cg-lbf-z</property>
    <property>aero/head/alpha-deg</property>
    <property>aero/head/beta-deg</property>
    <property>aero/head/gamma-deg</property>
    <value>1</value>
  </rotation_bf_to_wf>
</function>
<function name="aero/head/cg-gwf-y">
  <description>Location of head cg in the global wind axes with origin of the local body frame, y-component</description>
  <rotation_bf_to_wf>
    <property>Creare/head/cg-lbf-x</property>
    <property>Creare/head/cg-lbf-y</property>
    <property>Creare/head/cg-lbf-z</property>
    <property>aero/head/alpha-deg</property>
    <property>aero/head/beta-deg</property>
    <property>aero/head/gamma-deg</property>
    <value>2</value>
  </rotation_bf_to_wf>
</function>
<function name="aero/head/cg-gwf-z">
  <description>Location of head cg in the global wind axes with origin of the local body frame, z-component</description>
  <rotation_bf_to_wf>
    <property>Creare/head/cg-lbf-x</property>
    <property>Creare/head/cg-lbf-y</property>
    <property>Creare/head/cg-lbf-z</property>
    <property>aero/head/alpha-deg</property>
    <property>aero/head/beta-deg</property>
    <property>aero/head/gamma-deg</property>
    <value>3</value>
  </rotation_bf_to_wf>
</function>
<function name="aero/right-upper-leg/cg-gwf-x">
  <description>Location of right-upper-leg cg in the global wind axes with origin of the local body frame, x-component</description>
  <rotation_bf_to_wf>
    <property>Creare/right-upper-leg/cg-lbf-x</property>
    <property>Creare/right-upper-leg/cg-lbf-y</property>
    <property>Creare/right-upper-leg/cg-lbf-z</property>
    <property>aero/right-upper-leg/alpha-deg</property>
    <property>aero/right-upper-leg/beta-deg</property>
    <property>aero/right-upper-leg/gamma-deg</property>
    <value>1</value>
  </rotation_bf_to_wf>
</function>
<function name="aero/right-upper-leg/cg-gwf-y">
  <description>Location of right-upper-leg cg in the global wind axes with origin of the local body frame, y-component</description>
  <rotation_bf_to_wf>
    <property>Creare/right-upper-leg/cg-lbf-x</property>
    <property>Creare/right-upper-leg/cg-lbf-y</property>
    <property>Creare/right-upper-leg/cg-lbf-z</property>
    <property>aero/right-upper-leg/alpha-deg</property>
    <property>aero/right-upper-leg/beta-deg</property>
    <property>aero/right-upper-leg/gamma-deg</property>
    <value>2</value>
  </rotation_bf_to_wf>
</function>
<function name="aero/right-upper-leg/cg-gwf-z">
  <description>Location of right-upper-leg cg in the global wind axes with origin of the local body frame, z-component</description>
  <rotation_bf_to_wf>
    <property>Creare/right-upper-leg/cg-lbf-x</property>
    <property>Creare/right-upper-leg/cg-lbf-y</property>
    <property>Creare/right-upper-leg/cg-lbf-z</property>
    <property>aero/right-upper-leg/alpha-deg</property>
    <property>aero/right-upper-leg/beta-deg</property>
    <property>aero/right-upper-leg/gamma-deg</property>
    <value>3</value>
  </rotation_bf_to_wf>
</function>
<function name="aero/left-upper-leg/cg-gwf-x">
  <description>Location of left-upper-leg cg in the global wind axes with origin of the local body frame, x-component</description>
  <rotation_bf_to_wf>
    <property>Creare/left-upper-leg/cg-lbf-x</property>
    <property>Creare/left-upper-leg/cg-lbf-y</property>
    <property>Creare/left-upper-leg/cg-lbf-z</property>
    <property>aero/left-upper-leg/alpha-deg</property>
    <property>aero/left-upper-leg/beta-deg</property>
    <property>aero/left-upper-leg/gamma-deg</property>
    <value>1</value>
  </rotation_bf_to_wf>
</function>
<function name="aero/left-upper-leg/cg-gwf-y">
  <description>Location of left-upper-leg cg in the global wind axes with origin of the local body frame, y-component</description>
  <rotation_bf_to_wf>
    <property>Creare/left-upper-leg/cg-lbf-x</property>
    <property>Creare/left-upper-leg/cg-lbf-y</property>
    <property>Creare/left-upper-leg/cg-lbf-z</property>
    <property>aero/left-upper-leg/alpha-deg</property>
    <property>aero/left-upper-leg/beta-deg</property>
    <property>aero/left-upper-leg/gamma-deg</property>
    <value>2</value>
  </rotation_bf_to_wf>
</function>
<function name="aero/left-upper-leg/cg-gwf-z">
  <description>Location of left-upper-leg cg in the global wind axes with origin of the local body frame, z-component</description>
  <rotation_bf_to_wf>
    <property>Creare/left-upper-leg/cg-lbf-x</property>
    <property>Creare/left-upper-leg/cg-lbf-y</property>
    <property>Creare/left-upper-leg/cg-lbf-z</property>
    <property>aero/left-upper-leg/alpha-deg</property>
    <property>aero/left-upper-leg/beta-deg</property>
    <property>aero/left-upper-leg/gamma-deg</property>
    <value>3</value>
  </rotation_bf_to_wf>
</function>
<function name="aero/right-lower-leg/cg-gwf-x">
  <description>Location of right-lower-leg cg in the global wind axes with origin of the local body frame, x-component</description>
  <rotation_bf_to_wf>
    <property>Creare/right-lower-leg/cg-lbf-x</property>
    <property>Creare/right-lower-leg/cg-lbf-y</property>
    <property>Creare/right-lower-leg/cg-lbf-z</property>
    <property>aero/right-lower-leg/alpha-deg</property>
    <property>aero/right-lower-leg/beta-deg</property>
    <property>aero/right-lower-leg/gamma-deg</property>
    <value>1</value>
  </rotation_bf_to_wf>
</function>
<function name="aero/right-lower-leg/cg-gwf-y">
  <description>Location of right-lower-leg cg in the global wind axes with origin of the local body frame, y-component</description>
  <rotation_bf_to_wf>
    <property>Creare/right-lower-leg/cg-lbf-x</property>
    <property>Creare/right-lower-leg/cg-lbf-y</property>
    <property>Creare/right-lower-leg/cg-lbf-z</property>
    <property>aero/right-lower-leg/alpha-deg</property>
    <property>aero/right-lower-leg/beta-deg</property>
    <property>aero/right-lower-leg/gamma-deg</property>
    <value>2</value>
  </rotation_bf_to_wf>
</function>
<function name="aero/right-lower-leg/cg-gwf-z">
  <description>Location of right-lower-leg cg in the global wind axes with origin of the local body frame, z-component</description>
  <rotation_bf_to_wf>
    <property>Creare/right-lower-leg/cg-lbf-x</property>
    <property>Creare/right-lower-leg/cg-lbf-y</property>
    <property>Creare/right-lower-leg/cg-lbf-z</property>
    <property>aero/right-lower-leg/alpha-deg</property>
    <property>aero/right-lower-leg/beta-deg</property>
    <property>aero/right-lower-leg/gamma-deg</property>
    <value>3</value>
  </rotation_bf_to_wf>
</function>
<function name="aero/left-lower-leg/cg-gwf-x">
  <description>Location of left-lower-leg cg in the global wind axes with origin of the local body frame, x-component</description>
  <rotation_bf_to_wf>
    <property>Creare/left-lower-leg/cg-lbf-x</property>
    <property>Creare/left-lower-leg/cg-lbf-y</property>
    <property>Creare/left-lower-leg/cg-lbf-z</property>
    <property>aero/left-lower-leg/alpha-deg</property>
    <property>aero/left-lower-leg/beta-deg</property>
    <property>aero/left-lower-leg/gamma-deg</property>
    <value>1</value>
  </rotation_bf_to_wf>
</function>
<function name="aero/left-lower-leg/cg-gwf-y">
  <description>Location of left-lower-leg cg in the global wind axes with origin of the local body frame, y-component</description>
  <rotation_bf_to_wf>
    <property>Creare/left-lower-leg/cg-lbf-x</property>
    <property>Creare/left-lower-leg/cg-lbf-y</property>
    <property>Creare/left-lower-leg/cg-lbf-z</property>
    <property>aero/left-lower-leg/alpha-deg</property>
    <property>aero/left-lower-leg/beta-deg</property>
    <property>aero/left-lower-leg/gamma-deg</property>
    <value>2</value>
  </rotation_bf_to_wf>
</function>
<function name="aero/left-lower-leg/cg-gwf-z">
  <description>Location of left-lower-leg cg in the global wind axes with origin of the local body frame, z-component</description>
  <rotation_bf_to_wf>
    <property>Creare/left-lower-leg/cg-lbf-x</property>
    <property>Creare/left-lower-leg/cg-lbf-y</property>
    <property>Creare/left-lower-leg/cg-lbf-z</property>
    <property>aero/left-lower-leg/alpha-deg</property>
    <property>aero/left-lower-leg/beta-deg</property>
    <property>aero/left-lower-leg/gamma-deg</property>
    <value>3</value>
  </rotation_bf_to_wf>
</function>
<function name="aero/right-upper-arm/cg-gwf-x">
  <description>Location of right-upper-arm cg in the global wind axes with origin of the local body frame, x-component</description>
  <rotation_bf_to_wf>
    <property>Creare/right-upper-arm/cg-lbf-x</property>
    <property>Creare/right-upper-arm/cg-lbf-y</property>
    <property>Creare/right-upper-arm/cg-lbf-z</property>
    <property>aero/right-upper-arm/alpha-deg</property>
    <property>aero/right-upper-arm/beta-deg</property>
    <property>aero/right-upper-arm/gamma-deg</property>
    <value>1</value>
  </rotation_bf_to_wf>
</function>
<function name="aero/right-upper-arm/cg-gwf-y">
  <description>Location of right-upper-arm cg in the global wind axes with origin of the local body frame, y-component</description>
  <rotation_bf_to_wf>
    <property>Creare/right-upper-arm/cg-lbf-x</property>
    <property>Creare/right-upper-arm/cg-lbf-y</property>
    <property>Creare/right-upper-arm/cg-lbf-z</property>
    <property>aero/right-upper-arm/alpha-deg</property>
    <property>aero/right-upper-arm/beta-deg</property>
    <property>aero/right-upper-arm/gamma-deg</property>
    <value>2</value>
  </rotation_bf_to_wf>
</function>
<function name="aero/right-upper-arm/cg-gwf-z">
  <description>Location of right-upper-arm cg in the global wind axes with origin of the local body frame, z-component</description>
  <rotation_bf_to_wf>
    <property>Creare/right-upper-arm/cg-lbf-x</property>
    <property>Creare/right-upper-arm/cg-lbf-y</property>
    <property>Creare/right-upper-arm/cg-lbf-z</property>
    <property>aero/right-upper-arm/alpha-deg</property>
    <property>aero/right-upper-arm/beta-deg</property>
    <property>aero/right-upper-arm/gamma-deg</property>
    <value>3</value>
  </rotation_bf_to_wf>
</function>
<function name="aero/left-upper-arm/cg-gwf-x">
  <description>Location of left-upper-arm cg in the global wind axes with origin of the local body frame, x-component</description>
  <rotation_bf_to_wf>
    <property>Creare/left-upper-arm/cg-lbf-x</property>
    <property>Creare/left-upper-arm/cg-lbf-y</property>
    <property>Creare/left-upper-arm/cg-lbf-z</property>
    <property>aero/left-upper-arm/alpha-deg</property>
    <property>aero/left-upper-arm/beta-deg</property>
    <property>aero/left-upper-arm/gamma-deg</property>
    <value>1</value>
  </rotation_bf_to_wf>
</function>
<function name="aero/left-upper-arm/cg-gwf-y">
  <description>Location of left-upper-arm cg in the global wind axes with origin of the local body frame, y-component</description>
  <rotation_bf_to_wf>
    <property>Creare/left-upper-arm/cg-lbf-x</property>
    <property>Creare/left-upper-arm/cg-lbf-y</property>
    <property>Creare/left-upper-arm/cg-lbf-z</property>
    <property>aero/left-upper-arm/alpha-deg</property>
    <property>aero/left-upper-arm/beta-deg</property>
    <property>aero/left-upper-arm/gamma-deg</property>
    <value>2</value>
  </rotation_bf_to_wf>
</function>
<function name="aero/left-upper-arm/cg-gwf-z">
  <description>Location of left-upper-arm cg in the global wind axes with origin of the local body frame, z-component</description>
  <rotation_bf_to_wf>
    <property>Creare/left-upper-arm/cg-lbf-x</property>
    <property>Creare/left-upper-arm/cg-lbf-y</property>
    <property>Creare/left-upper-arm/cg-lbf-z</property>
    <property>aero/left-upper-arm/alpha-deg</property>
    <property>aero/left-upper-arm/beta-deg</property>
    <property>aero/left-upper-arm/gamma-deg</property>
    <value>3</value>
  </rotation_bf_to_wf>
</function>
<function name="aero/right-forearm/cg-gwf-x">
  <description>Location of right-forearm cg in the global wind axes with origin of the local body frame, x-component</description>
  <rotation_bf_to_wf>
    <property>Creare/right-forearm/cg-lbf-x</property>
    <property>Creare/right-forearm/cg-lbf-y</property>
    <property>Creare/right-forearm/cg-lbf-z</property>
    <property>aero/right-forearm/alpha-deg</property>
    <property>aero/right-forearm/beta-deg</property>
    <property>aero/right-forearm/gamma-deg</property>
    <value>1</value>
  </rotation_bf_to_wf>
</function>
<function name="aero/right-forearm/cg-gwf-y">
  <description>Location of right-forearm cg in the global wind axes with origin of the local body frame, y-component</description>
  <rotation_bf_to_wf>
    <property>Creare/right-forearm/cg-lbf-x</property>
    <property>Creare/right-forearm/cg-lbf-y</property>
    <property>Creare/right-forearm/cg-lbf-z</property>
    <property>aero/right-forearm/alpha-deg</property>
    <property>aero/right-forearm/beta-deg</property>
    <property>aero/right-forearm/gamma-deg</property>
    <value>2</value>
  </rotation_bf_to_wf>
</function>
<function name="aero/right-forearm/cg-gwf-z">
  <description>Location of right-forearm cg in the global wind axes with origin of the local body frame, z-component</description>
  <rotation_bf_to_wf>
    <property>Creare/right-forearm/cg-lbf-x</property>
    <property>Creare/right-forearm/cg-lbf-y</property>
    <property>Creare/right-forearm/cg-lbf-z</property>
    <property>aero/right-forearm/alpha-deg</property>
    <property>aero/right-forearm/beta-deg</property>
    <property>aero/right-forearm/gamma-deg</property>
    <value>3</value>
  </rotation_bf_to_wf>
</function>
<function name="aero/left-forearm/cg-gwf-x">
  <description>Location of left-forearm cg in the global wind axes with origin of the local body frame, x-component</description>
  <rotation_bf_to_wf>
    <property>Creare/left-forearm/cg-lbf-x</property>
    <property>Creare/left-forearm/cg-lbf-y</property>
    <property>Creare/left-forearm/cg-lbf-z</property>
    <property>aero/left-forearm/alpha-deg</property>
    <property>aero/left-forearm/beta-deg</property>
    <property>aero/left-forearm/gamma-deg</property>
    <value>1</value>
  </rotation_bf_to_wf>
</function>
<function name="aero/left-forearm/cg-gwf-y">
  <description>Location of left-forearm cg in the global wind axes with origin of the local body frame, y-component</description>
  <rotation_bf_to_wf>
    <property>Creare/left-forearm/cg-lbf-x</property>
    <property>Creare/left-forearm/cg-lbf-y</property>
    <property>Creare/left-forearm/cg-lbf-z</property>
    <property>aero/left-forearm/alpha-deg</property>
    <property>aero/left-forearm/beta-deg</property>
    <property>aero/left-forearm/gamma-deg</property>
    <value>2</value>
  </rotation_bf_to_wf>
</function>
<function name="aero/left-forearm/cg-gwf-z">
  <description>Location of left-forearm cg in the global wind axes with origin of the local body frame, z-component</description>
  <rotation_bf_to_wf>
    <property>Creare/left-forearm/cg-lbf-x</property>
    <property>Creare/left-forearm/cg-lbf-y</property>
    <property>Creare/left-forearm/cg-lbf-z</property>
    <property>aero/left-forearm/alpha-deg</property>
    <property>aero/left-forearm/beta-deg</property>
    <property>aero/left-forearm/gamma-deg</property>
    <value>3</value>
  </rotation_bf_to_wf>
</function>
<function name="aero/neck/gwf-x">
  <description>Location of neck cg in the global wind axes with origin of the local body frame, x-component</description>
  <rotation_bf_to_wf>
    <property>Creare/neck/lbf-x</property>
    <property>Creare/neck/lbf-y</property>
    <property>Creare/neck/lbf-z</property>
    <property>aero/torso/alpha-deg</property>
    <property>aero/torso/beta-deg</property>
    <property>aero/torso/gamma-deg</property>
    <value>1</value>
  </rotation_bf_to_wf>
</function>
<function name="aero/neck/gwf-y">
  <description>Location of neck cg in the global wind axes with origin of the local body frame, y-component</description>
  <rotation_bf_to_wf>
    <property>Creare/neck/lbf-x</property>
    <property>Creare/neck/lbf-y</property>
    <property>Creare/neck/lbf-z</property>
    <property>aero/torso/alpha-deg</property>
    <property>aero/torso/beta-deg</property>
    <property>aero/torso/gamma-deg</property>
    <value>2</value>
  </rotation_bf_to_wf>
</function>
<function name="aero/neck/gwf-z">
  <description>Location of neck cg in the global wind axes with origin of the local body frame, z-component</description>
  <rotation_bf_to_wf>
    <property>Creare/neck/lbf-x</property>
    <property>Creare/neck/lbf-y</property>
    <property>Creare/neck/lbf-z</property>
    <property>aero/torso/alpha-deg</property>
    <property>aero/torso/beta-deg</property>
    <property>aero/torso/gamma-deg</property>
    <value>3</value>
  </rotation_bf_to_wf>
</function>
<function name="aero/right-hip/gwf-x">
  <description>Location of right-hip cg in the global wind axes with origin of the local body frame, x-component</description>
  <rotation_bf_to_wf>
    <property>Creare/right-hip/lbf-x</property>
    <property>Creare/right-hip/lbf-y</property>
    <property>Creare/right-hip/lbf-z</property>
    <property>aero/pelvis/alpha-deg</property>
    <property>aero/pelvis/beta-deg</property>
    <property>aero/pelvis/gamma-deg</property>
    <value>1</value>
  </rotation_bf_to_wf>
</function>
<function name="aero/right-hip/gwf-y">
  <description>Location of right-hip cg in the global wind axes with origin of the local body frame, y-component</description>
  <rotation_bf_to_wf>
    <property>Creare/right-hip/lbf-x</property>
    <property>Creare/right-hip/lbf-y</property>
    <property>Creare/right-hip/lbf-z</property>
    <property>aero/pelvis/alpha-deg</property>
    <property>aero/pelvis/beta-deg</property>
    <property>aero/pelvis/gamma-deg</property>
    <value>2</value>
  </rotation_bf_to_wf>
</function>
<function name="aero/right-hip/gwf-z">
  <description>Location of right-hip cg in the global wind axes with origin of the local body frame, z-component</description>
  <rotation_bf_to_wf>
    <property>Creare/right-hip/lbf-x</property>
    <property>Creare/right-hip/lbf-y</property>
    <property>Creare/right-hip/lbf-z</property>
    <property>aero/pelvis/alpha-deg</property>
    <property>aero/pelvis/beta-deg</property>
    <property>aero/pelvis/gamma-deg</property>
    <value>3</value>
  </rotation_bf_to_wf>
</function>
<function name="aero/left-hip/gwf-x">
  <description>Location of left-hip cg in the global wind axes with origin of the local body frame, x-component</description>
  <rotation_bf_to_wf>
    <property>Creare/left-hip/lbf-x</property>
    <property>Creare/left-hip/lbf-y</property>
    <property>Creare/left-hip/lbf-z</property>
    <property>aero/pelvis/alpha-deg</property>
    <property>aero/pelvis/beta-deg</property>
    <property>aero/pelvis/gamma-deg</property>
    <value>1</value>
  </rotation_bf_to_wf>
</function>
<function name="aero/left-hip/gwf-y">
  <description>Location of left-hip cg in the global wind axes with origin of the local body frame, y-component</description>
  <rotation_bf_to_wf>
    <property>Creare/left-hip/lbf-x</property>
    <property>Creare/left-hip/lbf-y</property>
    <property>Creare/left-hip/lbf-z</property>
    <property>aero/pelvis/alpha-deg</property>
    <property>aero/pelvis/beta-deg</property>
    <property>aero/pelvis/gamma-deg</property>
    <value>2</value>
  </rotation_bf_to_wf>
</function>
<function name="aero/left-hip/gwf-z">
  <description>Location of left-hip cg in the global wind axes with origin of the local body frame, z-component</description>
  <rotation_bf_to_wf>
    <property>Creare/left-hip/lbf-x</property>
    <property>Creare/left-hip/lbf-y</property>
    <property>Creare/left-hip/lbf-z</property>
    <property>aero/pelvis/alpha-deg</property>
    <property>aero/pelvis/beta-deg</property>
    <property>aero/pelvis/gamma-deg</property>
    <value>3</value>
  </rotation_bf_to_wf>
</function>
<function name="aero/right-knee/gwf-x">
  <description>Location of right-knee cg in the global wind axes with origin of the local body frame, x-component</description>
  <rotation_bf_to_wf>
    <property>Creare/right-knee/lbf-x</property>
    <property>Creare/right-knee/lbf-y</property>
    <property>Creare/right-knee/lbf-z</property>
    <property>aero/right-upper-leg/alpha-deg</property>
    <property>aero/right-upper-leg/beta-deg</property>
    <property>aero/right-upper-leg/gamma-deg</property>
    <value>1</value>
  </rotation_bf_to_wf>
</function>
<function name="aero/right-knee/gwf-y">
  <description>Location of right-knee cg in the global wind axes with origin of the local body frame, y-component</description>
  <rotation_bf_to_wf>
    <property>Creare/right-knee/lbf-x</property>
    <property>Creare/right-knee/lbf-y</property>
    <property>Creare/right-knee/lbf-z</property>
    <property>aero/right-upper-leg/alpha-deg</property>
    <property>aero/right-upper-leg/beta-deg</property>
    <property>aero/right-upper-leg/gamma-deg</property>
    <value>2</value>
  </rotation_bf_to_wf>
</function>
<function name="aero/right-knee/gwf-z">
  <description>Location of right-knee cg in the global wind axes with origin of the local body frame, z-component</description>
  <rotation_bf_to_wf>
    <property>Creare/right-knee/lbf-x</property>
    <property>Creare/right-knee/lbf-y</property>
    <property>Creare/right-knee/lbf-z</property>
    <property>aero/right-upper-leg/alpha-deg</property>
    <property>aero/right-upper-leg/beta-deg</property>
    <property>aero/right-upper-leg/gamma-deg</property>
    <value>3</value>
  </rotation_bf_to_wf>
</function>
<function name="aero/left-knee/gwf-x">
  <description>Location of left-knee cg in the global wind axes with origin of the local body frame, x-component</description>
  <rotation_bf_to_wf>
    <property>Creare/left-knee/lbf-x</property>
    <property>Creare/left-knee/lbf-y</property>
    <property>Creare/left-knee/lbf-z</property>
    <property>aero/left-upper-leg/alpha-deg</property>
    <property>aero/left-upper-leg/beta-deg</property>
    <property>aero/left-upper-leg/gamma-deg</property>
    <value>1</value>
  </rotation_bf_to_wf>
</function>
<function name="aero/left-knee/gwf-y">
  <description>Location of left-knee cg in the global wind axes with origin of the local body frame, y-component</description>
  <rotation_bf_to_wf>
    <property>Creare/left-knee/lbf-x</property>
    <property>Creare/left-knee/lbf-y</property>
    <property>Creare/left-knee/lbf-z</property>
    <property>aero/left-upper-leg/alpha-deg</property>
    <property>aero/left-upper-leg/beta-deg</property>
    <property>aero/left-upper-leg/gamma-deg</property>
    <value>2</value>
  </rotation_bf_to_wf>
</function>
<function name="aero/left-knee/gwf-z">
  <description>Location of left-knee cg in the global wind axes with origin of the local body frame, z-component</description>
  <rotation_bf_to_wf>
    <property>Creare/left-knee/lbf-x</property>
    <property>Creare/left-knee/lbf-y</property>
    <property>Creare/left-knee/lbf-z</property>
    <property>aero/left-upper-leg/alpha-deg</property>
    <property>aero/left-upper-leg/beta-deg</property>
    <property>aero/left-upper-leg/gamma-deg</property>
    <value>3</value>
  </rotation_bf_to_wf>
</function>
<function name="aero/right-shoulder/gwf-x">
  <description>Location of right-shoulder cg in the global wind axes with origin of the local body frame, x-component</description>
  <rotation_bf_to_wf>
    <property>Creare/right-shoulder/lbf-x</property>
    <property>Creare/right-shoulder/lbf-y</property>
    <property>Creare/right-shoulder/lbf-z</property>
    <property>aero/torso/alpha-deg</property>
    <property>aero/torso/beta-deg</property>
    <property>aero/torso/gamma-deg</property>
    <value>1</value>
  </rotation_bf_to_wf>
</function>
<function name="aero/right-shoulder/gwf-y">
  <description>Location of right-shoulder cg in the global wind axes with origin of the local body frame, y-component</description>
  <rotation_bf_to_wf>
    <property>Creare/right-shoulder/lbf-x</property>
    <property>Creare/right-shoulder/lbf-y</property>
    <property>Creare/right-shoulder/lbf-z</property>
    <property>aero/torso/alpha-deg</property>
    <property>aero/torso/beta-deg</property>
    <property>aero/torso/gamma-deg</property>
    <value>2</value>
  </rotation_bf_to_wf>
</function>
<function name="aero/right-shoulder/gwf-z">
  <description>Location of right-shoulder cg in the global wind axes with origin of the local body frame, z-component</description>
  <rotation_bf_to_wf>
    <property>Creare/right-shoulder/lbf-x</property>
    <property>Creare/right-shoulder/lbf-y</property>
    <property>Creare/right-shoulder/lbf-z</property>
    <property>aero/torso/alpha-deg</property>
    <property>aero/torso/beta-deg</property>
    <property>aero/torso/gamma-deg</property>
    <value>3</value>
  </rotation_bf_to_wf>
</function>
<function name="aero/left-shoulder/gwf-x">
  <description>Location of left-shoulder cg in the global wind axes with origin of the local body frame, x-component</description>
  <rotation_bf_to_wf>
    <property>Creare/left-shoulder/lbf-x</property>
    <property>Creare/left-shoulder/lbf-y</property>
    <property>Creare/left-shoulder/lbf-z</property>
    <property>aero/torso/alpha-deg</property>
    <property>aero/torso/beta-deg</property>
    <property>aero/torso/gamma-deg</property>
    <value>1</value>
  </rotation_bf_to_wf>
</function>
<function name="aero/left-shoulder/gwf-y">
  <description>Location of left-shoulder cg in the global wind axes with origin of the local body frame, y-component</description>
  <rotation_bf_to_wf>
    <property>Creare/left-shoulder/lbf-x</property>
    <property>Creare/left-shoulder/lbf-y</property>
    <property>Creare/left-shoulder/lbf-z</property>
    <property>aero/torso/alpha-deg</property>
    <property>aero/torso/beta-deg</property>
    <property>aero/torso/gamma-deg</property>
    <value>2</value>
  </rotation_bf_to_wf>
</function>
<function name="aero/left-shoulder/gwf-z">
  <description>Location of left-shoulder cg in the global wind axes with origin of the local body frame, z-component</description>
  <rotation_bf_to_wf>
    <property>Creare/left-shoulder/lbf-x</property>
    <property>Creare/left-shoulder/lbf-y</property>
    <property>Creare/left-shoulder/lbf-z</property>
    <property>aero/torso/alpha-deg</property>
    <property>aero/torso/beta-deg</property>
    <property>aero/torso/gamma-deg</property>
    <value>3</value>
  </rotation_bf_to_wf>
</function>
<function name="aero/right-elbow/gwf-x">
  <description>Location of right-elbow cg in the global wind axes with origin of the local body frame, x-component</description>
  <rotation_bf_to_wf>
    <property>Creare/right-elbow/lbf-x</property>
    <property>Creare/right-elbow/lbf-y</property>
    <property>Creare/right-elbow/lbf-z</property>
    <property>aero/right-upper-arm/alpha-deg</property>
    <property>aero/right-upper-arm/beta-deg</property>
    <property>aero/right-upper-arm/gamma-deg</property>
    <value>1</value>
  </rotation_bf_to_wf>
</function>
<function name="aero/right-elbow/gwf-y">
  <description>Location of right-elbow cg in the global wind axes with origin of the local body frame, y-component</description>
  <rotation_bf_to_wf>
    <property>Creare/right-elbow/lbf-x</property>
    <property>Creare/right-elbow/lbf-y</property>
    <property>Creare/right-elbow/lbf-z</property>
    <property>aero/right-upper-arm/alpha-deg</property>
    <property>aero/right-upper-arm/beta-deg</property>
    <property>aero/right-upper-arm/gamma-deg</property>
    <value>2</value>
  </rotation_bf_to_wf>
</function>
<function name="aero/right-elbow/gwf-z">
  <description>Location of right-elbow cg in the global wind axes with origin of the local body frame, z-component</description>
  <rotation_bf_to_wf>
    <property>Creare/right-elbow/lbf-x</property>
    <property>Creare/right-elbow/lbf-y</property>
    <property>Creare/right-elbow/lbf-z</property>
    <property>aero/right-upper-arm/alpha-deg</property>
    <property>aero/right-upper-arm/beta-deg</property>
    <property>aero/right-upper-arm/gamma-deg</property>
    <value>3</value>
  </rotation_bf_to_wf>
</function>
<function name="aero/left-elbow/gwf-x">
  <description>Location of left-elbow cg in the global wind axes with origin of the local body frame, x-component</description>
  <rotation_bf_to_wf>
    <property>Creare/left-elbow/lbf-x</property>
    <property>Creare/left-elbow/lbf-y</property>
    <property>Creare/left-elbow/lbf-z</property>
    <property>aero/left-upper-arm/alpha-deg</property>
    <property>aero/left-upper-arm/beta-deg</property>
    <property>aero/left-upper-arm/gamma-deg</property>
    <value>1</value>
  </rotation_bf_to_wf>
</function>
<function name="aero/left-elbow/gwf-y">
  <description>Location of left-elbow cg in the global wind axes with origin of the local body frame, y-component</description>
  <rotation_bf_to_wf>
    <property>Creare/left-elbow/lbf-x</property>
    <property>Creare/left-elbow/lbf-y</property>
    <property>Creare/left-elbow/lbf-z</property>
    <property>aero/left-upper-arm/alpha-deg</property>
    <property>aero/left-upper-arm/beta-deg</property>
    <property>aero/left-upper-arm/gamma-deg</property>
    <value>2</value>
  </rotation_bf_to_wf>
</function>
<function name="aero/left-elbow/gwf-z">
  <description>Location of left-elbow cg in the global wind axes with origin of the local body frame, z-component</description>
  <rotation_bf_to_wf>
    <property>Creare/left-elbow/lbf-x</property>
    <property>Creare/left-elbow/lbf-y</property>
    <property>Creare/left-elbow/lbf-z</property>
    <property>aero/left-upper-arm/alpha-deg</property>
    <property>aero/left-upper-arm/beta-deg</property>
    <property>aero/left-upper-arm/gamma-deg</property>
    <value>3</value>
  </rotation_bf_to_wf>
</function>
<function name="Creare/global-cg/gwf-x">
  <description>Location of global cg in the global wind axes with origin of the global body frame, x-component</description>
  <rotation_bf_to_wf>
    <property>Creare/global-cg/gbf-x</property>
    <property>Creare/global-cg/gbf-y</property>
    <property>Creare/global-cg/gbf-z</property>
    <property>aero/alpha-deg</property>
    <property>aero/beta-deg</property>
    <value> 0 </value>
    <value>1</value>
  </rotation_bf_to_wf>
</function>
<function name="Creare/global-cg/gwf-y">
  <description>Location of global cg in the global wind axes with origin of the global body frame, y-component</description>
  <rotation_bf_to_wf>
    <property>Creare/global-cg/gbf-x</property>
    <property>Creare/global-cg/gbf-y</property>
    <property>Creare/global-cg/gbf-z</property>
    <property>aero/alpha-deg</property>
    <property>aero/beta-deg</property>
    <value> 0 </value>
    <value>2</value>
  </rotation_bf_to_wf>
</function>
<function name="Creare/global-cg/gwf-z">
  <description>Location of global cg in the global wind axes with origin of the global body frame, z-component</description>
  <rotation_bf_to_wf>
    <property>Creare/global-cg/gbf-x</property>
    <property>Creare/global-cg/gbf-y</property>
    <property>Creare/global-cg/gbf-z</property>
    <property>aero/alpha-deg</property>
    <property>aero/beta-deg</property>
    <value> 0 </value>
    <value>3</value>
  </rotation_bf_to_wf>
</function>

<function name="aero/torso/ma-gwf-x">
  <description>Moment arm of torso cg about the global wind axes with origin at the global cg, x-component</description>
  <sum>
    <property>aero/torso/cg-gwf-x</property>
    <product>
      <property>Creare/global-cg/gwf-x</property>
      <value> -1 </value>
    </product>
  </sum>
</function>
<function name="aero/torso/ma-gwf-y">
  <description>Moment arm of torso cg about the global wind axes with origin at the global cg, y-component</description>
  <sum>
    <property>aero/torso/cg-gwf-y</property>
    <product>
      <property>Creare/global-cg/gwf-y</property>
      <value> -1 </value>
    </product>
  </sum>
</function>
<function name="aero/torso/ma-gwf-z">
  <description>Moment arm of torso cg about the global wind axes with origin at the global cg, z-component</description>
  <sum>
    <property>aero/torso/cg-gwf-z</property>
    <product>
      <property>Creare/global-cg/gwf-z</property>
      <value> -1 </value>
    </product>
  </sum>
</function>
<function name="aero/pelvis/ma-gwf-x">
  <description>Moment arm of pelvis cg about the global wind axes with origin at the global cg, x-component</description>
  <sum>
    <property>aero/pelvis/cg-gwf-x</property>
    <product>
      <property>Creare/global-cg/gwf-x</property>
      <value> -1 </value>
    </product>
  </sum>
</function>
<function name="aero/pelvis/ma-gwf-y">
  <description>Moment arm of pelvis cg about the global wind axes with origin at the global cg, y-component</description>
  <sum>
    <property>aero/pelvis/cg-gwf-y</property>
    <product>
      <property>Creare/global-cg/gwf-y</property>
      <value> -1 </value>
    </product>
  </sum>
</function>
<function name="aero/pelvis/ma-gwf-z">
  <description>Moment arm of pelvis cg about the global wind axes with origin at the global cg, z-component</description>
  <sum>
    <property>aero/pelvis/cg-gwf-z</property>
    <product>
      <property>Creare/global-cg/gwf-z</property>
      <value> -1 </value>
    </product>
  </sum>
</function>
<function name="aero/head/ma-gwf-x">
  <description>Moment arm of head cg about the global wind axes with origin at the global cg, x-component</description>
  <sum>
    <property>aero/head/cg-gwf-x</property>
    <property>aero/neck/gwf-x</property>
    <product>
      <property>Creare/global-cg/gwf-x</property>
      <value> -1 </value>
    </product>
  </sum>
</function>
<function name="aero/head/ma-gwf-y">
  <description>Moment arm of head cg about the global wind axes with origin at the global cg, y-component</description>
  <sum>
    <property>aero/head/cg-gwf-y</property>
    <property>aero/neck/gwf-y</property>
    <product>
      <property>Creare/global-cg/gwf-y</property>
      <value> -1 </value>
    </product>
  </sum>
</function>
<function name="aero/head/ma-gwf-z">
  <description>Moment arm of head cg about the global wind axes with origin at the global cg, z-component</description>
  <sum>
    <property>aero/head/cg-gwf-z</property>
    <property>aero/neck/gwf-z</property>
    <product>
      <property>Creare/global-cg/gwf-z</property>
      <value> -1 </value>
    </product>
  </sum>
</function>
<function name="aero/right-upper-leg/ma-gwf-x">
  <description>Moment arm of right-upper-leg cg about the global wind axes with origin at the global cg, x-component</description>
  <sum>
    <property>aero/right-upper-leg/cg-gwf-x</property>
    <property>aero/right-hip/gwf-x</property>
    <product>
      <property>Creare/global-cg/gwf-x</property>
      <value> -1 </value>
    </product>
  </sum>
</function>
<function name="aero/right-upper-leg/ma-gwf-y">
  <description>Moment arm of right-upper-leg cg about the global wind axes with origin at the global cg, y-component</description>
  <sum>
    <property>aero/right-upper-leg/cg-gwf-y</property>
    <property>aero/right-hip/gwf-y</property>
    <product>
      <property>Creare/global-cg/gwf-y</property>
      <value> -1 </value>
    </product>
  </sum>
</function>
<function name="aero/right-upper-leg/ma-gwf-z">
  <description>Moment arm of right-upper-leg cg about the global wind axes with origin at the global cg, z-component</description>
  <sum>
    <property>aero/right-upper-leg/cg-gwf-z</property>
    <property>aero/right-hip/gwf-z</property>
    <product>
      <property>Creare/global-cg/gwf-z</property>
      <value> -1 </value>
    </product>
  </sum>
</function>
<function name="aero/left-upper-leg/ma-gwf-x">
  <description>Moment arm of left-upper-leg cg about the global wind axes with origin at the global cg, x-component</description>
  <sum>
    <property>aero/left-upper-leg/cg-gwf-x</property>
    <property>aero/left-hip/gwf-x</property>
    <product>
      <property>Creare/global-cg/gwf-x</property>
      <value> -1 </value>
    </product>
  </sum>
</function>
<function name="aero/left-upper-leg/ma-gwf-y">
  <description>Moment arm of left-upper-leg cg about the global wind axes with origin at the global cg, y-component</description>
  <sum>
    <property>aero/left-upper-leg/cg-gwf-y</property>
    <property>aero/left-hip/gwf-y</property>
    <product>
      <property>Creare/global-cg/gwf-y</property>
      <value> -1 </value>
    </product>
  </sum>
</function>
<function name="aero/left-upper-leg/ma-gwf-z">
  <description>Moment arm of left-upper-leg cg about the global wind axes with origin at the global cg, z-component</description>
  <sum>
    <property>aero/left-upper-leg/cg-gwf-z</property>
    <property>aero/left-hip/gwf-z</property>
    <product>
      <property>Creare/global-cg/gwf-z</property>
      <value> -1 </value>
    </product>
  </sum>
</function>
<function name="aero/right-lower-leg/ma-gwf-x">
  <description>Moment arm of right-lower-leg cg about the global wind axes with origin at the global cg, x-component</description>
  <sum>
    <property>aero/right-lower-leg/cg-gwf-x</property>
    <property>aero/right-knee/gwf-x</property>
    <property>aero/right-hip/gwf-x</property>
    <product>
      <property>Creare/global-cg/gwf-x</property>
      <value> -1 </value>
    </product>
  </sum>
</function>
<function name="aero/right-lower-leg/ma-gwf-y">
  <description>Moment arm of right-lower-leg cg about the global wind axes with origin at the global cg, y-component</description>
  <sum>
    <property>aero/right-lower-leg/cg-gwf-y</property>
    <property>aero/right-knee/gwf-y</property>
    <property>aero/right-hip/gwf-y</property>
    <product>
      <property>Creare/global-cg/gwf-y</property>
      <value> -1 </value>
    </product>
  </sum>
</function>
<function name="aero/right-lower-leg/ma-gwf-z">
  <description>Moment arm of right-lower-leg cg about the global wind axes with origin at the global cg, z-component</description>
  <sum>
    <property>aero/right-lower-leg/cg-gwf-z</property>
    <property>aero/right-knee/gwf-z</property>
    <property>aero/right-hip/gwf-z</property>
    <product>
      <property>Creare/global-cg/gwf-z</property>
      <value> -1 </value>
    </product>
  </sum>
</function>
<function name="aero/left-lower-leg/ma-gwf-x">
  <description>Moment arm of left-lower-leg cg about the global wind axes with origin at the global cg, x-component</description>
  <sum>
    <property>aero/left-lower-leg/cg-gwf-x</property>
    <property>aero/left-knee/gwf-x</property>
    <property>aero/left-hip/gwf-x</property>
    <product>
      <property>Creare/global-cg/gwf-x</property>
      <value> -1 </value>
    </product>
  </sum>
</function>
<function name="aero/left-lower-leg/ma-gwf-y">
  <description>Moment arm of left-lower-leg cg about the global wind axes with origin at the global cg, y-component</description>
  <sum>
    <property>aero/left-lower-leg/cg-gwf-y</property>
    <property>aero/left-knee/gwf-y</property>
    <property>aero/left-hip/gwf-y</property>
    <product>
      <property>Creare/global-cg/gwf-y</property>
      <value> -1 </value>
    </product>
  </sum>
</function>
<function name="aero/left-lower-leg/ma-gwf-z">
  <description>Moment arm of left-lower-leg cg about the global wind axes with origin at the global cg, z-component</description>
  <sum>
    <property>aero/left-lower-leg/cg-gwf-z</property>
    <property>aero/left-knee/gwf-z</property>
    <property>aero/left-hip/gwf-z</property>
    <product>
      <property>Creare/global-cg/gwf-z</property>
      <value> -1 </value>
    </product>
  </sum>
</function>
<function name="aero/right-upper-arm/ma-gwf-x">
  <description>Moment arm of right-upper-arm cg about the global wind axes with origin at the global cg, x-component</description>
  <sum>
    <property>aero/right-upper-arm/cg-gwf-x</property>
    <property>aero/right-shoulder/gwf-x</property>
    <product>
      <property>Creare/global-cg/gwf-x</property>
      <value> -1 </value>
    </product>
  </sum>
</function>
<function name="aero/right-upper-arm/ma-gwf-y">
  <description>Moment arm of right-upper-arm cg about the global wind axes with origin at the global cg, y-component</description>
  <sum>
    <property>aero/right-upper-arm/cg-gwf-y</property>
    <property>aero/right-shoulder/gwf-y</property>
    <product>
      <property>Creare/global-cg/gwf-y</property>
      <value> -1 </value>
    </product>
  </sum>
</function>
<function name="aero/right-upper-arm/ma-gwf-z">
  <description>Moment arm of right-upper-arm cg about the global wind axes with origin at the global cg, z-component</description>
  <sum>
    <property>aero/right-upper-arm/cg-gwf-z</property>
    <property>aero/right-shoulder/gwf-z</property>
    <product>
      <property>Creare/global-cg/gwf-z</property>
      <value> -1 </value>
    </product>
  </sum>
</function>
<function name="aero/left-upper-arm/ma-gwf-x">
  <description>Moment arm of left-upper-arm cg about the global wind axes with origin at the global cg, x-component</description>
  <sum>
    <property>aero/left-upper-arm/cg-gwf-x</property>
    <property>aero/left-shoulder/gwf-x</property>
    <product>
      <property>Creare/global-cg/gwf-x</property>
      <value> -1 </value>
    </product>
  </sum>
</function>
<function name="aero/left-upper-arm/ma-gwf-y">
  <description>Moment arm of left-upper-arm cg about the global wind axes with origin at the global cg, y-component</description>
  <sum>
    <property>aero/left-upper-arm/cg-gwf-y</property>
    <property>aero/left-shoulder/gwf-y</property>
    <product>
      <property>Creare/global-cg/gwf-y</property>
      <value> -1 </value>
    </product>
  </sum>
</function>
<function name="aero/left-upper-arm/ma-gwf-z">
  <description>Moment arm of left-upper-arm cg about the global wind axes with origin at the global cg, z-component</description>
  <sum>
    <property>aero/left-upper-arm/cg-gwf-z</property>
    <property>aero/left-shoulder/gwf-z</property>
    <product>
      <property>Creare/global-cg/gwf-z</property>
      <value> -1 </value>
    </product>
  </sum>
</function>
<function name="aero/right-forearm/ma-gwf-x">
  <description>Moment arm of right-forearm cg about the global wind axes with origin at the global cg, x-component</description>
  <sum>
    <property>aero/right-forearm/cg-gwf-x</property>
    <property>aero/right-elbow/gwf-x</property>
    <property>aero/right-shoulder/gwf-x</property>
    <product>
      <property>Creare/global-cg/gwf-x</property>
      <value> -1 </value>
    </product>
  </sum>
</function>
<function name="aero/right-forearm/ma-gwf-y">
  <description>Moment arm of right-forearm cg about the global wind axes with origin at the global cg, y-component</description>
  <sum>
    <property>aero/right-forearm/cg-gwf-y</property>
    <property>aero/right-elbow/gwf-y</property>
    <property>aero/right-shoulder/gwf-y</property>
    <product>
      <property>Creare/global-cg/gwf-y</property>
      <value> -1 </value>
    </product>
  </sum>
</function>
<function name="aero/right-forearm/ma-gwf-z">
  <description>Moment arm of right-forearm cg about the global wind axes with origin at the global cg, z-component</description>
  <sum>
    <property>aero/right-forearm/cg-gwf-z</property>
    <property>aero/right-elbow/gwf-z</property>
    <property>aero/right-shoulder/gwf-z</property>
    <product>
      <property>Creare/global-cg/gwf-z</property>
      <value> -1 </value>
    </product>
  </sum>
</function>
<function name="aero/left-forearm/ma-gwf-x">
  <description>Moment arm of left-forearm cg about the global wind axes with origin at the global cg, x-component</description>
  <sum>
    <property>aero/left-forearm/cg-gwf-x</property>
    <property>aero/left-elbow/gwf-x</property>
    <property>aero/left-shoulder/gwf-x</property>
    <product>
      <property>Creare/global-cg/gwf-x</property>
      <value> -1 </value>
    </product>
  </sum>
</function>
<function name="aero/left-forearm/ma-gwf-y">
  <description>Moment arm of left-forearm cg about the global wind axes with origin at the global cg, y-component</description>
  <sum>
    <property>aero/left-forearm/cg-gwf-y</property>
    <property>aero/left-elbow/gwf-y</property>
    <property>aero/left-shoulder/gwf-y</property>
    <product>
      <property>Creare/global-cg/gwf-y</property>
      <value> -1 </value>
    </product>
  </sum>
</function>
<function name="aero/left-forearm/ma-gwf-z">
  <description>Moment arm of left-forearm cg about the global wind axes with origin at the global cg, z-component</description>
  <sum>
    <property>aero/left-forearm/cg-gwf-z</property>
    <property>aero/left-elbow/gwf-z</property>
    <property>aero/left-shoulder/gwf-z</property>
    <product>
      <property>Creare/global-cg/gwf-z</property>
      <value> -1 </value>
    </product>
  </sum>
</function>

<function name="aero/total/gwf-x-moment">
  <description>Total aerodynamic moment about the global wind x-axis centered at the global cg</description>
  <sum>
    <product>
      <property>aero/torso/Lift</property>
      <property>aero/torso/ma-gwf-y</property>
      <value> -1 </value>
    </product>
    <product>
      <property>aero/torso/Sideforce</property>
      <property>aero/torso/ma-gwf-z</property>
      <value> -1 </value>
    </product>
    <property>aero/torso/Mx-gwf</property>
    <product>
      <property>aero/pelvis/Lift</property>
      <property>aero/pelvis/ma-gwf-y</property>
      <value> -1 </value>
    </product>
    <product>
      <property>aero/pelvis/Sideforce</property>
      <property>aero/pelvis/ma-gwf-z</property>
      <value> -1 </value>
    </product>
    <property>aero/pelvis/Mx-gwf</property>
    <product>
      <property>aero/head/Lift</property>
      <property>aero/head/ma-gwf-y</property>
      <value> -1 </value>
    </product>
    <product>
      <property>aero/head/Sideforce</property>
      <property>aero/head/ma-gwf-z</property>
      <value> -1 </value>
    </product>
    <property>aero/head/Mx-gwf</property>
    <product>
      <property>aero/right-upper-leg/Lift</property>
      <property>aero/right-upper-leg/ma-gwf-y</property>
      <value> -1 </value>
    </product>
    <product>
      <property>aero/right-upper-leg/Sideforce</property>
      <property>aero/right-upper-leg/ma-gwf-z</property>
      <value> -1 </value>
    </product>
    <property>aero/right-upper-leg/Mx-gwf</property>
    <product>
      <property>aero/left-upper-leg/Lift</property>
      <property>aero/left-upper-leg/ma-gwf-y</property>
      <value> -1 </value>
    </product>
    <product>
      <property>aero/left-upper-leg/Sideforce</property>
      <property>aero/left-upper-leg/ma-gwf-z</property>
      <value> -1 </value>
    </product>
    <property>aero/left-upper-leg/Mx-gwf</property>
    <product>
      <property>aero/right-lower-leg/Lift</property>
      <property>aero/right-lower-leg/ma-gwf-y</property>
      <value> -1 </value>
    </product>
    <product>
      <property>aero/right-lower-leg/Sideforce</property>
      <property>aero/right-lower-leg/ma-gwf-z</property>
      <value> -1 </value>
    </product>
    <property>aero/right-lower-leg/Mx-gwf</property>
    <product>
      <property>aero/left-lower-leg/Lift</property>
      <property>aero/left-lower-leg/ma-gwf-y</property>
      <value> -1 </value>
    </product>
    <product>
      <property>aero/left-lower-leg/Sideforce</property>
      <property>aero/left-lower-leg/ma-gwf-z</property>
      <value> -1 </value>
    </product>
    <property>aero/left-lower-leg/Mx-gwf</property>
    <product>
      <property>aero/right-upper-arm/Lift</property>
      <property>aero/right-upper-arm/ma-gwf-y</property>
      <value> -1 </value>
    </product>
    <product>
      <property>aero/right-upper-arm/Sideforce</property>
      <property>aero/right-upper-arm/ma-gwf-z</property>
      <value> -1 </value>
    </product>
    <property>aero/right-upper-arm/Mx-gwf</property>
    <product>
      <property>aero/left-upper-arm/Lift</property>
      <property>aero/left-upper-arm/ma-gwf-y</property>
      <value> -1 </value>
    </product>
    <product>
      <property>aero/left-upper-arm/Sideforce</property>
      <property>aero/left-upper-arm/ma-gwf-z</property>
      <value> -1 </value>
    </product>
    <property>aero/left-upper-arm/Mx-gwf</property>
    <product>
      <property>aero/right-forearm/Lift</property>
      <property>aero/right-forearm/ma-gwf-y</property>
      <value> -1 </value>
    </product>
    <product>
      <property>aero/right-forearm/Sideforce</property>
      <property>aero/right-forearm/ma-gwf-z</property>
      <value> -1 </value>
    </product>
    <property>aero/right-forearm/Mx-gwf</property>
    <product>
      <property>aero/left-forearm/Lift</property>
      <property>aero/left-forearm/ma-gwf-y</property>
      <value> -1 </value>
    </product>
    <product>
      <property>aero/left-forearm/Sideforce</property>
      <property>aero/left-forearm/ma-gwf-z</property>
      <value> -1 </value>
    </product>
    <property>aero/left-forearm/Mx-gwf</property>
  </sum>
</function>

<function name="aero/total/gwf-y-moment">
  <description>Total aerodynamic moment about the global wind y-axis centered at the global cg</description>
  <sum>
    <product>
      <property>aero/torso/Lift</property>
      <property>aero/torso/ma-gwf-x</property>
    </product>
    <product>
      <property>aero/torso/Drag</property>
      <property>aero/torso/ma-gwf-z</property>
      <value> -1 </value>
    </product>
    <property>aero/torso/My-gwf</property>
    <product>
      <property>aero/pelvis/Lift</property>
      <property>aero/pelvis/ma-gwf-x</property>
    </product>
    <product>
      <property>aero/pelvis/Drag</property>
      <property>aero/pelvis/ma-gwf-z</property>
      <value> -1 </value>
    </product>
    <property>aero/pelvis/My-gwf</property>
    <product>
      <property>aero/head/Lift</property>
      <property>aero/head/ma-gwf-x</property>
    </product>
    <product>
      <property>aero/head/Drag</property>
      <property>aero/head/ma-gwf-z</property>
      <value> -1 </value>
    </product>
    <property>aero/head/My-gwf</property>
    <product>
      <property>aero/right-upper-leg/Lift</property>
      <property>aero/right-upper-leg/ma-gwf-x</property>
    </product>
    <product>
      <property>aero/right-upper-leg/Drag</property>
      <property>aero/right-upper-leg/ma-gwf-z</property>
      <value> -1 </value>
    </product>
    <property>aero/right-upper-leg/My-gwf</property>
    <product>
      <property>aero/left-upper-leg/Lift</property>
      <property>aero/left-upper-leg/ma-gwf-x</property>
    </product>
    <product>
      <property>aero/left-upper-leg/Drag</property>
      <property>aero/left-upper-leg/ma-gwf-z</property>
      <value> -1 </value>
    </product>
    <property>aero/left-upper-leg/My-gwf</property>
    <product>
      <property>aero/right-lower-leg/Lift</property>
      <property>aero/right-lower-leg/ma-gwf-x</property>
    </product>
    <product>
      <property>aero/right-lower-leg/Drag</property>
      <property>aero/right-lower-leg/ma-gwf-z</property>
      <value> -1 </value>
    </product>
    <property>aero/right-lower-leg/My-gwf</property>
    <product>
      <property>aero/left-lower-leg/Lift</property>
      <property>aero/left-lower-leg/ma-gwf-x</property>
    </product>
    <product>
      <property>aero/left-lower-leg/Drag</property>
      <property>aero/left-lower-leg/ma-gwf-z</property>
      <value> -1 </value>
    </product>
    <property>aero/left-lower-leg/My-gwf</property>
    <product>
      <property>aero/right-upper-arm/Lift</property>
      <property>aero/right-upper-arm/ma-gwf-x</property>
    </product>
    <product>
      <property>aero/right-upper-arm/Drag</property>
      <property>aero/right-upper-arm/ma-gwf-z</property>
      <value> -1 </value>
    </product>
    <property>aero/right-upper-arm/My-gwf</property>
    <product>
      <property>aero/left-upper-arm/Lift</property>
      <property>aero/left-upper-arm/ma-gwf-x</property>
    </product>
    <product>
      <property>aero/left-upper-arm/Drag</property>
      <property>aero/left-upper-arm/ma-gwf-z</property>
      <value> -1 </value>
    </product>
    <property>aero/left-upper-arm/My-gwf</property>
    <product>
      <property>aero/right-forearm/Lift</property>
      <property>aero/right-forearm/ma-gwf-x</property>
    </product>
    <product>
      <property>aero/right-forearm/Drag</property>
      <property>aero/right-forearm/ma-gwf-z</property>
      <value> -1 </value>
    </product>
    <property>aero/right-forearm/My-gwf</property>
    <product>
      <property>aero/left-forearm/Lift</property>
      <property>aero/left-forearm/ma-gwf-x</property>
    </product>
    <product>
      <property>aero/left-forearm/Drag</property>
      <property>aero/left-forearm/ma-gwf-z</property>
      <value> -1 </value>
    </product>
    <property>aero/left-forearm/My-gwf</property>
  </sum>
</function>

<function name="aero/total/gwf-z-moment">
  <description>Total aerodynamic moment about the global wind z-axis centered at the global cg</description>
  <sum>
    <product>
      <property>aero/torso/Drag</property>
      <property>aero/torso/ma-gwf-y</property>
    </product>
    <product>
      <property>aero/torso/Sideforce</property>
      <property>aero/torso/ma-gwf-x</property>
    </product>
    <property>aero/torso/Mz-gwf</property>
    <product>
      <property>aero/pelvis/Drag</property>
      <property>aero/pelvis/ma-gwf-y</property>
    </product>
    <product>
      <property>aero/pelvis/Sideforce</property>
      <property>aero/pelvis/ma-gwf-x</property>
    </product>
    <property>aero/pelvis/Mz-gwf</property>
    <product>
      <property>aero/head/Drag</property>
      <property>aero/head/ma-gwf-y</property>
    </product>
    <product>
      <property>aero/head/Sideforce</property>
      <property>aero/head/ma-gwf-x</property>
    </product>
    <property>aero/head/Mz-gwf</property>
    <product>
      <property>aero/right-upper-leg/Drag</property>
      <property>aero/right-upper-leg/ma-gwf-y</property>
    </product>
    <product>
      <property>aero/right-upper-leg/Sideforce</property>
      <property>aero/right-upper-leg/ma-gwf-x</property>
    </product>
    <property>aero/right-upper-leg/Mz-gwf</property>
    <product>
      <property>aero/left-upper-leg/Drag</property>
      <property>aero/left-upper-leg/ma-gwf-y</property>
    </product>
    <product>
      <property>aero/left-upper-leg/Sideforce</property>
      <property>aero/left-upper-leg/ma-gwf-x</property>
    </product>
    <property>aero/left-upper-leg/Mz-gwf</property>
    <product>
      <property>aero/right-lower-leg/Drag</property>
      <property>aero/right-lower-leg/ma-gwf-y</property>
    </product>
    <product>
      <property>aero/right-lower-leg/Sideforce</property>
      <property>aero/right-lower-leg/ma-gwf-x</property>
    </product>
    <property>aero/right-lower-leg/Mz-gwf</property>
    <product>
      <property>aero/left-lower-leg/Drag</property>
      <property>aero/left-lower-leg/ma-gwf-y</property>
    </product>
    <product>
      <property>aero/left-lower-leg/Sideforce</property>
      <property>aero/left-lower-leg/ma-gwf-x</property>
    </product>
    <property>aero/left-lower-leg/Mz-gwf</property>
    <product>
      <property>aero/right-upper-arm/Drag</property>
      <property>aero/right-upper-arm/ma-gwf-y</property>
    </product>
    <product>
      <property>aero/right-upper-arm/Sideforce</property>
      <property>aero/right-upper-arm/ma-gwf-x</property>
    </product>
    <property>aero/right-upper-arm/Mz-gwf</property>
    <product>
      <property>aero/left-upper-arm/Drag</property>
      <property>aero/left-upper-arm/ma-gwf-y</property>
    </product>
    <product>
      <property>aero/left-upper-arm/Sideforce</property>
      <property>aero/left-upper-arm/ma-gwf-x</property>
    </product>
    <property>aero/left-upper-arm/Mz-gwf</property>
    <product>
      <property>aero/right-forearm/Drag</property>
      <property>aero/right-forearm/ma-gwf-y</property>
    </product>
    <product>
      <property>aero/right-forearm/Sideforce</property>
      <property>aero/right-forearm/ma-gwf-x</property>
    </product>
    <property>aero/right-forearm/Mz-gwf</property>
    <product>
      <property>aero/left-forearm/Drag</property>
      <property>aero/left-forearm/ma-gwf-y</property>
    </product>
    <product>
      <property>aero/left-forearm/Sideforce</property>
      <property>aero/left-forearm/ma-gwf-x</property>
    </product>
    <property>aero/left-forearm/Mz-gwf</property>
  </sum>
</function>


<function name="aero/total/gbf-roll-moment">
  <rotation_wf_to_bf>
    <property>aero/total/gwf-x-moment</property>
    <property>aero/total/gwf-y-moment</property>
    <property>aero/total/gwf-z-moment</property>
    <property>aero/alpha-deg</property>
    <property>aero/beta-deg</property>
    <value> 0 </value>
    <value> 1 </value>
  </rotation_wf_to_bf>
</function>

<function name="aero/damping/roll_moment">
  <description>roll_moment_due_to_roll_rate(roll_damping)</description>
  <product>
    <property>aero/qbar-psf</property>
    <property>Creare/total/area</property>
    <property>Creare/total/width</property>
    <property>velocities/p-aero-rad_sec</property>
    <value>-0.05</value>
  </product>
</function>

<function name="aero/total/gbf-pitch-moment">
  <rotation_wf_to_bf>
    <property>aero/total/gwf-x-moment</property>
    <property>aero/total/gwf-y-moment</property>
    <property>aero/total/gwf-z-moment</property>
    <property>aero/alpha-deg</property>
    <property>aero/beta-deg</property>
    <value> 0 </value>
    <value> 2 </value>
  </rotation_wf_to_bf>
</function>

<function name="aero/damping/pitch_moment">
  <description>pitch_moment_due_to_pitch_rate(pitch_damping)</description>
  <product>
    <property>aero/qbar-psf</property>
    <property>Creare/total/area</property>
    <property>Creare/total/length</property>
    <property>velocities/q-aero-rad_sec</property>
    <value>-0.05</value>
  </product>
</function>

<function name="aero/total/gbf-yaw-moment">
  <rotation_wf_to_bf>
    <property>aero/total/gwf-x-moment</property>
    <property>aero/total/gwf-y-moment</property>
    <property>aero/total/gwf-z-moment</property>
    <property>aero/alpha-deg</property>
    <property>aero/beta-deg</property>
    <value> 0 </value>
    <value> 3 </value>
  </rotation_wf_to_bf>
</function>

<function name="aero/damping/yaw_moment">
  <description>yaw_moment_due_to_yaw_rate(yaw_damping)</description>
  <product>
    <property>aero/qbar-psf</property>
    <property>Creare/total/area</property>
    <property>Creare/total/length</property>
    <property>velocities/r-aero-rad_sec</property>
    <value>-0.05</value>
  </product>
</function>

<axis name="DRAG">
  <function name="aero/total/Drag">
    <sum>
      <property>aero/torso/Drag</property>
      <property>aero/pelvis/Drag</property>
      <property>aero/head/Drag</property>
      <property>aero/right-upper-leg/Drag</property>
      <property>aero/left-upper-leg/Drag</property>
      <property>aero/right-lower-leg/Drag</property>
      <property>aero/left-lower-leg/Drag</property>
      <property>aero/right-upper-arm/Drag</property>
      <property>aero/left-upper-arm/Drag</property>
      <property>aero/right-forearm/Drag</property>
      <property>aero/left-forearm/Drag</property>
    </sum>
  </function>
</axis>

<axis name="SIDE">
  <function name="aero/total/Sideforce">
    <sum>
      <property>aero/torso/Sideforce</property>
      <property>aero/pelvis/Sideforce</property>
      <property>aero/head/Sideforce</property>
      <property>aero/right-upper-leg/Sideforce</property>
      <property>aero/left-upper-leg/Sideforce</property>
      <property>aero/right-lower-leg/Sideforce</property>
      <property>aero/left-lower-leg/Sideforce</property>
      <property>aero/right-upper-arm/Sideforce</property>
      <property>aero/left-upper-arm/Sideforce</property>
      <property>aero/right-forearm/Sideforce</property>
      <property>aero/left-forearm/Sideforce</property>
    </sum>
  </function>
</axis>

<axis name="LIFT">
  <function name="aero/total/Lift">
    <sum>
      <property>aero/torso/Lift</property>
      <property>aero/pelvis/Lift</property>
      <property>aero/head/Lift</property>
      <property>aero/right-upper-leg/Lift</property>
      <property>aero/left-upper-leg/Lift</property>
      <property>aero/right-lower-leg/Lift</property>
      <property>aero/left-lower-leg/Lift</property>
      <property>aero/right-upper-arm/Lift</property>
      <property>aero/left-upper-arm/Lift</property>
      <property>aero/right-forearm/Lift</property>
      <property>aero/left-forearm/Lift</property>
    </sum>
  </function>
</axis>

<axis name="ROLL">
  <function name="aero/total/roll_moment">
    <sum>
      <property>aero/damping/roll_moment</property>
      <product>
        <value>1</value>
        <property>aero/total/gbf-roll-moment</property>
      </product>
    </sum>
  </function>

  <!-- chute deployed -->
  <function name="aero/coefficient/Clt">
      <description>Roll_moment_due_to_roll_angle</description>
      <product>
          <property>aero/qbar-psf</property>
          <property>metrics/Sw-sqft</property>
          <property>metrics/bw-ft</property>
          <property>aero/bi2vel</property>
          <property>velocities/p-aero-rad_sec</property>
          <value>-5</value>
      </product>
  </function>
  <function name="aero/coefficient/Clp">
      <description>Roll_moment_due_to_roll_rate</description>
      <product>
          <property>aero/qbar-psf</property>
          <property>metrics/Sw-sqft</property>
          <property>metrics/bw-ft</property>
          <property>aero/bi2vel</property>
          <property>velocities/p-aero-rad_sec</property>
          <value>-3</value>
      </product>
  </function>
  <function name="aero/coefficient/Clda">
      <description>Roll_moment_due_to_aileron</description>
      <product>
          <property>aero/qbar-psf</property>
          <property>metrics/Sw-sqft</property>
          <property>metrics/bw-ft</property>
          <property>fcs/aileron-pos-rad</property>
          <value>0.2</value>
      </product>
  </function>
</axis>

<axis name="PITCH">
  <function name="aero/total/pitch_moment">
    <sum>
      <property>aero/damping/pitch_moment</property>
      <product>
        <value>1</value>
        <property>aero/total/gbf-pitch-moment</property>
      </product>
    </sum>
  </function>

  <!-- chute deployed -->
  <function name="aero/coefficient/Cmalpha">
      <description>Pitch_moment_due_to_alpha</description>
      <product>
          <property>aero/qbar-psf</property>
          <property>metrics/Sw-sqft</property>
          <property>metrics/cbarw-ft</property>
          <property>aero/alpha-rad</property>
          <value>-3</value>
      </product>
  </function>
  <function name="aero/coefficient/Cmde">
      <description>Pitch_moment_due_to_elevator</description>
      <product>
          <property>aero/qbar-psf</property>
          <property>metrics/Sw-sqft</property>
          <property>metrics/cbarw-ft</property>
          <property>fcs/elevator-pos-rad</property>
          <value>-2</value>
      </product>
  </function>
  <function name="aero/coefficient/Cmq">
      <description>Pitch_moment_due_to_pitch_rate</description>
      <product>
          <property>aero/qbar-psf</property>
          <property>metrics/Sw-sqft</property>
          <property>metrics/cbarw-ft</property>
          <property>aero/ci2vel</property>
          <property>velocities/q-aero-rad_sec</property>
          <value>-30</value>
      </product>
  </function>
</axis>

<axis name="YAW">
  <function name="aero/total/yaw_moment">
    <sum>
      <property>aero/damping/yaw_moment</property>
      <product>
        <value>1</value>
        <property>aero/total/gbf-yaw-moment</property>
      </product>
    </sum>
  </function>
</axis>

</aerodynamics>


<!--
    <output name="JSBout172C.csv" type="CSV" rate="60">
      <property> aero/qbar-psf </property>
      <property> accelerations/udot-ft_sec2 </property>
      <property> accelerations/vdot-ft_sec2 </property>
      <property> accelerations/wdot-ft_sec2 </property>
      <property> accelerations/a-pilot-x-ft_sec2 </property>
      <property> accelerations/a-pilot-y-ft_sec2 </property>
      <property> accelerations/a-pilot-z-ft_sec2 </property>
      <property> accelerations/n-pilot-x-norm    </property>
      <property> accelerations/n-pilot-y-norm    </property>
      <property> accelerations/n-pilot-z-norm    </property>
      <rates> ON </rates>
      <velocities> ON </velocities>
      <forces> ON </forces>
      <moments> ON </moments>
      <position> ON </position>
      <fcs> OFF </fcs>
      <propulsion> OFF </propulsion>
      <aerosurfaces> OFF </aerosurfaces>
      <fcs> OFF </fcs>
      <ground_reactions> OFF </ground_reactions>
    </output>
-->
</fdm_config>
